# OpenSim document version 40000
AnalyzeTool BODY_kinematics_:
  model_file: generic_Model_with_Markers.osim
  replace_force_set: false
  output_precision: 8
  initial_time: 0
  final_time: 0.4958333
  solve_for_equilibrium_for_auxiliary_states: false
  maximum_number_of_integrator_steps: 20000
  maximum_integrator_step_size: 1
  minimum_integrator_step_size: 1e-8
  integrator_error_tolerance: 1e-5
  coordinates_file: IK_RESULTS_Participant_105_90degreecut06.mot
  lowpass_cutoff_frequency_for_coordinates: 6
  AnalysisSet Analyses:
    BodyKinematics: start_time=0 end_time=0.4958333 step_interval=1 in_degrees=true bodies=all
        express_results_in_body_local_frame=false
    PointKinematics: on=false start_time=0 end_time=0.4958333 step_interval=1 in_degrees=true body_name=ground
        relative_to_body_name=none point_name=NONAME point=(0 0 0)
