# OpenSim document version 40000
InverseKinematicsTool P001:
  results_directory: C:\Users\adpatrick\OneDrive - nih.no\Desktop\Working
  time_range: 0 0.4958333
  marker_file: ../Users/adpatrick/OneDrive - nih.no/Desktop/Calgary/Test2/Participant_105_90degreecut06.trc
  IKTaskSet:
    IKMarkerTask STERNUM: apply=true weight=10
    IKMarkerTask C7: apply=true weight=10
    IKMarkerTask RGH: apply=true weight=10
    IKMarkerTask LGH: apply=true weight=10
    IKMarkerTask RFRONTAL: apply=true weight=20
    IKMarkerTask LFRONTAL: apply=true weight=20
    IKMarkerTask ROCCIPUT: apply=true weight=20
    IKMarkerTask LOCCIPUT: apply=true weight=20
    IKMarkerTask RASIS: apply=true weight=10
    IKMarkerTask LASIS: apply=true weight=10
    IKMarkerTask RPSIS: apply=true weight=10
    IKMarkerTask LPSIS: apply=true weight=10
    IKMarkerTask RAT: apply=true weight=20
    IKMarkerTask RLT: apply=true weight=20
    IKMarkerTask RDAT: apply=true weight=20
    IKMarkerTask RLE: apply=true weight=10
    IKMarkerTask RME: apply=true weight=10
    IKMarkerTask RTT: apply=true weight=10
    IKMarkerTask RFH: apply=true weight=10
    IKMarkerTask RT: apply=true weight=20
    IKMarkerTask RF: apply=true weight=20
    IKMarkerTask RLM: apply=true weight=10
    IKMarkerTask RMM: apply=true weight=10
    IKMarkerTask RMC: apply=true weight=10
    IKMarkerTask RMEDC: apply=true weight=10
    IKMarkerTask RLC: apply=true weight=10
    IKMarkerTask R5MT: apply=true weight=10
    IKMarkerTask R1MT: apply=true weight=10
    IKMarkerTask LAT: apply=true weight=20
    IKMarkerTask LLT: apply=true weight=20
    IKMarkerTask LDAT: apply=true weight=20
    IKMarkerTask LLE: apply=true weight=10
    IKMarkerTask LME: apply=true weight=10
    IKMarkerTask LTT: apply=true weight=10
    IKMarkerTask LFH: apply=true weight=10
    IKMarkerTask LT: apply=true weight=20
    IKMarkerTask LF: apply=true weight=20
    IKMarkerTask LLM: apply=true weight=10
    IKMarkerTask LMM: apply=true weight=10
    IKMarkerTask LMC: apply=true weight=10
    IKMarkerTask LMEDC: apply=true weight=10
    IKMarkerTask LLC: apply=true weight=10
    IKMarkerTask L5MT: apply=true weight=10
    IKMarkerTask L1MT: apply=true weight=10
    IKMarkerTask LELBOW: apply=true weight=10
    IKMarkerTask RELBOW: apply=true weight=10
    IKMarkerTask RWRIST: apply=true weight=10
    IKMarkerTask LWRIST: apply=true weight=10
    IKMarkerTask T6: apply=true weight=20
