# OpenSim document version 40000
ScaleTool P001:
  mass: 57 [kg]
  height: 1730
  age: -1
  GenericModelMaker:
    marker_set_file: Markerset.xml
  ModelScaler:
    apply: true
    scaling_order: measurements
    marker_file: ../Users/adpatrick/OneDrive - nih.no/Desktop/Calgary/Test2/Static.trc
    time_range: 0 3.11667
    preserve_mass_distribution: true
    output_model_file: C:\OLE_app\..\OpenSim_Test\scaled_matlab.osim
    output_scale_file: C:\OLE_app\..\OpenSim_Test\scaleSet_applied.xml
    MeasurementSet:
      Measurement pelvis_x: apply=true
        MarkerPair: markers=(V_MidPnt_SIAS V_MidPnt_SIPS)
        BodyScale pelvis: axes=X
      Measurement thight_right: apply=true
        MarkerPair: markers=(V_Right_Hip V_MidPnt_R_Knee)
        MarkerPair: markers=(RLE RME)
        BodyScale femur_r: axes=(X Z)
      Measurement thight_left: apply=true
        MarkerPair: markers=(V_Left_Hip V_MidPnt_L_Knee)
        MarkerPair: markers=(LLE LME)
        BodyScale femur_l: axes=(X Z)
      Measurement shank_right: apply=true
        MarkerPair: markers=(V_MidPnt_R_Knee V_MidPnt_R_Mal)
        MarkerPair: markers=(RLM RMM)
        BodyScale tibia_r: axes=(X Z)
      Measurement shank_left: apply=true
        MarkerPair: markers=(V_MidPnt_L_Knee V_MidPnt_L_Mal)
        MarkerPair: markers=(LLM LMM)
        BodyScale tibia_l: axes=(X Z)
      Measurement foot_right: apply=true
        MarkerPair: markers=(RLC R1MT)
        BodyScale talus_r: axes=(X Y Z)
        BodyScale calcn_r: axes=(X Y Z)
        BodyScale toes_r: axes=(X Y Z)
      Measurement foot_left: apply=true
        MarkerPair: markers=(LMC L1MT)
        BodyScale talus_l: axes=(X Y Z)
        BodyScale calcn_l: axes=(X Y Z)
        BodyScale toes_l: axes=(X Y Z)
      Measurement torso: apply=false
        MarkerPair: markers=(V_MidPnt_SIPS C7)
        MarkerPair: markers=(RASIS RGH)
        MarkerPair: markers=(LASIS LGH)
      Measurement pelvis_y: apply=true
        MarkerPair: markers=(V_MidPnt_SIAS V_MidPnt_SIPS)
        MarkerPair: markers=(V_Right_Hip V_Left_Hip)
        BodyScale pelvis: axes=Y
      Measurement pelvis_z: apply=true
        MarkerPair: markers=(V_Right_Hip V_Left_Hip)
        BodyScale pelvis: axes=Z
      Measurement femur_r_y: apply=true
        MarkerPair: markers=(V_Right_Hip V_MidPnt_R_Knee)
        BodyScale femur_r: axes=Y
        BodyScale femur_l: axes=Y
      Measurement tibia_r_y: apply=true
        MarkerPair: markers=(V_MidPnt_R_Knee V_MidPnt_R_Mal)
        BodyScale tibia_r: axes=Y
        BodyScale tibia_l: axes=Y
      Measurement femur_l_y: apply=false
        MarkerPair: markers=(V_Left_Hip V_MidPnt_L_Knee)
      Measurement tibia_l_y: apply=false
        MarkerPair: markers=(V_MidPnt_L_Knee V_MidPnt_L_Mal)
      Measurement torso_x: apply=true
        MarkerPair: markers=(T6 STERNUM)
        BodyScale torso: axes=(X Y Z)
      Measurement humerus_r: apply=true
        MarkerPair: markers=(RGH RELBOW)
        BodyScale humerus_r: axes=(X Y Z)
      Measurement humerus_l: apply=true
        MarkerPair: markers=(LGH LELBOW)
        BodyScale humerus_l: axes=(X Y Z)
      Measurement ulna_radius_r: apply=true
        MarkerPair: markers=(RGH RWRIST)
        BodyScale ulna_r: axes=(X Y Z)
        BodyScale radius_r: axes=(X Y Z)
        BodyScale hand_r: axes=(X Y Z)
      Measurement ulna_radius_l: apply=true
        MarkerPair: markers=(LGH LWRIST)
        BodyScale ulna_l: axes=(X Y Z)
        BodyScale radius_l: axes=(X Y Z)
        BodyScale hand_l: axes=(X Y Z)
  MarkerPlacer:
    apply: true
    marker_file: ../Users/adpatrick/OneDrive - nih.no/Desktop/Calgary/Test2/Static.trc
    time_range: 0 3.11667
    output_motion_file: \P001_static_output.mot
    output_model_file: \P001_scaled_weighted_matlab.osim
    output_marker_file: \MarkerSet_after_scale.xml
    max_marker_movement: -1
    IKTaskSet:
      IKMarkerTask STERNUM: apply=true weight=10
      IKMarkerTask C7: apply=true weight=10
      IKMarkerTask RGH: apply=true weight=10
      IKMarkerTask LGH: apply=true weight=10
      IKMarkerTask RFRONTAL: apply=false weight=1
      IKMarkerTask LFRONTAL: apply=false weight=1
      IKMarkerTask ROCCIPUT: apply=false weight=1
      IKMarkerTask LOCCIPUT: apply=false weight=1
      IKMarkerTask RASIS: apply=true weight=10
      IKMarkerTask LASIS: apply=true weight=10
      IKMarkerTask RPSIS: apply=true weight=10
      IKMarkerTask LPSIS: apply=true weight=10
      IKMarkerTask V_MidPnt_SIAS: apply=true weight=20
      IKMarkerTask V_MidPnt_SIPS: apply=true weight=20
      IKMarkerTask V_MidPnt_Pelvis: apply=true weight=20
      IKMarkerTask V_MidPnt_Hip: apply=true weight=20
      IKMarkerTask V_Right_Hip: apply=true weight=20
      IKMarkerTask RAT: apply=false weight=1
      IKMarkerTask RLT: apply=false weight=1
      IKMarkerTask RDAT: apply=false weight=1
      IKMarkerTask RLE: apply=true weight=10
      IKMarkerTask RME: apply=true weight=10
      IKMarkerTask V_MidPnt_R_Knee: apply=true weight=20
      IKMarkerTask RTT: apply=true weight=10
      IKMarkerTask RFH: apply=true weight=10
      IKMarkerTask RT: apply=false weight=1
      IKMarkerTask RF: apply=false weight=1
      IKMarkerTask RLM: apply=true weight=10
      IKMarkerTask RMM: apply=true weight=10
      IKMarkerTask V_MidPnt_R_Mal: apply=true weight=20
      IKMarkerTask RMC: apply=true weight=10
      IKMarkerTask RMEDC: apply=true weight=10
      IKMarkerTask RLC: apply=true weight=10
      IKMarkerTask R5MT: apply=true weight=10
      IKMarkerTask R1MT: apply=true weight=10
      IKMarkerTask V_Left_Hip: apply=true weight=20
      IKMarkerTask LAT: apply=false weight=1
      IKMarkerTask LLT: apply=false weight=1
      IKMarkerTask LDAT: apply=false weight=1
      IKMarkerTask LLE: apply=true weight=10
      IKMarkerTask LME: apply=true weight=10
      IKMarkerTask V_MidPnt_L_Knee: apply=true weight=20
      IKMarkerTask LTT: apply=true weight=10
      IKMarkerTask LFH: apply=true weight=10
      IKMarkerTask LT: apply=false weight=1
      IKMarkerTask LF: apply=false weight=1
      IKMarkerTask LLM: apply=true weight=10
      IKMarkerTask LMM: apply=true weight=10
      IKMarkerTask V_MidPnt_L_Mal: apply=true weight=20
      IKMarkerTask LMC: apply=true weight=10
      IKMarkerTask LMEDC: apply=true weight=10
      IKMarkerTask LLC: apply=true weight=10
      IKMarkerTask L5MT: apply=true weight=10
      IKMarkerTask L1MT: apply=true weight=10
      IKMarkerTask LELBOW: apply=true weight=10
      IKMarkerTask RELBOW: apply=true weight=10
      IKMarkerTask RWRIST: apply=true weight=10
      IKMarkerTask LWRIST: apply=true weight=10
      IKMarkerTask T6: apply=true weight=10
      IKCoordinateTask [values shared by the 45 below unless stated]: apply=true weight=0 value_type=default_value
          value=0
      IKCoordinateTask pelvis_tilt_y
      IKCoordinateTask pelvis_list_x
      IKCoordinateTask pelvis_rotation_z
      IKCoordinateTask pelvis_tx
      IKCoordinateTask pelvis_ty
      IKCoordinateTask pelvis_tz
      IKCoordinateTask hip_flexion_y_r
      IKCoordinateTask hip_adduction_x_r
      IKCoordinateTask hip_rotation_z_r
      IKCoordinateTask knee_flexion_y_r
      IKCoordinateTask knee_rotation_z_r
      IKCoordinateTask knee_adduction_x_r
      IKCoordinateTask ankle_flexion_y_r
      IKCoordinateTask ankle_rotation_z_r
      IKCoordinateTask ankle_eversion_x_r
      IKCoordinateTask subtalar_angle_r
      IKCoordinateTask mpj_flexion_y_r
      IKCoordinateTask hip_flexion_y_l
      IKCoordinateTask hip_adduction_x_l
      IKCoordinateTask hip_rotation_z_l
      IKCoordinateTask knee_flexion_y_l
      IKCoordinateTask knee_rotation_z_l
      IKCoordinateTask knee_adduction_x_l
      IKCoordinateTask ankle_flexion_y_l
      IKCoordinateTask ankle_rotation_z_l
      IKCoordinateTask ankle_eversion_x_l
      IKCoordinateTask subtalar_angle_l
      IKCoordinateTask mpj_flexion_y_l
      IKCoordinateTask lumbar_extension_y
      IKCoordinateTask lumbar_bending_x
      IKCoordinateTask lumbar_rotation_z
      IKCoordinateTask arm_flexion_y_r
      IKCoordinateTask arm_adduction_x_r
      IKCoordinateTask arm_rotation_z_r
      IKCoordinateTask elbow_flexion_y_r
      IKCoordinateTask hand_pronation_x_r
      IKCoordinateTask wrist_flexion_y_r
      IKCoordinateTask wrist_rotation_z_r
      IKCoordinateTask arm_flexion_y_l
      IKCoordinateTask arm_adduction_x_l
      IKCoordinateTask arm_rotation_z_l
      IKCoordinateTask elbow_flexion_y_l
      IKCoordinateTask hand_pronation_x_l
      IKCoordinateTask wrist_flexion_y_l
      IKCoordinateTask wrist_rotation_z_l
