# OpenSim document version 40000
InverseKinematicsTool Cutting10:
  results_directory: C:\Users\adpatrick\OneDrive - nih.no\Desktop\Oslo2021\Intensity1\P001
  constraint_weight: Inf
  accuracy: 1e-5
  time_range: 0 0.49
  output_motion_file: ../Oslo2021/Intensity1/P001/IK_RESULTS_Cutting10.mot
  report_errors: true
  marker_file: ../Oslo2021/Intensity1/P001/Cutting10.trc
  report_marker_locations: true
  IKTaskSet:
    IKMarkerTask V_Top_Head: apply=false weight=10
    IKMarkerTask sternum: apply=true weight=10
    IKMarkerTask C_7: apply=true weight=10
    IKMarkerTask acrom_right: apply=true weight=10
    IKMarkerTask acrom_left: apply=true weight=10
    IKMarkerTask head_front_right: apply=true weight=10
    IKMarkerTask head_front_left: apply=true weight=10
    IKMarkerTask head_back_right: apply=true weight=10
    IKMarkerTask head_back_left: apply=true weight=10
    IKMarkerTask ear_right: apply=true weight=10
    IKMarkerTask ear_left: apply=true weight=10
    IKMarkerTask SIAS_right: apply=true weight=10
    IKMarkerTask SIAS_left: apply=true weight=10
    IKMarkerTask SIPS_right: apply=true weight=10
    IKMarkerTask SIPS_left: apply=true weight=10
    IKMarkerTask V_MidPnt_SIAS: apply=false weight=10
    IKMarkerTask V_MidPnt_SIPS: apply=false weight=10
    IKMarkerTask V_MidPnt_Pelvis: apply=false weight=10
    IKMarkerTask V_Right_Hip: apply=false weight=10
    IKMarkerTask cluster_femur_right_1: apply=true weight=10
    IKMarkerTask cluster_femur_right_2: apply=true weight=10
    IKMarkerTask cluster_femur_right_3: apply=true weight=10
    IKMarkerTask cluster_femur_right_4: apply=true weight=10
    IKMarkerTask epi_lat_right: apply=true weight=10
    IKMarkerTask epi_med_right: apply=true weight=10
    IKMarkerTask V_MidPnt_R_Knee: apply=false weight=10
    IKMarkerTask cluster_tibia_right_1: apply=true weight=10
    IKMarkerTask cluster_tibia_right_2: apply=true weight=10
    IKMarkerTask cluster_tibia_right_3: apply=true weight=10
    IKMarkerTask cluster_tibia_right_4: apply=true weight=10
    IKMarkerTask mal_lat_right: apply=true weight=10
    IKMarkerTask mal_med_right: apply=true weight=10
    IKMarkerTask V_MidPnt_R_Mal: apply=false weight=10
    IKMarkerTask calc_back_right: apply=true weight=10
    IKMarkerTask calc_med_right: apply=true weight=10
    IKMarkerTask calc_lat_right: apply=true weight=10
    IKMarkerTask forfoot_lat_right: apply=true weight=10
    IKMarkerTask forfoot_med_right: apply=true weight=10
    IKMarkerTask toe_right: apply=true weight=10
    IKMarkerTask V_Left_Hip: apply=false weight=10
    IKMarkerTask cluster_femur_left_1: apply=true weight=10
    IKMarkerTask cluster_femur_left_2: apply=true weight=10
    IKMarkerTask cluster_femur_left_3: apply=true weight=10
    IKMarkerTask cluster_femur_left_4: apply=true weight=10
    IKMarkerTask epi_lat_left: apply=true weight=10
    IKMarkerTask epi_med_left: apply=true weight=10
    IKMarkerTask V_MidPnt_L_Knee: apply=false weight=10
    IKMarkerTask cluster_tibia_left_1: apply=true weight=10
    IKMarkerTask cluster_tibia_left_2: apply=true weight=10
    IKMarkerTask cluster_tibia_left_3: apply=true weight=10
    IKMarkerTask cluster_tibia_left_4: apply=true weight=10
    IKMarkerTask mal_lat_left: apply=true weight=10
    IKMarkerTask mal_med_left: apply=true weight=10
    IKMarkerTask V_MidPnt_L_Mal: apply=false weight=10
    IKMarkerTask calc_back_left: apply=true weight=10
    IKMarkerTask calc_med_left: apply=true weight=10
    IKMarkerTask calc_lat_left: apply=true weight=10
    IKMarkerTask forefoot_lat_left: apply=true weight=10
    IKMarkerTask forefoot_med_left: apply=true weight=10
    IKMarkerTask toe_left: apply=true weight=10
    IKMarkerTask clav: apply=true weight=10
    IKMarkerTask elbow_med_left: apply=true weight=10
    IKMarkerTask elbow_lat_left: apply=true weight=10
    IKMarkerTask elbow_top_left: apply=true weight=10
    IKMarkerTask elbow_med_right: apply=true weight=10
    IKMarkerTask elbow_lat_right: apply=true weight=10
    IKMarkerTask elbow_top_right: apply=true weight=10
    IKMarkerTask cluster_upperarm_left_1: apply=true weight=10
    IKMarkerTask cluster_upperarm_left_2: apply=true weight=10
    IKMarkerTask cluster_upperarm_left_3: apply=true weight=10
    IKMarkerTask cluster_upperarm_right_1: apply=true weight=10
    IKMarkerTask cluster_upperarm_right_2: apply=true weight=10
    IKMarkerTask cluster_upperarm_right_3: apply=true weight=10
    IKMarkerTask cluster_lowerarm_right_1: apply=true weight=10
    IKMarkerTask cluster_lowerarm_right_2: apply=true weight=10
    IKMarkerTask cluster_lowerarm_right_3: apply=true weight=10
    IKMarkerTask cluster_lowerarm_left_1: apply=true weight=10
    IKMarkerTask cluster_lowerarm_left_2: apply=true weight=10
    IKMarkerTask cluster_lowerarm_left_3: apply=true weight=10
    IKMarkerTask hand_top_right: apply=true weight=10
    IKMarkerTask hand_top_left: apply=true weight=10
    IKMarkerTask hand_med_right: apply=true weight=10
    IKMarkerTask hand_lat_right: apply=true weight=10
    IKMarkerTask hand_med_left: apply=true weight=10
    IKMarkerTask hand_lat_left: apply=true weight=10
    IKMarkerTask B_10: apply=true weight=10
    IKMarkerTask shoulder_left: apply=true weight=10
    IKMarkerTask shoulder_right: apply=true weight=10
