# OpenSim document version 40000
ScaleTool MSquaredLowerbody_scaled:
  mass: 71.036 [kg]
  height: -1
  age: -1
  GenericModelMaker:
    marker_set_file: m_squared_fullbody_markerset.xml
  ModelScaler:
    apply: true
    scaling_order: measurements
    marker_file: C:/OpenSimTool-master/MainFun/OpenSimSetupFiles/FullBody/../../../../Users/markur/Desktop/OsimTestData/Running_Shoe_A/P078/ExperimentalData/P078_Static_trial_A_1_markers.trc
    time_range: 0 0.995
    preserve_mass_distribution: true
    MeasurementSet:
      Measurement pelvis_x: apply=true
        MarkerPair: markers=(V_MidPnt_SIAS V_MidPnt_SIPS)
        BodyScale pelvis: axes=X
      Measurement thight_right: apply=true
        MarkerPair: markers=(V_Right_Hip V_MidPnt_R_Knee)
        MarkerPair: markers=(epi_lat_right epi_med_right)
        BodyScale femur_r: axes=(X Z)
      Measurement thight_left: apply=true
        MarkerPair: markers=(V_Left_Hip V_MidPnt_L_Knee)
        MarkerPair: markers=(epi_lat_left epi_med_left)
        BodyScale femur_l: axes=(X Z)
      Measurement shank_right: apply=true
        MarkerPair: markers=(V_MidPnt_R_Knee V_MidPnt_R_Mal)
        MarkerPair: markers=(mal_lat_right mal_med_right)
        BodyScale tibia_r: axes=(X Z)
      Measurement shank_left: apply=true
        MarkerPair: markers=(V_MidPnt_L_Knee V_MidPnt_L_Mal)
        MarkerPair: markers=(mal_lat_left mal_med_left)
        BodyScale tibia_l: axes=(X Z)
      Measurement foot_right: apply=true
        MarkerPair: markers=(calc_back_right toe_right)
        MarkerPair: markers=(calc_back_right forfoot_med_right)
        BodyScale talus_r: axes=(X Y Z)
        BodyScale calcn_r: axes=(X Y Z)
        BodyScale toes_r: axes=(X Y Z)
      Measurement foot_left: apply=true
        MarkerPair: markers=(calc_back_left toe_left)
        MarkerPair: markers=(calc_back_left forefoot_med_left)
        BodyScale talus_l: axes=(X Y Z)
        BodyScale calcn_l: axes=(X Y Z)
        BodyScale toes_l: axes=(X Y Z)
      Measurement torso: apply=true
        MarkerPair: markers=(V_MidPnt_SIPS C_7)
        MarkerPair: markers=(SIAS_right acrom_right)
        MarkerPair: markers=(SIAS_left acrom_left)
        BodyScale torso: axes=(X Y Z)
      Measurement pelvis_y: apply=true
        MarkerPair: markers=(V_MidPnt_SIAS V_MidPnt_SIPS)
        MarkerPair: markers=(V_Right_Hip V_Left_Hip)
        BodyScale pelvis: axes=Y
      Measurement pelvis_z: apply=true
        MarkerPair: markers=(V_Right_Hip V_Left_Hip)
        BodyScale pelvis: axes=Z
      Measurement femur_r_y: apply=true
        MarkerPair: markers=(V_Right_Hip V_MidPnt_R_Knee)
        BodyScale femur_r: axes=Y
        BodyScale femur_l: axes=Y
      Measurement tibia_r_y: apply=true
        MarkerPair: markers=(V_MidPnt_R_Knee V_MidPnt_R_Mal)
        BodyScale tibia_r: axes=Y
        BodyScale tibia_l: axes=Y
      Measurement femur_l_y: apply=false
        MarkerPair: markers=(V_Left_Hip V_MidPnt_L_Knee)
      Measurement tibia_l_y: apply=false
        MarkerPair: markers=(V_MidPnt_L_Knee V_MidPnt_L_Mal)
      Measurement torso_x: apply=false
        MarkerPair: markers=(B_10 sternum)
      Measurement humerus_r: apply=true
        MarkerPair: markers=(acrom_right elbow_med_right)
        BodyScale humerus_r: axes=(X Y Z)
      Measurement humerus_l: apply=true
        MarkerPair: markers=(acrom_left elbow_med_left)
        BodyScale humerus_l: axes=(X Y Z)
      Measurement ulna_radius_r: apply=true
        MarkerPair: markers=(elbow_lat_right hand_top_right)
        BodyScale ulna_r: axes=(X Y Z)
        BodyScale radius_r: axes=(X Y Z)
        BodyScale hand_r: axes=(X Y Z)
      Measurement ulna_radius_l: apply=true
        MarkerPair: markers=(elbow_lat_left hand_top_left)
        BodyScale ulna_l: axes=(X Y Z)
        BodyScale radius_l: axes=(X Y Z)
        BodyScale hand_l: axes=(X Y Z)
      Measurement torso_new: apply=false
        MarkerPair: markers=(SIAS_right clav)
        MarkerPair: markers=(SIAS_left clav)
        MarkerPair: markers=(SIAS_right acrom_right)
        MarkerPair: markers=(SIAS_left acrom_left)
        MarkerPair: markers=(SIPS_right C_7)
        MarkerPair: markers=(SIPS_left C_7)
  MarkerPlacer:
    apply: true
    marker_file: C:/OpenSimTool-master/MainFun/OpenSimSetupFiles/FullBody/../../../../Users/markur/Desktop/OsimTestData/Running_Shoe_A/P078/ExperimentalData/P078_Static_trial_A_1_markers.trc
    time_range: 0 100
    max_marker_movement: -1
    IKTaskSet:
      IKMarkerTask V_Top_Head: apply=false weight=1
      IKMarkerTask sternum: apply=false weight=1
      IKMarkerTask C_7: apply=true weight=10
      IKMarkerTask acrom_right: apply=true weight=5
      IKMarkerTask acrom_left: apply=true weight=5
      IKMarkerTask head_front_right: apply=false weight=1
      IKMarkerTask head_front_left: apply=false weight=1
      IKMarkerTask head_back_right: apply=false weight=1
      IKMarkerTask head_back_left: apply=false weight=1
      IKMarkerTask SIAS_right: apply=true weight=15
      IKMarkerTask SIAS_left: apply=true weight=15
      IKMarkerTask SIPS_right: apply=true weight=15
      IKMarkerTask SIPS_left: apply=true weight=15
      IKMarkerTask V_MidPnt_SIAS: apply=false weight=1
      IKMarkerTask V_MidPnt_SIPS: apply=false weight=1
      IKMarkerTask V_MidPnt_Pelvis: apply=false weight=1
      IKMarkerTask V_MidPnt_Hip: apply=false weight=1
      IKMarkerTask V_Right_Hip: apply=true weight=25
      IKMarkerTask cluster_femur_right_1: apply=false weight=1
      IKMarkerTask cluster_femur_right_2: apply=false weight=1
      IKMarkerTask cluster_femur_right_3: apply=false weight=1
      IKMarkerTask cluster_femur_right_4: apply=false weight=1
      IKMarkerTask epi_lat_right: apply=true weight=10
      IKMarkerTask epi_med_right: apply=true weight=10
      IKMarkerTask V_MidPnt_R_Knee: apply=true weight=20
      IKMarkerTask cluster_tibia_right_1: apply=false weight=1
      IKMarkerTask cluster_tibia_right_2: apply=false weight=1
      IKMarkerTask cluster_tibia_right_3: apply=false weight=1
      IKMarkerTask cluster_tibia_right_4: apply=false weight=1
      IKMarkerTask mal_lat_right: apply=true weight=5
      IKMarkerTask mal_med_right: apply=true weight=5
      IKMarkerTask V_MidPnt_R_Mal: apply=true weight=10
      IKMarkerTask calc_back_right: apply=true weight=7.5
      IKMarkerTask calc_med_right: apply=false weight=2.5
      IKMarkerTask calc_lat_right: apply=false weight=2.5
      IKMarkerTask forfoot_lat_right: apply=true weight=2.5
      IKMarkerTask forfoot_med_right: apply=true weight=2.5
      IKMarkerTask toe_right: apply=true weight=7.5
      IKMarkerTask V_Left_Hip: apply=true weight=25
      IKMarkerTask cluster_femur_left_1: apply=false weight=1
      IKMarkerTask cluster_femur_left_2: apply=false weight=1
      IKMarkerTask cluster_femur_left_3: apply=false weight=1
      IKMarkerTask cluster_femur_left_4: apply=false weight=1
      IKMarkerTask epi_lat_left: apply=true weight=10
      IKMarkerTask epi_med_left: apply=true weight=10
      IKMarkerTask V_MidPnt_L_Knee: apply=true weight=20
      IKMarkerTask cluster_tibia_left_1: apply=false weight=1
      IKMarkerTask cluster_tibia_left_2: apply=false weight=1
      IKMarkerTask cluster_tibia_left_3: apply=false weight=1
      IKMarkerTask cluster_tibia_left_4: apply=false weight=1
      IKMarkerTask mal_lat_left: apply=true weight=5
      IKMarkerTask mal_med_left: apply=true weight=5
      IKMarkerTask V_MidPnt_L_Mal: apply=true weight=10
      IKMarkerTask calc_back_left: apply=true weight=7.5
      IKMarkerTask calc_med_left: apply=false weight=2.5
      IKMarkerTask calc_lat_left: apply=false weight=2.5
      IKMarkerTask forefoot_lat_left: apply=true weight=2.5
      IKMarkerTask forefoot_med_left: apply=true weight=2.5
      IKMarkerTask toe_left: apply=true weight=7.5
      IKMarkerTask clav: apply=true weight=2.5
      IKMarkerTask elbow_med_left: apply=true weight=2.5
      IKMarkerTask elbow_lat_left: apply=true weight=2.5
      IKMarkerTask elbow_top_left: apply=true weight=2.5
      IKMarkerTask elbow_med_right: apply=true weight=2.5
      IKMarkerTask elbow_lat_right: apply=true weight=2.5
      IKMarkerTask elbow_top_right: apply=true weight=2.5
      IKMarkerTask hand_top_right: apply=true weight=5
      IKMarkerTask hand_top_left: apply=true weight=5
      IKMarkerTask hand_med_right: apply=true weight=2.5
      IKMarkerTask hand_lat_right: apply=true weight=2.5
      IKMarkerTask hand_med_left: apply=true weight=2.5
      IKMarkerTask hand_lat_left: apply=true weight=2.5
