# OpenSim document version 40000
Model 3DGaitModelwithSimpleArms:
  gravity: 0 -9.80665 0
  length_units: meters
  force_units: N
  credits:
    Delp S.L., Loan J.P., Hoy M.G., Zajac F.E., Topp E.L., Rosen J.M., Thelen D.G., Anderson F.C., Seth A., Hamner S.R.
  publications:
    Notes: 3D, 23 DOF gait model created by D.G. Thelen, Univ. of Wisconsin-Madison, and Samuel Hamner, Ajay Seth, Frank C. Anderson, and Scott L. Delp, Stanford University. Lower extremity joint defintions based on Delp et al. (1990). Low back joint and anthropometry based on Anderson and Pandy (1999, 2001). Planar knee model of Yamaguchi and Zajac (1989). Seth removed the patella to avoid kinematic constraints; insertions of the quadrucepts are handled with moving points in the tibia frame. Hamner added arms adapted from Holzbaur et al., 2005. Hamner, S.R., Seth, A, Delp, S.L.: Muscle contributions to propulsion and support during running. Journal of Biomechanics, 2010. Delp, S.L., Loan, J.P., Hoy, M.G., Zajac, F.E., Topp E.L., Rosen, J.M.: An interactive graphics-based model of the lower extremity to study orthopaedic surgical procedures, IEEE Transactions on Biomedical Engineering, vol. 37, pp. 757-767, 1990. Yamaguchi G.T., Zajac F.E.: A planar model of the knee joint to characterize the knee extensor mechanism." J . Biomech. vol. 21. pp. 1-10. 1989. Anderson F.C., Pandy M.G.: A dynamic optimization solution for vertical jumping in three dimensions. Computer Methods in Biomechanics and Biomedical Engineering 2:201-231, 1999. Anderson F.C., Pandy M.G.: Dynamic optimization of human walking. Journal of Biomechanical Engineering 123:381-390, 2001. Holzbaur, KR, WM Murray and SL Delp, 2005. A model of the upper extremity for simulating musculoskeletal surgery and analyzing neuromuscular control. Ann Biomed Eng 33(6): 829-840.
  Ground
  BodySet:
    Body pelvis: mass=11.777 [kg] mass_center=(-0.0707 0 0) inertia=(0.1028 0.0871 0.0579 0 0 0)
        meshes=(sacrum.vtp pelvis.vtp l_pelvis.vtp)
    Body femur_r: mass=9.3014 mass_center=(0 -0.17 0) inertia=(0.1339 0.0351 0.1412 0 0 0) meshes=femur_r.vtp
    Body tibia_r: mass=3.7075 mass_center=(0 -0.1867 0) inertia=(0.0504 0.0051 0.0511 0 0 0)
        meshes=(tibia_r.vtp fibula_r.vtp)
    Body talus_r: mass=0.1 mass_center=(0 0 0) inertia=(0.001 0.001 0.001 0 0 0) meshes=talus_rv.vtp
    Body calcn_r: mass=1.25 mass_center=(0.1 0.03 0) inertia=(0.0014 0.0039 0.0041 0 0 0) meshes=foot.vtp
    Body toes_r: mass=0.2166 mass_center=(0.0346 0.006 -0.0175) inertia=(0.0001 0.0002 0.001 0 0 0) meshes=bofoot.vtp
    Body femur_l: mass=9.3014 mass_center=(0 -0.17 0) inertia=(0.1339 0.0351 0.1412 0 0 0) meshes=femur_l.vtp
    Body tibia_l: mass=3.7075 mass_center=(0 -0.1867 0) inertia=(0.0504 0.0051 0.0511 0 0 0)
        meshes=(tibia_l.vtp fibula_l.vtp)
    Body talus_l: mass=0.1 mass_center=(0 0 0) inertia=(0.001 0.001 0.001 0 0 0) meshes=talus_lv.vtp
    Body calcn_l: mass=1.25 mass_center=(0.1 0.03 0) inertia=(0.0014 0.0039 0.0041 0 0 0) meshes=l_foot.vtp
    Body toes_l: mass=0.2166 mass_center=(0.0346 0.006 0.0175) inertia=(0.0001 0.0002 0.001 0 0 0) meshes=l_bofoot.vtp
    Body torso: mass=26.8266 mass_center=(-0.03 0.32 0) inertia=(1.4745 0.7555 1.4314 0 0 0)
        meshes=(hat_spine.vtp hat_jaw.vtp hat_skull.vtp hat_ribs_scap.vtp)
    Body humerus_r: mass=2.0325 mass_center=(0 -0.164502 0) inertia=(0.011946 0.004121 0.013409 0 0 0)
        meshes=humerus_rv.vtp
    Body ulna_r: mass=0.6075 mass_center=(0 -0.120525 0) inertia=(0.002962 0.000618 0.003213 0 0 0) meshes=ulna_rv.vtp
    Body radius_r: mass=0.6075 mass_center=(0 -0.120525 0) inertia=(0.002962 0.000618 0.003213 0 0 0)
        meshes=radius_rv.vtp
    Body hand_r: mass=0.4575 mass_center=(0 -0.068095 0) inertia=(0.000892 0.000547 0.00134 0 0 0)
        meshes=(pisiform_rvs.vtp lunate_rvs.vtp scaphoid_rvs.vtp triquetrum_rvs.vtp hamate_rvs.vtp capitate_rvs.vtp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)
    Body humerus_l: mass=2.0325 mass_center=(0 -0.164502 0) inertia=(0.011946 0.004121 0.013409 0 0 0)
        meshes=humerus_lv.vtp
    Body ulna_l: mass=0.6075 mass_center=(0 -0.120525 0) inertia=(0.002962 0.000618 0.003213 0 0 0) meshes=ulna_lv.vtp
    Body radius_l: mass=0.6075 mass_center=(0 -0.120525 0) inertia=(0.002962 0.000618 0.003213 0 0 0)
        meshes=radius_lv.vtp
    Body hand_l: mass=0.4575 mass_center=(0 -0.068095 0) inertia=(0.000892 0.000547 0.00134 0 0 0)
        meshes=(pisiform_lvs.vtp lunate_lvs.vtp scaphoid_lvs.vtp triquetrum_lvs.vtp hamate_lvs.vtp capitate_lvs.vtp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)
  JointSet:
    CustomJoint ground_pelvis: socket_parent_frame=ground_offset socket_child_frame=pelvis_offset
      Coordinate pelvis_tilt_y: default_value=0 range=(-1.570796 1.570796) clamped=true
      Coordinate pelvis_list_x: default_value=0 range=(-1.570796 1.570796) clamped=true
      Coordinate pelvis_rotation_z: default_value=0 range=(-1.570796 1.570796) clamped=true
      Coordinate pelvis_tx: default_value=0 range=(-5 5) clamped=true
      Coordinate pelvis_ty: default_value=1 range=(-1 2) clamped=true
      Coordinate pelvis_tz: default_value=0 range=(-3 3) clamped=true
      PhysicalOffsetFrame ground_offset: socket_parent=/ground translation=(0 0 0) [meters]
      PhysicalOffsetFrame pelvis_offset: socket_parent=/bodyset/pelvis translation=(0 0 0)
      SpatialTransform:
        TransformAxis rotation1: coordinates=pelvis_tilt_y axis=(0 0 1) LinearFunction(coefficients=1 0)
        TransformAxis rotation2: coordinates=pelvis_list_x axis=(1 0 0) LinearFunction(coefficients=1 0)
        TransformAxis rotation3: coordinates=pelvis_rotation_z axis=(0 1 0) LinearFunction(coefficients=1 0)
        TransformAxis translation1: coordinates=pelvis_tx axis=(1 0 0) LinearFunction(coefficients=1 0)
        TransformAxis translation2: coordinates=pelvis_ty axis=(0 1 0) LinearFunction(coefficients=1 0)
        TransformAxis translation3: coordinates=pelvis_tz axis=(0 0 1) LinearFunction(coefficients=1 0)
    CustomJoint hip_r: socket_parent_frame=pelvis_offset socket_child_frame=femur_r_offset
      Coordinate hip_flexion_y_r: default_value=0 range=(-2.094395 2.094395) clamped=true
      Coordinate hip_adduction_x_r: default_value=0 range=(-2.094395 2.094395) clamped=true
      Coordinate hip_rotation_z_r: default_value=0 range=(-2.094395 2.094395) clamped=true
      PhysicalOffsetFrame pelvis_offset: socket_parent=/bodyset/pelvis translation=(-0.0707 -0.0661 0.0835)
      PhysicalOffsetFrame femur_r_offset: socket_parent=/bodyset/femur_r translation=(0 0 0)
      SpatialTransform: axes_held_at_zero=(translation1 translation2 translation3)
        TransformAxis rotation1: coordinates=hip_flexion_y_r axis=(0 0 1) LinearFunction(coefficients=1 0)
        TransformAxis rotation2: coordinates=hip_adduction_x_r axis=(1 0 0) LinearFunction(coefficients=1 0)
        TransformAxis rotation3: coordinates=hip_rotation_z_r axis=(0 1 0) LinearFunction(coefficients=1 0)
    CustomJoint knee_r: socket_parent_frame=femur_r_offset socket_child_frame=tibia_r_offset
      Coordinate knee_flexion_y_r: default_value=0 range=(-2.094395 0.1745329) clamped=true
      Coordinate knee_rotation_z_r: default_value=0 range=(-0.7853982 0.7853982) clamped=false locked=true
      Coordinate knee_adduction_x_r: default_value=0 range=(-0.7853982 0.7853982) clamped=true
      PhysicalOffsetFrame femur_r_offset: socket_parent=/bodyset/femur_r translation=(0 0 0)
      PhysicalOffsetFrame tibia_r_offset: socket_parent=/bodyset/tibia_r translation=(0 0 0)
      SpatialTransform: axes_held_at_zero=translation3
        TransformAxis rotation1: coordinates=knee_flexion_y_r axis=(0 0 1) LinearFunction(coefficients=1 0)
        TransformAxis rotation2: coordinates=knee_rotation_z_r axis=(0 1 0) LinearFunction(coefficients=1 0)
        TransformAxis rotation3: coordinates=knee_adduction_x_r axis=(1 0 0) LinearFunction(coefficients=1 0)
        TransformAxis translation1: coordinates=knee_flexion_y_r axis=(1 0 0)
          SimmSpline: x=(-2.0944 -1.74533 -1.39626 -1.0472 -0.698132 -0.349066 -0.174533 0.197344 0.337395 0.490178 1.52146 2.0944)
              y=(-0.0032 0.00179 0.00411 0.0041 0.00212 -0.001 -0.0031 -0.005227 -0.005435 -0.005574 -0.005435 -0.00525)
        TransformAxis translation2: coordinates=knee_flexion_y_r axis=(0 1 0)
          SimmSpline: x=(-2.0944 -1.22173 -0.523599 -0.349066 -0.174533 0.159149 2.0944)
              y=(-0.4226 -0.4082 -0.399 -0.3976 -0.3966 -0.395264 -0.396)
    CustomJoint ankle_r: socket_parent_frame=tibia_r_offset socket_child_frame=talus_r_offset
      Coordinate ankle_flexion_y_r: default_value=0 range=(-1.570796 1.570796) clamped=true
      Coordinate ankle_rotation_z_r: default_value=0 range=(-1.570796 1.570796) clamped=true
      Coordinate ankle_eversion_x_r: default_value=0 range=(-1.570796 1.570796) clamped=true
      PhysicalOffsetFrame tibia_r_offset: socket_parent=/bodyset/tibia_r translation=(0 -0.43 0)
      PhysicalOffsetFrame talus_r_offset: socket_parent=/bodyset/talus_r translation=(0 0 0)
      SpatialTransform: axes_held_at_zero=(translation1 translation2 translation3)
        TransformAxis rotation1: coordinates=ankle_flexion_y_r axis=(0 0 1) LinearFunction(coefficients=1 0)
        TransformAxis rotation2: coordinates=ankle_rotation_z_r axis=(0 1 0) LinearFunction(coefficients=1 0)
        TransformAxis rotation3: coordinates=ankle_eversion_x_r axis=(1 0 0) LinearFunction(coefficients=1 0)
    CustomJoint subtalar_r: socket_parent_frame=talus_r_offset socket_child_frame=calcn_r_offset
      Coordinate subtalar_angle_r: default_value=0 range=(0 0) clamped=false
      PhysicalOffsetFrame talus_r_offset: socket_parent=/bodyset/talus_r translation=(-0.04877 -0.04195 0.00792)
      PhysicalOffsetFrame calcn_r_offset: socket_parent=/bodyset/calcn_r translation=(0 0 0)
      SpatialTransform: axes_held_at_zero=(rotation2 rotation3 translation1 translation2 translation3)
        TransformAxis rotation1: coordinates=subtalar_angle_r axis=(0.7871796 0.6047475 -0.1209495) Constant(value=0)
    CustomJoint mtp_r: socket_parent_frame=calcn_r_offset socket_child_frame=toes_r_offset
      Coordinate mpj_flexion_y_r: default_value=0 range=(-1.570796 1.570796) clamped=true
      PhysicalOffsetFrame calcn_r_offset: socket_parent=/bodyset/calcn_r translation=(0.1788 -0.002 0.00108)
      PhysicalOffsetFrame toes_r_offset: socket_parent=/bodyset/toes_r translation=(0 0 0)
      SpatialTransform: axes_held_at_zero=(rotation2 rotation3 translation1 translation2 translation3)
        TransformAxis rotation1: coordinates=mpj_flexion_y_r axis=(-0.5809544 0 0.8139361)
            LinearFunction(coefficients=1 0)
    CustomJoint hip_l: socket_parent_frame=pelvis_offset socket_child_frame=femur_l_offset
      Coordinate hip_flexion_y_l: default_value=0 range=(-2.094395 2.094395) clamped=true
      Coordinate hip_adduction_x_l: default_value=0 range=(-2.094395 2.094395) clamped=true
      Coordinate hip_rotation_z_l: default_value=0 range=(-2.094395 2.094395) clamped=true
      PhysicalOffsetFrame pelvis_offset: socket_parent=/bodyset/pelvis translation=(-0.0707 -0.0661 -0.0835)
      PhysicalOffsetFrame femur_l_offset: socket_parent=/bodyset/femur_l translation=(0 0 0)
      SpatialTransform: axes_held_at_zero=(translation1 translation2 translation3)
        TransformAxis rotation1: coordinates=hip_flexion_y_l axis=(0 0 1) LinearFunction(coefficients=1 0)
        TransformAxis rotation2: coordinates=hip_adduction_x_l axis=(-1 0 0) LinearFunction(coefficients=1 0)
        TransformAxis rotation3: coordinates=hip_rotation_z_l axis=(0 -1 0) LinearFunction(coefficients=1 0)
    CustomJoint knee_l: socket_parent_frame=femur_l_offset socket_child_frame=tibia_l_offset
      Coordinate knee_flexion_y_l: default_value=0 range=(-2.094395 0.1745329) clamped=true
      Coordinate knee_rotation_z_l: default_value=0 range=(-0.7853982 0.7853982) clamped=true locked=true
      Coordinate knee_adduction_x_l: default_value=0 range=(-0.7853982 0.7853982) clamped=true
      PhysicalOffsetFrame femur_l_offset: socket_parent=/bodyset/femur_l translation=(0 0 0)
      PhysicalOffsetFrame tibia_l_offset: socket_parent=/bodyset/tibia_l translation=(0 0 0)
      SpatialTransform: axes_held_at_zero=translation3
        TransformAxis rotation1: coordinates=knee_flexion_y_l axis=(0 0 1) LinearFunction(coefficients=1 0)
        TransformAxis rotation2: coordinates=knee_rotation_z_l axis=(0 1 0) LinearFunction(coefficients=1 0)
        TransformAxis rotation3: coordinates=knee_adduction_x_l axis=(1 0 0) LinearFunction(coefficients=1 0)
        TransformAxis translation1: coordinates=knee_flexion_y_l axis=(1 0 0)
          SimmSpline: x=(-2.0944 -1.74533 -1.39626 -1.0472 -0.698132 -0.349066 -0.174533 0.197344 0.337395 0.490178 1.52146 2.0944)
              y=(-0.0032 0.00179 0.00411 0.0041 0.00212 -0.001 -0.0031 -0.005227 -0.005435 -0.005574 -0.005435 -0.00525)
        TransformAxis translation2: coordinates=knee_flexion_y_l axis=(0 1 0)
          SimmSpline: x=(-2.0944 -1.22173 -0.523599 -0.349066 -0.174533 0.159149 2.0944)
              y=(-0.4226 -0.4082 -0.399 -0.3976 -0.3966 -0.395264 -0.396)
    CustomJoint ankle_l: socket_parent_frame=tibia_l_offset socket_child_frame=talus_l_offset
      Coordinate ankle_flexion_y_l: default_value=0 range=(-1.047198 1.047198) clamped=true
      Coordinate ankle_rotation_z_l: default_value=0 range=(-1.047198 1.047198) clamped=true
      Coordinate ankle_eversion_x_l: default_value=0 range=(-1.047198 1.047198) clamped=true
      PhysicalOffsetFrame tibia_l_offset: socket_parent=/bodyset/tibia_l translation=(0 -0.43 0)
      PhysicalOffsetFrame talus_l_offset: socket_parent=/bodyset/talus_l translation=(0 0 0)
      SpatialTransform: axes_held_at_zero=(translation1 translation2 translation3)
        TransformAxis rotation1: coordinates=ankle_flexion_y_l axis=(0 0 1) LinearFunction(coefficients=1 0)
        TransformAxis rotation2: coordinates=ankle_rotation_z_l axis=(0 1 0) LinearFunction(coefficients=1 0)
        TransformAxis rotation3: coordinates=ankle_eversion_x_l axis=(1 0 0) LinearFunction(coefficients=1 0)
    CustomJoint subtalar_l: socket_parent_frame=talus_l_offset socket_child_frame=calcn_l_offset
      Coordinate subtalar_angle_l: default_value=0 range=(0 0) clamped=false
      PhysicalOffsetFrame talus_l_offset: socket_parent=/bodyset/talus_l translation=(-0.04877 -0.04195 -0.00792)
      PhysicalOffsetFrame calcn_l_offset: socket_parent=/bodyset/calcn_l translation=(0 0 0)
      SpatialTransform: axes_held_at_zero=(rotation2 rotation3 translation1 translation2 translation3)
        TransformAxis rotation1: coordinates=subtalar_angle_l axis=(-0.7871796 -0.6047475 -0.1209495) Constant(value=0)
    CustomJoint mtp_l: socket_parent_frame=calcn_l_offset socket_child_frame=toes_l_offset
      Coordinate mpj_flexion_y_l: default_value=0 range=(-1.047198 1.047198) clamped=true
      PhysicalOffsetFrame calcn_l_offset: socket_parent=/bodyset/calcn_l translation=(0.1788 -0.002 -0.00108)
      PhysicalOffsetFrame toes_l_offset: socket_parent=/bodyset/toes_l translation=(0 0 0)
      SpatialTransform: axes_held_at_zero=(rotation2 rotation3 translation1 translation2 translation3)
        TransformAxis rotation1: coordinates=mpj_flexion_y_l axis=(0.5809544 0 0.8139361)
            LinearFunction(coefficients=1 0)
    CustomJoint back: socket_parent_frame=pelvis_offset socket_child_frame=torso_offset
      Coordinate lumbar_extension_y: default_value=0 range=(-1.570796 1.570796) clamped=true
      Coordinate lumbar_bending_x: default_value=0 range=(-1.570796 1.570796) clamped=true
      Coordinate lumbar_rotation_z: default_value=0 range=(-1.570796 1.570796) clamped=true
      PhysicalOffsetFrame pelvis_offset: socket_parent=/bodyset/pelvis translation=(-0.1007 0.0815 0)
      PhysicalOffsetFrame torso_offset: socket_parent=/bodyset/torso translation=(0 0 0)
      SpatialTransform: axes_held_at_zero=(translation1 translation2 translation3)
        TransformAxis rotation1: coordinates=lumbar_extension_y axis=(0 0 1) LinearFunction(coefficients=1 0)
        TransformAxis rotation2: coordinates=lumbar_bending_x axis=(1 0 0) LinearFunction(coefficients=1 0)
        TransformAxis rotation3: coordinates=lumbar_rotation_z axis=(0 1 0) LinearFunction(coefficients=1 0)
    CustomJoint acromial_r: socket_parent_frame=torso_offset socket_child_frame=humerus_r_offset
      Coordinate arm_flexion_y_r: default_value=0 range=(-1.570796 1.570796) clamped=true
      Coordinate arm_adduction_x_r: default_value=-0.1396263 range=(-2.094395 1.570796) clamped=true
      Coordinate arm_rotation_z_r: default_value=0 range=(-1.570796 1.570796) clamped=true
      PhysicalOffsetFrame torso_offset: socket_parent=/bodyset/torso translation=(0.003155 0.3715 0.17)
      PhysicalOffsetFrame humerus_r_offset: socket_parent=/bodyset/humerus_r translation=(0 0 0)
      SpatialTransform: axes_held_at_zero=(translation1 translation2 translation3)
        TransformAxis rotation1: coordinates=arm_flexion_y_r axis=(0 0 1) LinearFunction(coefficients=1 0)
        TransformAxis rotation2: coordinates=arm_adduction_x_r axis=(1 0 0) LinearFunction(coefficients=1 0)
        TransformAxis rotation3: coordinates=arm_rotation_z_r axis=(0 1 0) LinearFunction(coefficients=1 0)
    CustomJoint elbow_r: socket_parent_frame=humerus_r_offset socket_child_frame=ulna_r_offset
      Coordinate elbow_flexion_y_r: default_value=0 range=(0 2.618) clamped=true
      PhysicalOffsetFrame humerus_r_offset: socket_parent=/bodyset/humerus_r translation=(0.013144 -0.286273 -0.009595)
      PhysicalOffsetFrame ulna_r_offset: socket_parent=/bodyset/ulna_r translation=(0 0 0)
      SpatialTransform: axes_held_at_zero=(rotation2 rotation3 translation1 translation2 translation3)
        TransformAxis rotation1: coordinates=elbow_flexion_y_r axis=(0.226047 0.022269 0.9738618)
            LinearFunction(coefficients=1 0)
    CustomJoint radioulnar_r: socket_parent_frame=ulna_r_offset socket_child_frame=radius_r_offset
      Coordinate hand_pronation_x_r: default_value=1.518436 range=(0 2.094395) clamped=true
      PhysicalOffsetFrame ulna_r_offset: socket_parent=/bodyset/ulna_r translation=(-0.006727 -0.013007 0.026083)
      PhysicalOffsetFrame radius_r_offset: socket_parent=/bodyset/radius_r translation=(0 0 0)
      SpatialTransform: axes_held_at_zero=(rotation2 rotation3 translation1 translation2 translation3)
        TransformAxis rotation1: coordinates=hand_pronation_x_r axis=(0.05639803 0.9984065 0.001952)
            LinearFunction(coefficients=1 0)
    CustomJoint radius_hand_r: socket_parent_frame=radius_r_offset socket_child_frame=hand_r_offset
      Coordinate wrist_flexion_y_r: default_value=0 range=(-1.22173 1.22173) clamped=true
      Coordinate wrist_rotation_z_r: default_value=0 range=(-0.4363323 0.6108652) clamped=true
      PhysicalOffsetFrame radius_r_offset: socket_parent=/bodyset/radius_r translation=(-0.008797 -0.235841 0.01361)
      PhysicalOffsetFrame hand_r_offset: socket_parent=/bodyset/hand_r translation=(0 0 0)
      SpatialTransform: axes_held_at_zero=(rotation3 translation1 translation2 translation3)
        TransformAxis rotation1: coordinates=wrist_flexion_y_r axis=(0 0 1) LinearFunction(coefficients=1 0)
        TransformAxis rotation2: coordinates=wrist_rotation_z_r axis=(1 0 0) LinearFunction(coefficients=1 0)
    CustomJoint acromial_l: socket_parent_frame=torso_offset socket_child_frame=humerus_l_offset
      Coordinate arm_flexion_y_l: default_value=0 range=(-1.570796 1.570796) clamped=true
      Coordinate arm_adduction_x_l: default_value=-0.1396263 range=(-2.094395 1.570796) clamped=true
      Coordinate arm_rotation_z_l: default_value=0 range=(-1.570796 1.570796) clamped=true
      PhysicalOffsetFrame torso_offset: socket_parent=/bodyset/torso translation=(0.003155 0.3715 -0.17)
      PhysicalOffsetFrame humerus_l_offset: socket_parent=/bodyset/humerus_l translation=(0 0 0)
      SpatialTransform: axes_held_at_zero=(translation1 translation2 translation3)
        TransformAxis rotation1: coordinates=arm_flexion_y_l axis=(0 0 1) LinearFunction(coefficients=1 0)
        TransformAxis rotation2: coordinates=arm_adduction_x_l axis=(-1 0 0) LinearFunction(coefficients=1 0)
        TransformAxis rotation3: coordinates=arm_rotation_z_l axis=(0 -1 0) LinearFunction(coefficients=1 0)
    CustomJoint elbow_l: socket_parent_frame=humerus_l_offset socket_child_frame=ulna_l_offset
      Coordinate elbow_flexion_y_l: default_value=0 range=(0 2.618) clamped=true
      PhysicalOffsetFrame humerus_l_offset: socket_parent=/bodyset/humerus_l translation=(0.013144 -0.286273 0.009595)
      PhysicalOffsetFrame ulna_l_offset: socket_parent=/bodyset/ulna_l translation=(0 0 0)
      SpatialTransform: axes_held_at_zero=(rotation2 rotation3 translation1 translation2 translation3)
        TransformAxis rotation1: coordinates=elbow_flexion_y_l axis=(-0.226047 -0.022269 0.9738618)
            LinearFunction(coefficients=1 0)
    CustomJoint radioulnar_l: socket_parent_frame=ulna_l_offset socket_child_frame=radius_l_offset
      Coordinate hand_pronation_x_l: default_value=1.518436 range=(0 2.094395) clamped=true
      PhysicalOffsetFrame ulna_l_offset: socket_parent=/bodyset/ulna_l translation=(-0.006727 -0.013007 -0.026083)
      PhysicalOffsetFrame radius_l_offset: socket_parent=/bodyset/radius_l translation=(0 0 0)
      SpatialTransform: axes_held_at_zero=(rotation2 rotation3 translation1 translation2 translation3)
        TransformAxis rotation1: coordinates=hand_pronation_x_l axis=(-0.05639803 -0.9984065 0.001952)
            LinearFunction(coefficients=1 0)
    CustomJoint radius_hand_l: socket_parent_frame=radius_l_offset socket_child_frame=hand_l_offset
      Coordinate wrist_flexion_y_l: default_value=0 range=(-1.22173 1.22173) clamped=true
      Coordinate wrist_rotation_z_l: default_value=0 range=(-0.4363323 0.6108652) clamped=true
      PhysicalOffsetFrame radius_l_offset: socket_parent=/bodyset/radius_l translation=(-0.008797 -0.235841 -0.01361)
      PhysicalOffsetFrame hand_l_offset: socket_parent=/bodyset/hand_l translation=(0 0 0)
      SpatialTransform: axes_held_at_zero=(rotation3 translation1 translation2 translation3)
        TransformAxis rotation1: coordinates=wrist_flexion_y_l axis=(0 0 1) LinearFunction(coefficients=1 0)
        TransformAxis rotation2: coordinates=wrist_rotation_z_l axis=(-1 0 0) LinearFunction(coefficients=1 0)
  MarkerSet:
    Marker V_Top_Head: pelvis (-0.07 0.7390626 0)
    Marker sternum: torso (0.098 0.223 0)
    Marker C_7: torso (-0.075 0.415516 0) fixed=true
    Marker acrom_right: torso (0.00601133 0.4154717 0.1454825)
    Marker acrom_left: torso (0.00601133 0.415472 -0.145483)
    Marker head_front_right: torso (0.073 0.61 0.05)
    Marker head_front_left: torso (0.073 0.61 -0.05)
    Marker head_back_right: torso (-0.0725 0.58 0.05)
    Marker head_back_left: torso (-0.0725 0.58 -0.05)
    Marker ear_right: torso (0.02222856 0.556104 0.07559505)
    Marker ear_left: torso (0.0222286 0.556104 -0.075595)
    Marker SIAS_right: pelvis (0.01 0.03 0.128) fixed=true
    Marker SIAS_left: pelvis (0.01 0.03 -0.128) fixed=true
    Marker SIPS_right: pelvis (-0.1535515 0.05 0.0450304) fixed=true
    Marker SIPS_left: pelvis (-0.153551 0.05 -0.0450304) fixed=true
    Marker V_MidPnt_SIAS: pelvis (0.01 0.03 0) fixed=true
    Marker V_MidPnt_SIPS: pelvis (-0.153551 0.05 0) fixed=true
    Marker V_MidPnt_Pelvis: pelvis (-0.07 0.04 0) fixed=true
    Marker V_MidPnt_Hip: pelvis (-0.0707 -0.0661 0) fixed=true
    Marker V_Right_Hip: femur_r_offset (0 0 0) fixed=true
    Marker cluster_femur_right_1: femur_r (0.065 -0.17 0.06)
    Marker cluster_femur_right_2: femur_r (-0.02 -0.17 0.064)
    Marker cluster_femur_right_3: femur_r (0.065 -0.32 0.06)
    Marker cluster_femur_right_4: femur_r (-0.021 -0.32 0.06)
    Marker epi_lat_right: femur_r (0 -0.404 0.05) fixed=true
    Marker epi_med_right: femur_r (0 -0.404 -0.05) fixed=true
    Marker V_MidPnt_R_Knee: femur_r (0 -0.404 0) fixed=true
    Marker cluster_tibia_right_1: tibia_r (0.029 -0.16 0.05)
    Marker cluster_tibia_right_2: tibia_r (-0.029 -0.16 0.05)
    Marker cluster_tibia_right_3: tibia_r (0.021 -0.33 0.05)
    Marker cluster_tibia_right_4: tibia_r (-0.029 -0.33 0.05)
    Marker mal_lat_right: tibia_r (-0.005 -0.41 0.053) fixed=true
    Marker mal_med_right: tibia_r (0.006 -0.395 -0.038) fixed=true
    Marker V_MidPnt_R_Mal: tibia_r (0.0005 -0.3994 0.0075) fixed=true
    Marker calc_back_right: calcn_r (-0.02 0.03 0) fixed=true
    Marker calc_med_right: calcn_r (0.0175461 0.025 -0.0388165)
    Marker calc_lat_right: calcn_r (0.0221 0.025 0.0307541)
    Marker forfoot_lat_right: toes_r (-0.03263262 0.01606789 0.05447957) fixed=true
    Marker forfoot_med_right: toes_r (0.00277911 0.02041876 -0.04738316) fixed=true
    Marker toe_right: toes_r (0.0712 0.0115 -0.01708) fixed=true
    Marker V_Left_Hip: femur_l_offset (0 0 0) fixed=true
    Marker cluster_femur_left_1: femur_l (0.065 -0.17 -0.06)
    Marker cluster_femur_left_2: femur_l (-0.02 -0.17 -0.064)
    Marker cluster_femur_left_3: femur_l (0.065 -0.32 -0.06)
    Marker cluster_femur_left_4: femur_l (-0.02 -0.32 -0.06)
    Marker epi_lat_left: femur_l (0 -0.404 -0.05) fixed=true
    Marker epi_med_left: femur_l (0 -0.404 0.05) fixed=true
    Marker V_MidPnt_L_Knee: femur_l (0 -0.404 0) fixed=true
    Marker cluster_tibia_left_1: tibia_l (0.029 -0.16 -0.05)
    Marker cluster_tibia_left_2: tibia_l (-0.029 -0.16 -0.05)
    Marker cluster_tibia_left_3: tibia_l (0.029 -0.33 -0.05)
    Marker cluster_tibia_left_4: tibia_l (-0.029 -0.33 -0.05)
    Marker mal_lat_left: tibia_l (-0.005 -0.41 -0.053) fixed=true
    Marker mal_med_left: tibia_l (0.006 -0.395 0.038) fixed=true
    Marker V_MidPnt_L_Mal: tibia_l (0.0005 -0.3994 -0.0075) fixed=true
    Marker calc_back_left: calcn_l (-0.02 0.03 0) fixed=true
    Marker calc_med_left: calcn_l (0.01754608 0.025 0.0388165)
    Marker calc_lat_left: calcn_l (0.0221 0.025 -0.03075407)
    Marker forefoot_lat_left: toes_l (-0.032633 0.0160679 -0.0544796) fixed=true
    Marker forefoot_med_left: toes_l (0.002779 0.0204188 0.0473832) fixed=true
    Marker toe_left: toes_l (0.0712 0.0115 0.01708) fixed=true
    Marker clav: torso (0.03314573 0.3830042 0)
    Marker elbow_med_left: humerus_l (0.001870804 -0.2824869 0.04609738) fixed=true
    Marker elbow_lat_left: humerus_l (0.01569434 -0.2877249 -0.03626726) fixed=true
    Marker elbow_top_left: humerus_l (-0.03043085 -0.2885383 0.007259822)
    Marker elbow_med_right: humerus_r (0.0018708 -0.282487 -0.0460974) fixed=true
    Marker elbow_lat_right: humerus_r (0.0156943 -0.287725 0.0362673) fixed=true
    Marker elbow_top_right: humerus_r (-0.0304308 -0.288538 -0.00725982)
    Marker cluster_upperarm_left_1: humerus_l (-0.02163863 -0.1138126 -0.02623364)
    Marker cluster_upperarm_left_2: humerus_l (-0.0183912 -0.1946981 -0.02108236)
    Marker cluster_upperarm_left_3: humerus_l (0.03031351 -0.152525 -0.01840731)
    Marker cluster_upperarm_right_1: humerus_r (-0.0216386 -0.113813 0.0262336)
    Marker cluster_upperarm_right_2: humerus_r (-0.0183912 -0.194698 0.0210824)
    Marker cluster_upperarm_right_3: humerus_r (0.0303135 -0.152525 0.0184073)
    Marker cluster_lowerarm_right_1: radius_r (-0.02205119 -0.0727734 -0.0349809)
    Marker cluster_lowerarm_right_2: radius_r (-0.0208903 -0.1763615 -0.0151356)
    Marker cluster_lowerarm_right_3: radius_r (-0.02224794 -0.1008127 0.02481757)
    Marker cluster_lowerarm_left_1: radius_l (-0.0220512 -0.0727734 0.0349809)
    Marker cluster_lowerarm_left_2: radius_l (-0.0208903 -0.176361 0.0151356)
    Marker cluster_lowerarm_left_3: radius_l (-0.0222479 -0.100813 -0.0248176)
    Marker hand_top_right: hand_r (-0.01851005 -0.06881337 -0.0009603867) fixed=true
    Marker hand_top_left: hand_l (-0.01851 -0.0688134 0.000960387) fixed=true
    Marker hand_med_right: radius_r (-0.001947634 -0.2297292 0.04663331) fixed=true
    Marker hand_lat_right: ulna_r (-0.04135641 -0.2355593 0.02106336) fixed=true
    Marker hand_med_left: radius_l (-0.00194763 -0.229729 -0.0466333) fixed=true
    Marker hand_lat_left: ulna_l (-0.0413564 -0.235559 -0.0210634) fixed=true
    Marker B_10: torso (-0.08906658 0.1690436 0)
    Marker shoulder_left: humerus_l (0.006990025 -0.02801351 -0.02744981)
    Marker shoulder_right: humerus_r (0.00699003 -0.0280135 0.0274498)
