# OpenSim document version 40000
InverseKinematicsTool:
  time_range: 0 1.195402
  output_motion_file: ik_res
  marker_file: transformed_dynamic2.trc
  IKTaskSet:
    IKMarkerTask RASIS: apply=true weight=5
    IKMarkerTask LASIS: apply=true weight=5
    IKMarkerTask RPSIS: apply=true weight=2
    IKMarkerTask LPSIS: apply=true weight=2
    IKMarkerTask RT1: apply=true weight=1
    IKMarkerTask RT2: apply=true weight=1
    IKMarkerTask RT3: apply=true weight=1
    IKMarkerTask RT4: apply=true weight=1
    IKMarkerTask RS1: apply=true weight=1
    IKMarkerTask RS2: apply=true weight=1
    IKMarkerTask RS3: apply=true weight=1
    IKMarkerTask RS4: apply=true weight=1
    IKMarkerTask RDC: apply=true weight=2
    IKMarkerTask RLC: apply=true weight=0.2
    IKMarkerTask RMC: apply=true weight=0.2
    IKMarkerTask RNAV: apply=true weight=1
    IKMarkerTask RMB1: apply=true weight=0.1
    IKMarkerTask RMB5: apply=true weight=0.5
    IKMarkerTask RMH1: apply=true weight=0.5
    IKMarkerTask RMH5: apply=true weight=0.5
    IKMarkerTask RD1: apply=true weight=1
