# OpenSim document version 40000
ScaleTool Maharaj2021_BothLegs-scaled:
  mass: 49.30519 [kg]
  height: -1
  age: -1
  GenericModelMaker:
    model_file: generic_model.osim
  ModelScaler:
    apply: true
    scaling_order: measurements
    marker_file: transformed_static2.trc
    time_range: 0 1.0977
    preserve_mass_distribution: true
    MeasurementSet:
      Measurement pelvis_w: apply=true
        MarkerPair: markers=(LASIS RASIS)
        BodyScale pelvis: axes=Z
      Measurement pelvis_d: apply=true
        MarkerPair: markers=(RASIS RPSIS)
        MarkerPair: markers=(LASIS LPSIS)
        BodyScale pelvis: axes=X
      Measurement pelvis_h: apply=true
        MarkerPair: markers=(RLKN RASIS)
        BodyScale pelvis: axes=Y
      Measurement femur_r: apply=true
        MarkerPair: markers=(RASIS RLKN)
        BodyScale femur_r: axes=(X Y Z)
      Measurement tibia_r: apply=true
        MarkerPair: markers=(RLKN RLM)
        BodyScale tibia_r: axes=(X Y Z)
      Measurement talus_r_w_d: apply=true
        MarkerPair: markers=(RMC RLC)
        BodyScale talus_r: axes=(X Z)
      Measurement foot_r_h: apply=true
        MarkerPair: markers=(RMM RD1)
        BodyScale talus_r: axes=Y
        BodyScale calcn_r: axes=Y
        BodyScale midfoot_r: axes=Y
        BodyScale forefoot_r: axes=Y
      Measurement rearfoot_r_w: apply=true
        MarkerPair: markers=(RMC RLC)
        BodyScale calcn_r: axes=Z
      Measurement rearfoot_r_l: apply=true
        MarkerPair: markers=(RDC RNAV)
        BodyScale calcn_r: axes=X
      Measurement midfoot_r_l_w: apply=true
        MarkerPair: markers=(RNAV RMB5)
        BodyScale midfoot_r: axes=(X Z)
      Measurement forefoot_r_l: apply=true
        MarkerPair: markers=(RMB2 RMH2)
        MarkerPair: markers=(RMB5 RMH5)
        BodyScale forefoot_r: axes=X
      Measurement forefoot_r_w: apply=true
        MarkerPair: markers=(RNAV RMB5)
        BodyScale forefoot_r: axes=Z
      Measurement digitus_r_d_h: apply=true
        MarkerPair: markers=(RMB1 RD1)
        BodyScale digits_r: axes=(X Y)
      Measurement digitus_r_w: apply=true
        MarkerPair: markers=(RMH1 RMH5)
        MarkerPair: markers=(RNAV RMB5)
        BodyScale digits_r: axes=Z
      Measurement Unnamed: apply=false
  MarkerPlacer:
    apply: true
    marker_file: transformed_static2.trc
    time_range: 0 1.0977
    max_marker_movement: -1
    IKTaskSet:
      IKMarkerTask RASIS: apply=true weight=10
      IKMarkerTask LASIS: apply=true weight=10
      IKMarkerTask RPSIS: apply=true weight=5
      IKMarkerTask LPSIS: apply=true weight=5
      IKMarkerTask RT1: apply=false weight=1
      IKMarkerTask RT2: apply=false weight=1
      IKMarkerTask RT3: apply=false weight=1
      IKMarkerTask RT4: apply=false weight=1
      IKMarkerTask RMKN: apply=true weight=0.3
      IKMarkerTask RLKN: apply=true weight=0.3
      IKMarkerTask RS1: apply=false weight=1
      IKMarkerTask RS2: apply=false weight=1
      IKMarkerTask RS3: apply=false weight=1
      IKMarkerTask RS4: apply=false weight=1
      IKMarkerTask RMM: apply=true weight=1
      IKMarkerTask RLM: apply=true weight=1
      IKMarkerTask RPC: apply=false weight=1
      IKMarkerTask RDC: apply=true weight=2
      IKMarkerTask RLC: apply=true weight=2
      IKMarkerTask RMC: apply=true weight=0.2
      IKMarkerTask RNAV: apply=true weight=0.5
      IKMarkerTask RMB1: apply=true weight=0.1
      IKMarkerTask RMB2: apply=false weight=1
      IKMarkerTask RMB5: apply=true weight=0.5
      IKMarkerTask RMH1: apply=true weight=0.5
      IKMarkerTask RMH2: apply=false weight=1
      IKMarkerTask RMH5: apply=true weight=0.5
      IKMarkerTask RD1: apply=true weight=0.1
      IKMarkerTask RD2: apply=false weight=1
      IKMarkerTask RD5: apply=false weight=1
