# OpenSim document version 40000
MarkerSet:
  Marker RASIS: pelvis (0.00893789 0.00660939 0.118144) fixed=true
  Marker LASIS: pelvis (-0.00192533 0.00779495 -0.120761)
  Marker RPSIS: pelvis (-0.14694 0.028602 0.05635)
  Marker LPSIS: pelvis (-0.14912 0.0288204 -0.0527463)
  Marker RT1: femur_r (0.0284664 -0.155009 0.0548465)
  Marker RT2: femur_r (-0.0112819 -0.158517 0.0541544)
  Marker RT3: femur_r (0.0326536 -0.185622 0.0573904)
  Marker RT4: femur_r (-0.00559162 -0.188035 0.0569003)
  Marker RMKN: femur_r (0.00339884 -0.399545 -0.0450883)
  Marker RLKN: femur_r (-0.00435219 -0.399882 0.0391678)
  Marker RS1: tibia_r (0.0302391 -0.209143 0.0595105)
  Marker RS2: tibia_r (-0.0068808 -0.207665 0.0592221)
  Marker RS3: tibia_r (0.032137 -0.244 0.0634113)
  Marker RS4: tibia_r (-0.00693125 -0.242761 0.0620677)
  Marker RMM: tibia_r (-0.00682946 -0.400761 -0.0325547)
  Marker RLM: tibia_r (-0.00123123 -0.418298 0.04628772)
  Marker RPC: calcn_r (-0.0456545 0.0218882 -0.000766789)
  Marker RDC: calcn_r (-0.0483713 -0.00348894 0.0045698)
  Marker RLC: calcn_r (-0.00230526 0.01 0.035)
  Marker RMC: calcn_r (0.0204115 0.03 -0.03)
  Marker RNAV: midfoot_r (-2.19104e-5 0.0117597 -0.0345471)
  Marker RMB1: midfoot_r (0.0330979 0.0175777 -0.0293435)
  Marker RMB2: midfoot_r (0.0336502 0.0178192 0.00437069)
  Marker RMB5: midfoot_r (0.00435682 -0.00685816 0.0424309)
  Marker RMH1: forefoot_r (0.0666601 -0.00175447 -0.0347739)
  Marker RMH2: forefoot_r (0.0653854 -0.00052065 0.000120762)
  Marker RMH5: forefoot_r (0.0290165 -0.0124805 0.0508911)
  Marker RD1: digits_r (0.0533188 0.02 -0.00502317)
  Marker RD2: digits_r (0.0327369 0.02 0.0215117)
  Marker RD5: digits_r (-0.00123385 0.02 0.0496394)
