# OpenSim document version 40000
AnalyzeTool Trunk_Lean_15_hinten1:
  model_file: generic_model.osim
  replace_force_set: false
  force_set_files: gait2392_RRA_Actuators.xml
  results_directory: HSO_TRUNK_EXTENDED/Trunk_Lean_15_hinten/ID01
  output_precision: 8
  initial_time: 0
  final_time: 0.2
  solve_for_equilibrium_for_auxiliary_states: false
  maximum_number_of_integrator_steps: 20000
  maximum_integrator_step_size: 1
  minimum_integrator_step_size: 1e-8
  integrator_error_tolerance: 1e-5
  external_loads_file: HSO_TRUNK_EXTENDED/Trunk_Lean_15_hinten/ID01/Setup_force_Trunk_Lean_15_hinten 1.xml
  coordinates_file: HSO_TRUNK_EXTENDED/Trunk_Lean_15_hinten/ID01/Trunk_Lean_15_hinten1_Kinematics_q.sto
  lowpass_cutoff_frequency_for_coordinates: 6
  AnalysisSet Analyses:
    StaticOptimization: start_time=0 end_time=0.2 step_interval=1 in_degrees=true use_model_force_set=true
        activation_exponent=2 use_muscle_physiology=true optimizer_convergence_criterion=0.0001
        optimizer_max_iterations=100
    ProbeReporter: start_time=0 end_time=0.2 step_interval=1 in_degrees=true
