# OpenSim document version 40000
MarkerSet:
  Marker sternum: torso (0.09999545 0.2275407 0) fixed=true
  Marker C_7: torso (-0.07714549 0.4480897 0) fixed=true
  Marker head_front_right: torso (0.07448641 0.6224207 0.05101809) fixed=true
  Marker head_front_left: torso (0.07448641 0.6224207 -0.05101809) fixed=true
  Marker head_back_right: torso (-0.07397623 0.5918098 0.05101809) fixed=true
  Marker head_back_left: torso (-0.07397623 0.5918098 -0.05101809) fixed=true
  Marker ear_right: torso (0.007652273 0.5181196 0.07291551)
  Marker ear_left: torso (-0.00843876 0.5308842 -0.07534274)
  Marker SIAS_right: pelvis (0.01133844 0.0110869 0.1343585) fixed=true
  Marker SIAS_left: pelvis (0.01133844 0.0110869 -0.1343585) fixed=true
  Marker SIPS_right: pelvis (-0.1741029 0.04656497 0.04879205) fixed=true
  Marker SIPS_left: pelvis (-0.1741029 0.04656497 -0.04879205) fixed=true
  Marker V_MidPnt_SIAS: pelvis (0.01133844 0.0110869 0) fixed=true
  Marker V_MidPnt_SIPS: pelvis (-0.1741029 0.04656497 0) fixed=true
  Marker V_MidPnt_Pelvis: pelvis (-0.07936907 0.02882594 0) fixed=true
  Marker V_MidPnt_Hip: pelvis (-0.08016276 -0.0732844 0) fixed=true
  Marker V_Right_Hip: femur_r_offset (0 0 0) fixed=true
  Marker cluster_femur_right_1: femur_r (0.04419813 -0.09445735 0.1047023)
  Marker cluster_femur_right_2: femur_r (-0.0224637 -0.0958229 0.1071708)
  Marker cluster_femur_right_3: femur_r (0.05542095 -0.1854765 0.08021234)
  Marker cluster_femur_right_4: femur_r (-0.0174732 -0.1784131 0.1087298)
  Marker epi_lat_right: femur_r (0 -0.4176631 0.05169098) fixed=true
  Marker epi_med_right: femur_r (0 -0.4176631 -0.05169098) fixed=true
  Marker V_MidPnt_R_Knee: femur_r (0 -0.4176631 0) fixed=true
  Marker cluster_tibia_right_1: tibia_r (0.02650179 -0.1994388 0.01198679)
  Marker cluster_tibia_right_2: tibia_r (-0.02671156 -0.2058028 0.07407256)
  Marker cluster_tibia_right_3: tibia_r (0.02720825 -0.2910788 0.01151498)
  Marker cluster_tibia_right_4: tibia_r (-0.01306788 -0.3043032 0.05836314)
  Marker mal_lat_right: tibia_r (-0.004629964 -0.379657 0.04907761) fixed=true
  Marker mal_med_right: tibia_r (0.005555956 -0.364743 -0.03355618) fixed=true
  Marker V_MidPnt_R_Mal: tibia_r (0.0004629964 -0.3698415 0.003289558) fixed=true
  Marker calc_back_right: calcn_r (-0.01864189 0.02202891 -0.003062458) fixed=true
  Marker calc_med_right: calcn_r (0.03190339 -0.0105014 -0.04677776)
  Marker calc_lat_right: calcn_r (0.01799087 -0.01067009 0.04434107)
  Marker forfoot_lat_right: toes_r (-0.03041668 0.01497679 0.0507801) fixed=true
  Marker forfoot_med_right: toes_r (0.002590392 0.02080856 -0.04416558) fixed=true
  Marker toe_right: toes_r (0.06636512 0.01071909 -0.01592017) fixed=true
  Marker V_Left_Hip: femur_l_offset (0 0 0) fixed=true
  Marker cluster_femur_left_1: femur_l (0.04234929 -0.1018813 -0.1042768)
  Marker cluster_femur_left_2: femur_l (-0.03384798 -0.1084387 -0.1215659)
  Marker cluster_femur_left_3: femur_l (0.04307213 -0.1902155 -0.09579786)
  Marker cluster_femur_left_4: femur_l (-0.02891386 -0.1948586 -0.1047601)
  Marker epi_lat_left: femur_l (0 -0.4160821 -0.05149531) fixed=true
  Marker epi_med_left: femur_l (0 -0.4160821 0.05149531) fixed=true
  Marker V_MidPnt_L_Knee: femur_l (0 -0.4160821 0) fixed=true
  Marker cluster_tibia_left_1: tibia_l (0.02418617 -0.2001922 -0.01207722)
  Marker cluster_tibia_left_2: tibia_l (-0.03701319 -0.2206427 -0.06758875)
  Marker cluster_tibia_left_3: tibia_l (0.02855227 -0.3006275 -0.007712212)
  Marker cluster_tibia_left_4: tibia_l (-0.02338527 -0.3207533 -0.05016764)
  Marker mal_lat_left: tibia_l (-0.004699486 -0.3853579 -0.04981456) fixed=true
  Marker mal_med_left: tibia_l (0.005639384 -0.3761618 0.0315877) fixed=true
  Marker V_MidPnt_L_Mal: tibia_l (0.0004699486 -0.375395 -0.001935213) fixed=true
  Marker calc_back_left: calcn_l (-0.01838373 0.02218394 0.002728147) fixed=true
  Marker calc_med_left: calcn_l (0.02765356 -0.004478231 0.0523697)
  Marker calc_lat_left: calcn_l (0.02230748 -0.008350351 -0.04128222)
  Marker forefoot_lat_left: toes_l (-0.02999581 0.0147694 -0.05007691) fixed=true
  Marker forefoot_med_left: toes_l (0.002554419 0.01876868 0.043554) fixed=true
  Marker toe_left: toes_l (0.06544608 0.01057064 0.0156997) fixed=true
  Marker B_10: torso (-0.05938495 0.08267383 -0.001394324)
  Marker clav: torso (0.04188335 0.3753351 -0.0008800313) fixed=true
