# OpenSim document version 40000
ScaleTool ID01:
  mass: 78 [kg]
  height: 1780
  age: -1
  GenericModelMaker:
    marker_set_file: Markerset_HSO.xml
  ModelScaler:
    apply: true
    scaling_order: measurements
    marker_file: Static_trial_I 2.trc
    time_range: 0 0.995
    preserve_mass_distribution: true
    output_model_file: C:/Users/adpatrick/OneDrive - nih.no/Desktop/HSO/../../../Downloads/HSO_TRUNK/Trunk_Lean_15_hinten/ID01/scaled_matlab.osim
    output_scale_file: C:/Users/adpatrick/OneDrive - nih.no/Desktop/HSO/../../../Downloads/HSO_TRUNK/Trunk_Lean_15_hinten/ID01/scaleSet_applied.xml
    MeasurementSet:
      Measurement pelvis_x: apply=true
        MarkerPair: markers=(V_MidPnt_SIAS V_MidPnt_SIPS)
        BodyScale pelvis: axes=X
      Measurement thight_right: apply=true
        MarkerPair: markers=(V_Right_Hip V_MidPnt_R_Knee)
        MarkerPair: markers=(epi_lat_right epi_med_right)
        BodyScale femur_r: axes=(X Y Z)
      Measurement thight_left: apply=true
        MarkerPair: markers=(V_Left_Hip V_MidPnt_L_Knee)
        MarkerPair: markers=(epi_lat_left epi_med_left)
        BodyScale femur_l: axes=(X Y Z)
      Measurement shank_right: apply=true
        MarkerPair: markers=(V_MidPnt_R_Knee V_MidPnt_R_Mal)
        MarkerPair: markers=(mal_lat_right mal_med_right)
        BodyScale tibia_r: axes=(X Y Z)
      Measurement shank_left: apply=true
        MarkerPair: markers=(V_MidPnt_L_Knee V_MidPnt_L_Mal)
        MarkerPair: markers=(mal_lat_left mal_med_left)
        BodyScale tibia_l: axes=(X Y Z)
      Measurement foot_right: apply=true
        MarkerPair: markers=(calc_back_right toe_right)
        MarkerPair: markers=(calc_back_right forfoot_lat_right)
        BodyScale talus_r: axes=(X Y Z)
        BodyScale calcn_r: axes=(X Y Z)
        BodyScale toes_r: axes=(X Y Z)
      Measurement foot_left: apply=true
        MarkerPair: markers=(calc_back_left toe_left)
        MarkerPair: markers=(calc_back_left forefoot_lat_left)
        BodyScale talus_l: axes=(X Y Z)
        BodyScale calcn_l: axes=(X Y Z)
        BodyScale toes_l: axes=(X Y Z)
      Measurement torso: apply=false
        MarkerPair: markers=(V_MidPnt_Pelvis C_7)
        MarkerPair: markers=(C_7 clav)
        MarkerPair: markers=(V_MidPnt_Pelvis clav)
        MarkerPair: markers=(V_MidPnt_Pelvis ear_right)
        MarkerPair: markers=(V_MidPnt_Pelvis ear_left)
        MarkerPair: markers=(B_10 C_7)
        MarkerPair: markers=(V_MidPnt_Hip C_7)
      Measurement pelvis_y: apply=true
        MarkerPair: markers=(V_MidPnt_SIAS V_MidPnt_SIPS)
        MarkerPair: markers=(V_Right_Hip V_Left_Hip)
        BodyScale pelvis: axes=Y
      Measurement pelvis_z: apply=true
        MarkerPair: markers=(V_Right_Hip V_Left_Hip)
        BodyScale pelvis: axes=Z
      Measurement femur_r_y: apply=false
        MarkerPair: markers=(V_Right_Hip V_MidPnt_R_Knee)
      Measurement tibia_r_y: apply=false
        MarkerPair: markers=(V_MidPnt_R_Knee V_MidPnt_R_Mal)
      Measurement femur_l_y: apply=false
        MarkerPair: markers=(V_Left_Hip V_MidPnt_L_Knee)
      Measurement tibia_l_y: apply=false
        MarkerPair: markers=(V_MidPnt_L_Knee V_MidPnt_L_Mal)
      Measurement torso_x: apply=true
        MarkerPair: markers=(B_10 sternum)
        MarkerPair: markers=(V_MidPnt_SIAS V_MidPnt_SIPS)
        MarkerPair: markers=(C_7 clav)
        MarkerPair: markers=(head_front_right head_back_right)
        MarkerPair: markers=(head_front_left head_back_left)
        BodyScale torso: axes=X
      Measurement humerus_r: apply=false
        MarkerPair: markers=(acrom_right elbow_med_right)
      Measurement humerus_l: apply=false
        MarkerPair: markers=(acrom_left elbow_med_left)
      Measurement ulna_radius_r: apply=false
        MarkerPair: markers=(elbow_lat_right hand_top_right)
      Measurement ulna_radius_l: apply=false
        MarkerPair: markers=(elbow_lat_left hand_top_left)
      Measurement torso_y: apply=true
        MarkerPair: markers=(V_MidPnt_Pelvis C_7)
        MarkerPair: markers=(V_MidPnt_Hip acrom_right)
        MarkerPair: markers=(V_MidPnt_Hip acrom_left)
        MarkerPair: markers=(V_MidPnt_Pelvis ear_left)
        MarkerPair: markers=(V_MidPnt_Pelvis ear_right)
        BodyScale torso: axes=Y
      Measurement torso_z: apply=true
        MarkerPair: markers=(SIAS_right SIAS_left)
        MarkerPair: markers=(acrom_right acrom_left)
        MarkerPair: markers=(ear_left ear_right)
        BodyScale torso: axes=Z
  MarkerPlacer:
    apply: true
    marker_file: Static_trial_I 2.trc
    time_range: 0 0.995
    output_motion_file: static_output.mot
    output_model_file: scaled_weighted_matlab.osim
    output_marker_file: MarkerSet_after_scale.xml
    max_marker_movement: -1
    IKTaskSet:
      IKMarkerTask acrom_right: apply=true weight=100
      IKMarkerTask acrom_left: apply=true weight=100
      IKMarkerTask sternum: apply=true weight=100
      IKMarkerTask C_7: apply=false weight=100
      IKMarkerTask head_front_right: apply=false weight=1
      IKMarkerTask head_front_left: apply=false weight=1
      IKMarkerTask head_back_right: apply=false weight=1
      IKMarkerTask head_back_left: apply=false weight=1
      IKMarkerTask ear_right: apply=false weight=1
      IKMarkerTask ear_left: apply=false weight=1
      IKMarkerTask SIAS_right: apply=true weight=150
      IKMarkerTask SIAS_left: apply=true weight=150
      IKMarkerTask SIPS_right: apply=true weight=150
      IKMarkerTask SIPS_left: apply=true weight=150
      IKMarkerTask V_MidPnt_SIAS: apply=true weight=200
      IKMarkerTask V_MidPnt_SIPS: apply=true weight=200
      IKMarkerTask V_MidPnt_Pelvis: apply=true weight=200
      IKMarkerTask V_MidPnt_Hip: apply=true weight=200
      IKMarkerTask V_Right_Hip: apply=true weight=200
      IKMarkerTask cluster_femur_right_1: apply=false weight=1
      IKMarkerTask cluster_femur_right_2: apply=false weight=1
      IKMarkerTask cluster_femur_right_3: apply=false weight=1
      IKMarkerTask cluster_femur_right_4: apply=false weight=1
      IKMarkerTask epi_lat_right: apply=true weight=100
      IKMarkerTask epi_med_right: apply=true weight=100
      IKMarkerTask V_MidPnt_R_Knee: apply=true weight=200
      IKMarkerTask cluster_tibia_right_1: apply=false weight=1
      IKMarkerTask cluster_tibia_right_2: apply=false weight=1
      IKMarkerTask cluster_tibia_right_3: apply=false weight=1
      IKMarkerTask cluster_tibia_right_4: apply=false weight=1
      IKMarkerTask mal_lat_right: apply=true weight=100
      IKMarkerTask mal_med_right: apply=true weight=100
      IKMarkerTask V_MidPnt_R_Mal: apply=true weight=200
      IKMarkerTask calc_back_right: apply=true weight=35
      IKMarkerTask calc_med_right: apply=false weight=1
      IKMarkerTask calc_lat_right: apply=false weight=1
      IKMarkerTask forfoot_lat_right: apply=true weight=35
      IKMarkerTask forfoot_med_right: apply=false weight=1
      IKMarkerTask toe_right: apply=true weight=35
      IKMarkerTask V_Left_Hip: apply=true weight=200
      IKMarkerTask cluster_femur_left_1: apply=false weight=1
      IKMarkerTask cluster_femur_left_2: apply=false weight=1
      IKMarkerTask cluster_femur_left_3: apply=false weight=1
      IKMarkerTask cluster_femur_left_4: apply=false weight=1
      IKMarkerTask epi_lat_left: apply=true weight=100
      IKMarkerTask epi_med_left: apply=true weight=100
      IKMarkerTask V_MidPnt_L_Knee: apply=true weight=200
      IKMarkerTask cluster_tibia_left_1: apply=false weight=1
      IKMarkerTask cluster_tibia_left_2: apply=false weight=1
      IKMarkerTask cluster_tibia_left_3: apply=false weight=1
      IKMarkerTask cluster_tibia_left_4: apply=false weight=1
      IKMarkerTask mal_lat_left: apply=true weight=100
      IKMarkerTask mal_med_left: apply=true weight=100
      IKMarkerTask V_MidPnt_L_Mal: apply=true weight=200
      IKMarkerTask calc_back_left: apply=true weight=35
      IKMarkerTask calc_med_left: apply=false weight=1
      IKMarkerTask calc_lat_left: apply=false weight=1
      IKMarkerTask forefoot_lat_left: apply=true weight=35
      IKMarkerTask forefoot_med_left: apply=false weight=1
      IKMarkerTask toe_left: apply=true weight=35
      IKMarkerTask B_10: apply=true weight=50
      IKMarkerTask clav: apply=false weight=50
