# OpenSim document version 40000
Model P_101:
  gravity: 0 -9.80665 0
  length_units: meters
  force_units: N
  credits:
    Delp S.L., Loan J.P., Hoy M.G., Zajac F.E., Topp E.L., Rosen J.M., Thelen D.G., Anderson F.C., Seth A. Notes: 3D, 23 DOF gait model created by D.G. Thelen, Univ. of Wisconsin-Madison, and Ajay Seth, Frank C. Anderson, and Scott L. Delp, Stanford University. Lower extremity joint defintions based on Delp et al. (1990). Low back joint and anthropometry based on Anderson and Pandy (1999, 2001). Planar knee model of Yamaguchi and Zajac (1989). Seth replaced tibia translation constraints with a CustomJoint for the knee and removed the patella to eliminate all kinematic constraints; insertions of the quadrucepts are handled with moving points in the tibia frame as defined by Delp 1990. License: Creative Commons (CCBY 3.0). You are free to distribute, remix, tweak, and build upon this work, even commercially, as long as you credit us for the original creation. http://creativecommons.org/licenses/by/3.0/ More Information: http://simtk-confluence.stanford.edu:8080/display/OpenSim/Gait+2392+and+2354+Models ============ = May 2015 = ============ Luca Modenese modified the knee model in order to include two contact points in the frontal plane, moving with the tibia. The model can estimate: 1) knee moments acting in the sagittal plane (knee abduction moment in the medial compartment and adduction moment in the lateral compartment) 2) muscle moment arms with respect to the previously mentioned degrees of freedom The model CANNOT directly estimate: 1) joint reaction forces at the two knee compartments. The relationship published by Winby et al. J Biomech (2009) can be used, based on the joint moments and moment arms estimated by the model. NOTE: Accompaning documentation is provided with the model. For any inquire please contact: Luca Modenese at l.modenese@sheffield.ac.uk
  publications:
    Delp, S.L., Loan, J.P., Hoy, M.G., Zajac, F.E., Topp E.L., Rosen, J.M.: An interactive graphics-based model of the lower extremity to study orthopaedic surgical procedures, IEEE Transactions on Biomedical Engineering, vol. 37, pp. 757-767, 1990. Yamaguchi G.T., Zajac F.E.: A planar model of the knee joint to characterize the knee extensor mechanism." J . Biomecl7. vol. 21. pp. 1-10. 1989. Anderson F.C., Pandy M.G.: A dynamic optimization solution for vertical jumping in three dimensions. Computer Methods in Biomechanics and Biomedical Engineering 2:201-231, 1999. Anderson F.C., Pandy M.G.: Dynamic optimization of human walking. Journal of Biomechanical Engineering 123:381-390, 2001.
  Ground
  BodySet:
    Body pelvis: mass=8.806663 [kg] mass_center=(-0.09185306 0 0) inertia=(0.08384829 0.08384829 0.05657253 0 0 0)
        meshes=(sacrum.vtp r_pelvis.vtp l_pelvis.vtp)
    Body femur_r: mass=6.955447 mass_center=(0 -0.1677689 0) inertia=(0.09751746 0.02556283 0.1028339 0 0 0)
        meshes=femur_r.vtp
    Body sagittal_knee_body_r: mass=7.47785e-5 mass_center=(0 0 0) inertia=(7.282858e-5 7.282858e-5 7.282858e-5 0 0 0)
        meshes=
    Body aux_intercond_body_r: mass=7.47785e-5 mass_center=(0 0 0) inertia=(7.282858e-5 7.282858e-5 7.282858e-5 0 0 0)
        meshes=
    Body tibia_r: mass=2.772413 mass_center=(0 -0.1762521 0) inertia=(0.03358824 0.00339881 0.03405474 0 0 0)
        meshes=(tibia_r.vtp fibula_r.vtp)
    Body talus_r: mass=0.0747785 mass_center=(0 0 0) inertia=(0.0008837786 0.0008837786 0.0008837786 0 0 0)
        meshes=r_talus.vtp
    Body calcn_r: mass=0.9347312 mass_center=(0.1115249 0.03659415 0)
        inertia=(0.00108011 0.003516313 0.003516313 0 0 0) meshes=foot.vtp
    Body toes_r: mass=0.1619702 mass_center=(0.03858762 0.007318831 -0.01480168)
        inertia=(7.715072e-5 0.0001780875 0.0001780875 0 0 0) meshes=bofoot.vtp
    Body femur_l: mass=6.955447 mass_center=(0 -0.1638194 0) inertia=(0.09298014 0.02437343 0.09804926 0 0 0)
        meshes=femur_l.vtp
    Body sagittal_knee_body_l: mass=7.47785e-5 mass_center=(0 0 0) inertia=(6.943998e-5 6.943998e-5 6.943998e-5 0 0 0)
    Body aux_intercond_body_l: mass=7.47785e-5 mass_center=(0 0 0) inertia=(6.943998e-5 6.943998e-5 6.943998e-5 0 0 0)
    Body tibia_l: mass=2.772413 mass_center=(0 -0.1835691 0) inertia=(0.03643491 0.003686866 0.03694095 0 0 0)
        meshes=(tibia_l.vtp fibula_l.vtp)
    Body talus_l: mass=0.0747785 mass_center=(0 0 0) inertia=(0.0008799204 0.0008799204 0.0008799204 0 0 0)
        meshes=l_talus.vtp
    Body calcn_l: mass=0.9347312 mass_center=(0.1036027 0.03570538 0)
        inertia=(0.001119288 0.003128082 0.003128082 0 0 0) meshes=l_foot.vtp
    Body toes_l: mass=0.1619702 mass_center=(0.03584655 0.007141076 0.01572036)
        inertia=(7.994912e-5 0.0001603701 0.0001603701 0 0 0) meshes=l_bofoot.vtp
    Body torso: mass=25.60161 mass_center=(-0.03897584 0.2929574 0) inertia=(1.149709 0.9246689 1.149709 0 0 0)
        meshes=(hat_spine.vtp hat_jaw.vtp hat_skull.vtp hat_ribs_scap.vtp)
    Body humerus_r: mass=1.519873 mass_center=(0 -0.144555 0) inertia=(0.006897994 0.002379594 0.007742776 0 0 0)
        meshes=humerus_rv.vtp
    Body ulna_r: mass=0.4542794 mass_center=(0 -0.1088394 0) inertia=(0.001806259 0.000376863 0.001959322 0 0 0)
        meshes=ulna_rv.vtp
    Body radius_r: mass=0.4542794 mass_center=(0 -0.1088394 0) inertia=(0.001806259 0.000376863 0.001959322 0 0 0)
        meshes=radius_rv.vtp
    Body hand_r: mass=0.3421116 mass_center=(0 -0.06149281 0) inertia=(0.0005439511 0.0003335664 0.0008171463 0 0 0)
        meshes=(pisiform_rvs.vtp lunate_rvs.vtp scaphoid_rvs.vtp triquetrum_rvs.vtp hamate_rvs.vtp capitate_rvs.vtp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)
    Body humerus_l: mass=1.519873 mass_center=(0 -0.1436764 0) inertia=(0.006814398 0.002350756 0.007648942 0 0 0)
        meshes=humerus_lv.vtp
    Body ulna_l: mass=0.4542794 mass_center=(0 -0.116228 0) inertia=(0.002059818 0.0004297663 0.002234367 0 0 0)
        meshes=ulna_lv.vtp
    Body radius_l: mass=0.4542794 mass_center=(0 -0.116228 0) inertia=(0.002059818 0.0004297663 0.002234367 0 0 0)
        meshes=radius_lv.vtp
    Body hand_l: mass=0.3421116 mass_center=(0 -0.06566724 0) inertia=(0.0006203099 0.0003803918 0.0009318557 0 0 0)
        meshes=(pisiform_lvs.vtp lunate_lvs.vtp scaphoid_lvs.vtp triquetrum_lvs.vtp hamate_lvs.vtp capitate_lvs.vtp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)
  JointSet:
    CustomJoint ground_pelvis: socket_parent_frame=ground_offset socket_child_frame=pelvis_offset
      Coordinate pelvis_tilt: default_value=-0.02335641 range=(-1.570796 1.570796) clamped=false
      Coordinate pelvis_list: default_value=-0.06733392 range=(-1.570796 1.570796) clamped=false
      Coordinate pelvis_rotation: default_value=1.535966 range=(-1.570796 1.570796) clamped=false
      Coordinate pelvis_tx: default_value=0.2438318 range=(-5 5) clamped=false
      Coordinate pelvis_ty: default_value=0.9415386 range=(-1 2) clamped=false
      Coordinate pelvis_tz: default_value=0.556832 range=(-3 3) clamped=false
      PhysicalOffsetFrame ground_offset: socket_parent=/ground translation=(0 0 0) [meters]
      PhysicalOffsetFrame pelvis_offset: socket_parent=/bodyset/pelvis translation=(0 0 0)
      SpatialTransform:
        TransformAxis rotation1: coordinates=pelvis_tilt axis=(0 0 1) LinearFunction(coefficients=1 0)
        TransformAxis rotation2: coordinates=pelvis_list axis=(1 0 0) LinearFunction(coefficients=1 0)
        TransformAxis rotation3: coordinates=pelvis_rotation axis=(0 1 0) LinearFunction(coefficients=1 0)
        TransformAxis translation1: coordinates=pelvis_tx axis=(1 0 0) LinearFunction(coefficients=1 0)
        TransformAxis translation2: coordinates=pelvis_ty axis=(0 1 0) LinearFunction(coefficients=1 0)
        TransformAxis translation3: coordinates=pelvis_tz axis=(0 0 1) LinearFunction(coefficients=1 0)
    CustomJoint hip_r: socket_parent_frame=pelvis_offset socket_child_frame=femur_r_offset
      Coordinate hip_flexion_r: default_value=0.02544841 range=(-2.094395 2.094395) clamped=false
      Coordinate hip_adduction_r: default_value=-0.095928 range=(-2.094395 2.094395) clamped=false
      Coordinate hip_rotation_r: default_value=0.06649828 range=(-2.094395 2.094395) clamped=false
      PhysicalOffsetFrame pelvis_offset: socket_parent=/bodyset/pelvis translation=(-0.09185306 -0.06647794 0.08375522)
      PhysicalOffsetFrame femur_r_offset: socket_parent=/bodyset/femur_r translation=(0 0 0)
      SpatialTransform: axes_held_at_zero=(translation1 translation2 translation3)
        TransformAxis rotation1: coordinates=hip_flexion_r axis=(0 0 1) LinearFunction(coefficients=1 0)
        TransformAxis rotation2: coordinates=hip_adduction_r axis=(1 0 0) LinearFunction(coefficients=1 0)
        TransformAxis rotation3: coordinates=hip_rotation_r axis=(0 1 0) LinearFunction(coefficients=1 0)
    CustomJoint knee_r: socket_parent_frame=femur_r_offset socket_child_frame=sagittal_knee_body_r_offset
      Coordinate knee_angle_r: default_value=-0.01833501 range=(-2.094395 0.1745329) clamped=false
      PhysicalOffsetFrame femur_r_offset: socket_parent=/bodyset/femur_r translation=(0 0 0)
      PhysicalOffsetFrame sagittal_knee_body_r_offset: socket_parent=/bodyset/sagittal_knee_body_r translation=(0 0 0)
      SpatialTransform: axes_held_at_zero=(rotation2 rotation3 translation3)
        TransformAxis rotation1: coordinates=knee_angle_r axis=(0 0 1) LinearFunction(coefficients=1 0)
        TransformAxis translation1: coordinates=knee_angle_r axis=(1 0 0)
          MultiplierFunction: scale=0.9868759
            SimmSpline: x=(-2.0944 -1.74533 -1.39626 -1.0472 -0.698132 -0.349066 -0.174533 0.197344 0.337395 0.490178 1.52146 2.0944)
                y=(-0.0032 0.00179 0.00411 0.0041 0.00212 -0.001 -0.0031 -0.005227 -0.005435 -0.005574 -0.005435 -0.00525)
        TransformAxis translation2: coordinates=knee_angle_r axis=(0 1 0)
          MultiplierFunction: scale=0.9868759
            SimmSpline: x=(-2.0944 -1.22173 -0.523599 -0.349066 -0.174533 0.159149 2.0944)
                y=(-0.4226 -0.4082 -0.399 -0.3976 -0.3966 -0.395264 -0.396)
    CustomJoint knee_hinge_med_r: socket_parent_frame=sagittal_knee_body_r_offset
        socket_child_frame=aux_intercond_body_r_offset
      Coordinate knee_varus_med_r: default_value=0 range=(-0.08726646 0.1745329) clamped=false locked=true
      PhysicalOffsetFrame sagittal_knee_body_r_offset: socket_parent=/bodyset/sagittal_knee_body_r
          translation=(0 -0.01973752 -0.01677689)
      PhysicalOffsetFrame aux_intercond_body_r_offset: socket_parent=/bodyset/aux_intercond_body_r
          translation=(0 -0.01973752 -0.01677689)
      SpatialTransform: axes_held_at_zero=(rotation1 rotation2 translation1 translation2 translation3)
        TransformAxis rotation3: coordinates=knee_varus_med_r axis=(1 0 0) LinearFunction(coefficients=1 0)
    CustomJoint knee_hinge_lat_r: socket_parent_frame=aux_intercond_body_r_offset socket_child_frame=tibia_r_offset
      Coordinate knee_valgus_lat_r: default_value=0 range=(-0.1745329 0.08726646) clamped=false locked=true
      PhysicalOffsetFrame aux_intercond_body_r_offset: socket_parent=/bodyset/aux_intercond_body_r
          translation=(0 -0.01973752 0.01677689)
      PhysicalOffsetFrame tibia_r_offset: socket_parent=/bodyset/tibia_r translation=(0 -0.01888078 0.01604866)
      SpatialTransform: axes_held_at_zero=(rotation1 rotation2 translation1 translation2 translation3)
        TransformAxis rotation3: coordinates=knee_valgus_lat_r axis=(1 0 0) LinearFunction(coefficients=1 0)
    CustomJoint ankle_r: socket_parent_frame=tibia_r_offset socket_child_frame=talus_r_offset
      Coordinate ankle_angle_r: default_value=0.1180839 range=(-1.570796 1.570796) clamped=false
      PhysicalOffsetFrame tibia_r_offset: socket_parent=/bodyset/tibia_r translation=(0 -0.4059368 0)
      PhysicalOffsetFrame talus_r_offset: socket_parent=/bodyset/talus_r translation=(0 0 0)
      SpatialTransform: axes_held_at_zero=(rotation2 rotation3 translation1 translation2 translation3)
        TransformAxis rotation1: coordinates=ankle_angle_r axis=(-0.1050135 -0.1740224 0.9791263)
            LinearFunction(coefficients=1 0)
    CustomJoint subtalar_r: socket_parent_frame=talus_r_offset socket_child_frame=calcn_r_offset
      Coordinate subtalar_angle_r: default_value=-0.04002625 range=(-1.570796 1.570796) clamped=false
      PhysicalOffsetFrame talus_r_offset: socket_parent=/bodyset/talus_r
          translation=(-0.05301956 -0.0456053 0.008610107)
      PhysicalOffsetFrame calcn_r_offset: socket_parent=/bodyset/calcn_r translation=(0 0 0)
      SpatialTransform: axes_held_at_zero=(rotation2 rotation3 translation1 translation2 translation3)
        TransformAxis rotation1: coordinates=subtalar_angle_r axis=(0.7871796 0.6047475 -0.1209495)
            LinearFunction(coefficients=1 0)
    CustomJoint mtp_r: socket_parent_frame=calcn_r_offset socket_child_frame=toes_r_offset
      Coordinate mtp_angle_r: default_value=0 range=(-1.570796 1.570796) clamped=false
      PhysicalOffsetFrame calcn_r_offset: socket_parent=/bodyset/calcn_r
          translation=(0.1994066 -0.00243961 0.0009134748)
      PhysicalOffsetFrame toes_r_offset: socket_parent=/bodyset/toes_r translation=(0 0 0)
      SpatialTransform: axes_held_at_zero=(rotation2 rotation3 translation1 translation2 translation3)
        TransformAxis rotation1: coordinates=mtp_angle_r axis=(-0.5809544 0 0.8139361) LinearFunction(coefficients=1 0)
    CustomJoint hip_l: socket_parent_frame=pelvis_offset socket_child_frame=femur_l_offset
      Coordinate hip_flexion_l: default_value=-0.02522292 range=(-2.094395 2.094395) clamped=false
      Coordinate hip_adduction_l: default_value=-0.03886111 range=(-2.094395 2.094395) clamped=false
      Coordinate hip_rotation_l: default_value=-0.1025555 range=(-2.094395 2.094395) clamped=false
      PhysicalOffsetFrame pelvis_offset: socket_parent=/bodyset/pelvis
          translation=(-0.09185306 -0.06647794 -0.08375522)
      PhysicalOffsetFrame femur_l_offset: socket_parent=/bodyset/femur_l translation=(0 0 0)
      SpatialTransform: axes_held_at_zero=(translation1 translation2 translation3)
        TransformAxis rotation1: coordinates=hip_flexion_l axis=(0 0 1) LinearFunction(coefficients=1 0)
        TransformAxis rotation2: coordinates=hip_adduction_l axis=(-1 0 0) LinearFunction(coefficients=1 0)
        TransformAxis rotation3: coordinates=hip_rotation_l axis=(0 -1 0) LinearFunction(coefficients=1 0)
    CustomJoint knee_l: socket_parent_frame=femur_l_offset socket_child_frame=sagittal_knee_body_l_offset
      Coordinate knee_angle_l: default_value=0.08945546 range=(-2.094395 0.1745329) clamped=false
      PhysicalOffsetFrame femur_l_offset: socket_parent=/bodyset/femur_l translation=(0 0 0)
      PhysicalOffsetFrame sagittal_knee_body_l_offset: socket_parent=/bodyset/sagittal_knee_body_l translation=(0 0 0)
      SpatialTransform: axes_held_at_zero=(rotation2 rotation3 translation3)
        TransformAxis rotation1: coordinates=knee_angle_l axis=(0 0 1) LinearFunction(coefficients=1 0)
        TransformAxis translation1: coordinates=knee_angle_l axis=(1 0 0)
          MultiplierFunction: scale=0.9636436
            SimmSpline: x=(-2.0944 -1.74533 -1.39626 -1.0472 -0.698132 -0.349066 -0.174533 0.197344 0.337395 0.490178 1.52146 2.0944)
                y=(-0.0032 0.00179 0.00411 0.0041 0.00212 -0.001 -0.0031 -0.005227 -0.005435 -0.005574 -0.005435 -0.00525)
        TransformAxis translation2: coordinates=knee_angle_l axis=(0 1 0)
          MultiplierFunction: scale=0.9636436
            SimmSpline: x=(-2.0944 -1.22173 -0.523599 -0.349066 -0.174533 0.159149 2.0944)
                y=(-0.4226 -0.4082 -0.399 -0.3976 -0.3966 -0.395264 -0.396)
    CustomJoint knee_hinge_med_l: socket_parent_frame=sagittal_knee_body_l_offset
        socket_child_frame=aux_intercond_body_l_offset
      Coordinate knee_varus_med_l: default_value=0 range=(-0.1745329 0.08726646) clamped=false locked=true
      PhysicalOffsetFrame sagittal_knee_body_l_offset: socket_parent=/bodyset/sagittal_knee_body_l
          translation=(0 -0.01927287 0.01638194)
      PhysicalOffsetFrame aux_intercond_body_l_offset: socket_parent=/bodyset/aux_intercond_body_l
          translation=(0 -0.01927287 0.01638194)
      SpatialTransform: axes_held_at_zero=(rotation1 rotation2 translation1 translation2 translation3)
        TransformAxis rotation3: coordinates=knee_varus_med_l axis=(1 0 0) LinearFunction(coefficients=1 0)
    CustomJoint knee_hinge_lat_l: socket_parent_frame=aux_intercond_body_l_offset socket_child_frame=tibia_l_offset
      Coordinate knee_valgus_lat_l: default_value=0 range=(-0.08726646 0.1745329) clamped=false locked=true
      PhysicalOffsetFrame aux_intercond_body_l_offset: socket_parent=/bodyset/aux_intercond_body_l
          translation=(0 -0.01927287 -0.01638194)
      PhysicalOffsetFrame tibia_l_offset: socket_parent=/bodyset/tibia_l translation=(0 -0.0196646 -0.01671491)
      SpatialTransform: axes_held_at_zero=(rotation1 rotation2 translation1 translation2 translation3)
        TransformAxis rotation3: coordinates=knee_valgus_lat_l axis=(1 0 0) LinearFunction(coefficients=1 0)
    CustomJoint ankle_l: socket_parent_frame=tibia_l_offset socket_child_frame=talus_l_offset
      Coordinate ankle_angle_l: default_value=0.07354237 range=(-1.047198 1.047198) clamped=false
      PhysicalOffsetFrame tibia_l_offset: socket_parent=/bodyset/tibia_l translation=(0 -0.422789 0)
      PhysicalOffsetFrame talus_l_offset: socket_parent=/bodyset/talus_l translation=(0 0 0)
      SpatialTransform: axes_held_at_zero=(rotation2 rotation3 translation1 translation2 translation3)
        TransformAxis rotation1: coordinates=ankle_angle_l axis=(0.1050135 0.1740224 0.9791263)
            LinearFunction(coefficients=1 0)
    CustomJoint subtalar_l: socket_parent_frame=talus_l_offset socket_child_frame=calcn_l_offset
      Coordinate subtalar_angle_l: default_value=0.06498936 range=(-1.570796 1.570796) clamped=false
      PhysicalOffsetFrame talus_l_offset: socket_parent=/bodyset/talus_l
          translation=(-0.05290371 -0.04550565 -0.008591293)
      PhysicalOffsetFrame calcn_l_offset: socket_parent=/bodyset/calcn_l translation=(0 0 0)
      SpatialTransform: axes_held_at_zero=(rotation2 rotation3 translation1 translation2 translation3)
        TransformAxis rotation1: coordinates=subtalar_angle_l axis=(-0.7871796 -0.6047475 -0.1209495)
            LinearFunction(coefficients=1 0)
    CustomJoint mtp_l: socket_parent_frame=calcn_l_offset socket_child_frame=toes_l_offset
      Coordinate mtp_angle_l: default_value=0 range=(-1.047198 1.047198) clamped=false
      PhysicalOffsetFrame calcn_l_offset: socket_parent=/bodyset/calcn_l
          translation=(0.1852417 -0.002380359 -0.000970171)
      PhysicalOffsetFrame toes_l_offset: socket_parent=/bodyset/toes_l translation=(0 0 0)
      SpatialTransform: axes_held_at_zero=(rotation2 rotation3 translation1 translation2 translation3)
        TransformAxis rotation1: coordinates=mtp_angle_l axis=(0.5809544 0 0.8139361) LinearFunction(coefficients=1 0)
    CustomJoint back: socket_parent_frame=pelvis_offset socket_child_frame=torso_offset
      Coordinate lumbar_extension: default_value=0.03331007 range=(-1.570796 1.570796) clamped=false
      Coordinate lumbar_bending: default_value=-0.01357165 range=(-1.570796 1.570796) clamped=false
      Coordinate lumbar_rotation: default_value=0.05226059 range=(-1.570796 1.570796) clamped=false
      PhysicalOffsetFrame pelvis_offset: socket_parent=/bodyset/pelvis translation=(-0.1308289 0.08196599 0)
      PhysicalOffsetFrame torso_offset: socket_parent=/bodyset/torso translation=(0 0 0)
      SpatialTransform: axes_held_at_zero=(translation1 translation2 translation3)
        TransformAxis rotation1: coordinates=lumbar_extension axis=(0 0 1) LinearFunction(coefficients=1 0)
        TransformAxis rotation2: coordinates=lumbar_bending axis=(1 0 0) LinearFunction(coefficients=1 0)
        TransformAxis rotation3: coordinates=lumbar_rotation axis=(0 1 0) LinearFunction(coefficients=1 0)
    CustomJoint acromial_r: socket_parent_frame=torso_offset socket_child_frame=humerus_r_offset
      Coordinate arm_flex_r: default_value=-0.3535919 range=(-1.570796 1.570796) clamped=true
      Coordinate arm_add_r: default_value=-0.5663801 range=(-2.094395 1.570796) clamped=true
      Coordinate arm_rot_r: default_value=-0.03955636 range=(-1.570796 1.570796) clamped=true
      PhysicalOffsetFrame torso_offset: socket_parent=/bodyset/torso translation=(0.004098959 0.3401052 0.2141656)
      PhysicalOffsetFrame humerus_r_offset: socket_parent=/bodyset/humerus_r translation=(0 0 0)
      SpatialTransform: axes_held_at_zero=(translation1 translation2 translation3)
        TransformAxis rotation1: coordinates=arm_flex_r axis=(0 0 1) LinearFunction(coefficients=1 0)
        TransformAxis rotation2: coordinates=arm_add_r axis=(1 0 0) LinearFunction(coefficients=1 0)
        TransformAxis rotation3: coordinates=arm_rot_r axis=(0 1 0) LinearFunction(coefficients=1 0)
    PinJoint elbow_r: socket_parent_frame=humerus_r_offset socket_child_frame=ulna_r_offset
      Coordinate elbow_flex_r: default_value=0.5045262 range=(0 2.618) clamped=true
      PhysicalOffsetFrame humerus_r_offset: socket_parent=/bodyset/humerus_r
          translation=(0.0115502 -0.2515603 -0.008431537) orientation=(-0.0228627 0.228018 0.0051689) [radians]
      PhysicalOffsetFrame ulna_r_offset: socket_parent=/bodyset/ulna_r translation=(0 0 0)
          orientation=(-0.0228627 0.228018 0.0051689)
    PinJoint radioulnar_r: socket_parent_frame=ulna_r_offset socket_child_frame=radius_r_offset
      Coordinate pro_sup_r: default_value=0.6089272 range=(0 1.570796) clamped=true
      PhysicalOffsetFrame ulna_r_offset: socket_parent=/bodyset/ulna_r translation=(-0.00607478 -0.0117459 0.02355411)
          orientation=(-1.56884 0.056428 1.53614)
      PhysicalOffsetFrame radius_r_offset: socket_parent=/bodyset/radius_r translation=(0 0 0)
          orientation=(-1.56884 0.056428 1.53614)
    UniversalJoint radius_hand_r: socket_parent_frame=radius_r_offset socket_child_frame=hand_r_offset
      Coordinate wrist_flex_r: default_value=0 range=(-1.22173 1.22173) clamped=true locked=true
      Coordinate wrist_dev_r: default_value=0 range=(-0.4363323 0.6108652) clamped=true locked=true
      PhysicalOffsetFrame radius_r_offset: socket_parent=/bodyset/radius_r
          translation=(-0.007944082 -0.2129749 0.01229044) orientation=(-1.5708 0 -1.5708)
      PhysicalOffsetFrame hand_r_offset: socket_parent=/bodyset/hand_r translation=(0 0 0)
          orientation=(-1.5708 0 -1.5708)
    CustomJoint acromial_l: socket_parent_frame=torso_offset socket_child_frame=humerus_l_offset
      Coordinate arm_flex_l: default_value=-0.4317048 range=(-1.570796 1.570796) clamped=true
      Coordinate arm_add_l: default_value=-0.5728743 range=(-2.094395 1.570796) clamped=true
      Coordinate arm_rot_l: default_value=0.0010479 range=(-1.570796 1.570796) clamped=true
      PhysicalOffsetFrame torso_offset: socket_parent=/bodyset/torso translation=(0.004098959 0.3401052 -0.2141656)
      PhysicalOffsetFrame humerus_l_offset: socket_parent=/bodyset/humerus_l translation=(0 0 0)
      SpatialTransform: axes_held_at_zero=(translation1 translation2 translation3)
        TransformAxis rotation1: coordinates=arm_flex_l axis=(0 0 1) LinearFunction(coefficients=1 0)
        TransformAxis rotation2: coordinates=arm_add_l axis=(-1 0 0) LinearFunction(coefficients=1 0)
        TransformAxis rotation3: coordinates=arm_rot_l axis=(0 -1 0) LinearFunction(coefficients=1 0)
    PinJoint elbow_l: socket_parent_frame=humerus_l_offset socket_child_frame=ulna_l_offset
      Coordinate elbow_flex_l: default_value=0.5637955 range=(0 2.618) clamped=true
      PhysicalOffsetFrame humerus_l_offset: socket_parent=/bodyset/humerus_l
          translation=(0.01147999 -0.2500314 0.008380291) orientation=(0.0228627 -0.228018 0.0051689)
      PhysicalOffsetFrame ulna_l_offset: socket_parent=/bodyset/ulna_l translation=(0 0 0)
          orientation=(0.0228627 -0.228018 0.0051689)
    PinJoint radioulnar_l: socket_parent_frame=ulna_l_offset socket_child_frame=radius_l_offset
      Coordinate pro_sup_l: default_value=0.6089272 range=(0 1.570796) clamped=true
      PhysicalOffsetFrame ulna_l_offset: socket_parent=/bodyset/ulna_l
          translation=(-0.006487166 -0.01254327 -0.02515308) orientation=(1.56884 -0.056428 1.53614)
      PhysicalOffsetFrame radius_l_offset: socket_parent=/bodyset/radius_l translation=(0 0 0)
          orientation=(1.56884 -0.056428 1.53614)
    UniversalJoint radius_hand_l: socket_parent_frame=radius_l_offset socket_child_frame=hand_l_offset
      Coordinate wrist_flex_l: default_value=0 range=(-1.22173 1.22173) clamped=true locked=true
      Coordinate wrist_dev_l: default_value=0 range=(-0.4363323 0.6108652) clamped=true locked=true
      PhysicalOffsetFrame radius_l_offset: socket_parent=/bodyset/radius_l
          translation=(-0.008483365 -0.2274327 -0.01312477) orientation=(1.5708 0 1.5708)
      PhysicalOffsetFrame hand_l_offset: socket_parent=/bodyset/hand_l translation=(0 0 0)
          orientation=(1.5708 0 1.5708)
  ForceSet:
    Thelen2003Muscle [values shared by the 92 below unless stated]: optimal_force=1 max_contraction_velocity=10
        FmaxTendonStrain=0.033 FmaxMuscleStrain=0.6 KshapeActive=0.5 KshapePassive=4 Af=0.3 Flen=1.8
        activation_time_constant=0.01 [seconds] deactivation_time_constant=0.04 [seconds]
    Thelen2003Muscle glut_med1_r: max_isometric_force=819 optimal_fiber_length=0.05533628
        tendon_slack_length=0.08067719 pennation_angle_at_optimal=0.1396263 [radians]
      PathPoint P1: pelvis (-0.05300714 0.03057382 0.1212695)
      PathPoint P2: femur_r (-0.02151389 -0.01154645 0.05477161)
    Thelen2003Muscle glut_med2_r: max_isometric_force=573 optimal_fiber_length=0.0844219 tendon_slack_length=0.05295102
        pennation_angle_at_optimal=0
      PathPoint P1: pelvis (-0.1110811 0.04475444 0.07683413)
      PathPoint P2: femur_r (-0.0254614 -0.00572388 0.05200836)
    Thelen2003Muscle glut_med3_r: max_isometric_force=653 optimal_fiber_length=0.06692747
        tendon_slack_length=0.05490953 pennation_angle_at_optimal=0.3316126
      PathPoint P1: pelvis (-0.1588915 0.01056004 0.06499806)
      PathPoint P2: femur_r (-0.03049447 -0.004638317 0.05112017)
    Thelen2003Muscle glut_min1_r: max_isometric_force=270 optimal_fiber_length=0.07028394 tendon_slack_length=0.0165374
        pennation_angle_at_optimal=0.1745329
      PathPoint P1: pelvis (-0.06067239 -0.008045742 0.1059228)
      PathPoint P2: femur_r (-0.007105507 -0.01026351 0.05526505)
    Thelen2003Muscle glut_min2_r: max_isometric_force=285 optimal_fiber_length=0.05616957
        tendon_slack_length=0.02607873 pennation_angle_at_optimal=0
      PathPoint P1: pelvis (-0.08223902 -0.006537165 0.0994029)
      PathPoint P2: femur_r (-0.009474009 -0.01026351 0.05526505)
    Thelen2003Muscle glut_min3_r: max_isometric_force=323 optimal_fiber_length=0.03790976
        tendon_slack_length=0.05087889 pennation_angle_at_optimal=0.01745329
      PathPoint P1: pelvis (-0.1083528 -0.006336022 0.08586164)
      PathPoint P2: femur_r (-0.01332282 -0.00819107 0.05427818)
    Thelen2003Muscle semimem_r: max_isometric_force=1288 optimal_fiber_length=0.07872533 tendon_slack_length=0.3532799
        pennation_angle_at_optimal=0.2617994
      PathPoint P1: pelvis (-0.154864 -0.0980273 0.07172857)
      ConditionalPathPoint P2: tibia_r (-0.03285256 -0.03322074 -0.01785178)
          socket_coordinate=/jointset/knee_r/knee_angle_r range=(-0.558505 0.174533) [radians]
      PathPoint P3: tibia_r (-0.02548906 -0.0450401 -0.01847484)
    Thelen2003Muscle semiten_r: max_isometric_force=410 optimal_fiber_length=0.1967272 tendon_slack_length=0.2500686
        pennation_angle_at_optimal=0.08726646
      PathPoint P1: pelvis (-0.1641532 -0.1105083 0.06057458)
      ConditionalPathPoint P2: tibia_r (-0.03967796 -0.02699008 -0.02149577)
          socket_coordinate=/jointset/knee_r/knee_angle_r range=(-0.331613 0.174533)
      PathPoint P3: tibia_r (-0.03136098 -0.04986414 -0.02159961)
      PathPoint P4: tibia_r (-0.01066764 -0.07042531 -0.02312896)
      PathPoint P5: tibia_r (0.002548906 -0.09025014 -0.01821995)
    Thelen2003Muscle bifemlh_r: max_isometric_force=896 optimal_fiber_length=0.1073275 tendon_slack_length=0.320998
        pennation_angle_at_optimal=0
      PathPoint P1: pelvis (-0.1636465 -0.1031565 0.06965225)
      PathPoint P2: tibia_r (-0.02841558 -0.03398541 0.02778307)
      PathPoint P3: tibia_r (-0.02209051 -0.0531494 0.03238054)
    Thelen2003Muscle bifemsh_r: max_isometric_force=804 optimal_fiber_length=0.1694285 tendon_slack_length=0.08716264
        pennation_angle_at_optimal=0.4014257
      PathPoint P1: femur_r (0.00493438 -0.2083295 0.0230929)
      PathPoint P2: tibia_r (-0.02841558 -0.03398541 0.02778307)
      PathPoint P3: tibia_r (-0.02209051 -0.0531494 0.03238054)
    Thelen2003Muscle sar_r: max_isometric_force=156 optimal_fiber_length=0.5139042 tendon_slack_length=0.09882773
        pennation_angle_at_optimal=0
      PathPoint P1: pelvis (-0.01987768 -0.001307433 0.1245796)
      PathPoint P2: femur_r (-0.002960628 -0.3521173 -0.04154748)
      PathPoint P3: tibia_r (-0.005286619 -0.03955524 -0.03766716)
      PathPoint P4: tibia_r (0.005664234 -0.0556039 -0.0361567)
      PathPoint P5: tibia_r (0.02294015 -0.07929928 -0.02378978)
    Thelen2003Muscle add_long_r: max_isometric_force=627 optimal_fiber_length=0.1377323 tendon_slack_length=0.1097866
        pennation_angle_at_optimal=0.1047198
      PathPoint P1: pelvis (-0.04105455 -0.084078 0.01695166)
      PathPoint P2: femur_r (0.00493438 -0.2083295 0.0230929)
    Thelen2003Muscle add_brev_r: max_isometric_force=429 optimal_fiber_length=0.1320448 tendon_slack_length=0.01985636
        pennation_angle_at_optimal=0
      PathPoint P1: pelvis (-0.07626272 -0.09202317 0.01645013)
      PathPoint P2: femur_r (0.0008881883 -0.1180304 0.02901415)
    Thelen2003Muscle add_mag1_r: max_isometric_force=381 optimal_fiber_length=0.08597858 tendon_slack_length=0.05929557
        pennation_angle_at_optimal=0.08726646
      PathPoint P1: pelvis (-0.09510104 -0.1180713 0.02557794)
      PathPoint P2: femur_r (-0.004440942 -0.1195107 0.03345509)
    Thelen2003Muscle add_mag2_r: max_isometric_force=343 optimal_fiber_length=0.1193008 tendon_slack_length=0.1183148
        pennation_angle_at_optimal=0.05235988
      PathPoint P1: pelvis (-0.1079631 -0.1198816 0.03089414)
      PathPoint P2: femur_r (0.00532913 -0.2255011 0.02240208)
    Thelen2003Muscle add_mag3_r: max_isometric_force=488 optimal_fiber_length=0.1297123 tendon_slack_length=0.2465524
        pennation_angle_at_optimal=0.08726646
      PathPoint P1: pelvis (-0.1443145 -0.1147826 0.04896922)
      PathPoint P2: femur_r (0.006908131 -0.3786643 -0.0262509)
    Thelen2003Muscle tfl_r: max_isometric_force=233 optimal_fiber_length=0.09402753 tendon_slack_length=0.4206495
        pennation_angle_at_optimal=0.05235988
      PathPoint P1: pelvis (-0.04040495 0.02152236 0.1244793)
      PathPoint P2: femur_r (0.02901415 -0.09819415 0.05891649)
      PathPoint P3: femur_r (0.00532913 -0.3995861 0.03523147)
      PathPoint P4: tibia_r (0.005664234 -0.0459747 0.02803796)
    Thelen2003Muscle pect_r: max_isometric_force=266 optimal_fiber_length=0.1023943 tendon_slack_length=0.03379011
        pennation_angle_at_optimal=0
      PathPoint P1: pelvis (-0.05599529 -0.07723912 0.04523785)
      PathPoint P2: femur_r (-0.01203989 -0.0811212 0.02496796)
    Thelen2003Muscle grac_r: max_isometric_force=162 optimal_fiber_length=0.3440086 tendon_slack_length=0.1231395
        pennation_angle_at_optimal=0.05235988
      PathPoint P1: pelvis (-0.09615339 -0.1193787 0.0280254)
      ConditionalPathPoint P2: tibia_r (-0.02508312 -0.03011485 -0.03562803)
          socket_coordinate=/jointset/knee_r/knee_angle_r range=(-0.436332 0.174533)
      PathPoint P3: tibia_r (-0.01834268 -0.04864633 -0.0337966)
      PathPoint P4: tibia_r (0.005664234 -0.07892167 -0.02152409)
    Thelen2003Muscle glut_max1_r: max_isometric_force=573 optimal_fiber_length=0.1449217 tendon_slack_length=0.1275719
        pennation_angle_at_optimal=0.08726646
      PathPoint P1: pelvis (-0.1552538 0.06154992 0.07021396)
      PathPoint P2: pelvis (-0.167726 0.001206861 0.08887081)
      PathPoint P3: femur_r (-0.04510023 -0.02447452 0.03868554)
      PathPoint P4: femur_r (-0.02733646 -0.05585718 0.04638317)
    Thelen2003Muscle glut_max2_r: max_isometric_force=819 optimal_fiber_length=0.1526811 tendon_slack_length=0.1319082
        pennation_angle_at_optimal=0
      PathPoint P1: pelvis (-0.1752613 0.01770063 0.05647208)
      PathPoint P2: pelvis (-0.1787692 -0.05229732 0.09167937)
      PathPoint P3: femur_r (-0.04204091 -0.05230442 0.02891546)
      PathPoint P4: femur_r (-0.01539526 -0.1002666 0.0413501)
    Thelen2003Muscle glut_max3_r: max_isometric_force=552 optimal_fiber_length=0.1524605 tendon_slack_length=0.1535192
        pennation_angle_at_optimal=0.08726646
      PathPoint P1: pelvis (-0.2021547 -0.03157954 0.005817728)
      PathPoint P2: pelvis (-0.1986468 -0.1058015 0.04042318)
      PathPoint P3: femur_r (-0.02950759 -0.1027338 0.01332282)
      PathPoint P4: femur_r (-0.005921255 -0.1400377 0.0405606)
    Thelen2003Muscle iliacus_r: max_isometric_force=1073 optimal_fiber_length=0.1073021 tendon_slack_length=0.1073021
        pennation_angle_at_optimal=0.1221731
      PathPoint P1: pelvis (-0.08756571 0.0367087 0.08566103)
      PathPoint P2: pelvis (-0.03351922 -0.05531447 0.08134789)
      ConditionalPathPoint P3: pelvis (-0.0374168 -0.08096028 0.08184941)
          socket_coordinate=/jointset/hip_r/hip_flexion_r range=(-1.5708 0.785398)
      PathPoint P4: femur_r (0.001677689 -0.05358736 0.005625193)
      PathPoint P5: femur_r (-0.01904671 -0.06128499 0.0127307)
    Thelen2003Muscle psoas_r: max_isometric_force=1113 optimal_fiber_length=0.1053524 tendon_slack_length=0.1685639
        pennation_angle_at_optimal=0.1396263
      PathPoint P1: pelvis (-0.08405789 0.08920716 0.02898833)
      PathPoint P2: pelvis (-0.03092083 -0.05732591 0.07613199)
      ConditionalPathPoint P3: pelvis (-0.0374168 -0.08096028 0.08184941)
          socket_coordinate=/jointset/hip_r/hip_flexion_r range=(-1.5708 0.785398)
      PathPoint P4: femur_r (0.001579001 -0.05003461 0.003750128)
      PathPoint P5: femur_r (-0.01855327 -0.05891649 0.01026351)
    Thelen2003Muscle quad_fem_r: max_isometric_force=381 optimal_fiber_length=0.05565153 tendon_slack_length=0.02473401
        pennation_angle_at_optimal=0
      PathPoint P1: pelvis (-0.1484979 -0.1157581 0.05215894)
      PathPoint P2: femur_r (-0.03759997 -0.03542885 0.03611966)
    Thelen2003Muscle gem_r: max_isometric_force=164 optimal_fiber_length=0.02632978 tendon_slack_length=0.04278589
        pennation_angle_at_optimal=0
      PathPoint P1: pelvis (-0.1471987 -0.08246885 0.07161824)
      PathPoint P2: femur_r (-0.01401364 -0.003256691 0.0437186)
    Thelen2003Muscle peri_r: max_isometric_force=444 optimal_fiber_length=0.02781974 tendon_slack_length=0.1230488
        pennation_angle_at_optimal=0.1745329
      PathPoint P1: pelvis (-0.1813676 0.0003017153 0.02357183)
      PathPoint P2: pelvis (-0.1549939 -0.02775781 0.06590082)
      PathPoint P3: femur_r (-0.01460576 -0.003552753 0.04312648)
    Thelen2003Muscle rect_fem_r: max_isometric_force=1169 optimal_fiber_length=0.1130848 tendon_slack_length=0.3075114
        pennation_angle_at_optimal=0.08726646
      PathPoint P1: pelvis (-0.03832624 -0.03127782 0.09709587)
      ConditionalPathPoint P2: femur_r (0.03296166 -0.397711 0.001875064)
          socket_coordinate=/jointset/knee_r/knee_angle_r range=(-2.61799 -1.45997)
      MovingPathPoint P3: tibia_r socket_x_coordinate=/jointset/knee_r/knee_angle_r
          socket_y_coordinate=/jointset/knee_r/knee_angle_r socket_z_coordinate=/jointset/knee_r/knee_angle_r
        x_location: MultiplierFunction: scale=0.9440391
          SimmSpline: x=(-2.0944 -1.99997 -1.5708 -1.45752 -1.39626 -1.0472 -0.698132 -0.526391 -0.349066 -0.174533 0 0.00017453 0.00034907 0.0279253 0.0872665 0.174533 2.0944)
              y=(0.0155805 0.0179938 0.0275081 0.0296564 0.0307615 0.0365695 0.0422074 0.0450902 0.048391 0.0534299 0.0617576 0.0617669 0.0617762 0.0633083 0.066994 0.0733035 0.0573481)
        y_location: MultiplierFunction: scale=0.9440391
          SimmSpline: x=(-2.0944 -1.99997 -1.5708 -1.45752 -1.39626 -1.0472 -0.698132 -0.526391 -0.349066 -0.174533 0 0.00017453 0.00034907 0.0279253 0.0872665 0.174533 2.0944)
              y=(0.0234116 0.0237613 0.0251141 0.0252795 0.0253146 0.0249184 0.0242373 0.0238447 0.0234197 0.0227644 0.020984 0.0209814 0.0209788 0.0205225 0.0191754 0.0159554 -0.0673774)
        z_location: MultiplierFunction: scale=0.9440391
          SimmSpline: x=(-2.0944 0.1745) y=(0.0014 0.0014)
    Thelen2003Muscle vas_med_r: max_isometric_force=1294 optimal_fiber_length=0.08845227 tendon_slack_length=0.1252246
        pennation_angle_at_optimal=0.08726646
      PathPoint P1: femur_r (0.01381626 -0.2071453 0.01855327)
      PathPoint P2: femur_r (0.03513278 -0.2732659 0.0008881883)
      ConditionalPathPoint P3: femur_r (0.03651441 -0.3994874 -0.01233595)
          socket_coordinate=/jointset/knee_r/knee_angle_r range=(-2.61799 -1.21004)
      ConditionalPathPoint P4: femur_r (0.0270404 -0.4199157 -0.01292807)
          socket_coordinate=/jointset/knee_r/knee_angle_r range=(-2.61799 -1.78006)
      MovingPathPoint P5: tibia_r socket_x_coordinate=/jointset/knee_r/knee_angle_r
          socket_y_coordinate=/jointset/knee_r/knee_angle_r socket_z_coordinate=/jointset/knee_r/knee_angle_r
        x_location: MultiplierFunction: scale=0.9440391
          SimmSpline: x=(-2.0944 -1.99997 -1.5708 -1.45752 -1.39626 -1.0472 -0.698132 -0.526391 -0.349066 -0.174533 0 0.00017453 0.00034907 0.0279253 0.0872665 0.174533 2.0944)
              y=(0.00981097 0.0122243 0.0217371 0.0238851 0.0249902 0.0307959 0.0364187 0.0392871 0.0425654 0.0475764 0.0559586 0.0559681 0.0559776 0.0575419 0.0613368 0.0679503 0.0629332)
        y_location: MultiplierFunction: scale=0.9440391
          SimmSpline: x=(-2.0944 -1.99997 -1.5708 -1.45752 -1.39626 -1.0472 -0.698132 -0.526391 -0.349066 -0.174533 0 0.00017453 0.00034907 0.0279253 0.0872665 0.174533 2.0944)
              y=(0.0224154 0.0227651 0.0241265 0.0242933 0.0243287 0.0239462 0.0233593 0.0230677 0.0228342 0.0226362 0.0217917 0.0217903 0.0217889 0.0215365 0.0206842 0.0183269 -0.0656205)
        z_location: MultiplierFunction: scale=0.9440391
          SimmSpline: x=(-2.0944 2.0944) y=(-0.0146 -0.0146)
    Thelen2003Muscle vas_int_r: max_isometric_force=1365 optimal_fiber_length=0.08660849 tendon_slack_length=0.135388
        pennation_angle_at_optimal=0.05235988
      PathPoint P1: femur_r (0.0286194 -0.1898749 0.03059315)
      PathPoint P2: femur_r (0.03306034 -0.2056649 0.02812596)
      ConditionalPathPoint P3: femur_r (0.03384984 -0.397711 0.005427818)
          socket_coordinate=/jointset/knee_r/knee_angle_r range=(-2.61799 -1.42)
      MovingPathPoint P4: tibia_r socket_x_coordinate=/jointset/knee_r/knee_angle_r
          socket_y_coordinate=/jointset/knee_r/knee_angle_r socket_z_coordinate=/jointset/knee_r/knee_angle_r
        x_location: MultiplierFunction: scale=0.9440391
          SimmSpline: x=(-2.0944 -1.99997 -1.5708 -1.45752 -1.39626 -1.0472 -0.698132 -0.526391 -0.349066 -0.174533 0 0.00017453 0.00034907 0.0279253 0.0872665 0.174533 2.0944)
              y=(0.0082733 0.0106866 0.0202042 0.022353 0.0234583 0.0292715 0.0349465 0.037871 0.0412569 0.0465287 0.0554632 0.0554735 0.0554837 0.0571717 0.061272 0.0684368 0.0648818)
        y_location: MultiplierFunction: scale=0.9440391
          SimmSpline: x=(-2.0944 -1.99997 -1.5708 -1.45752 -1.39626 -1.0472 -0.698132 -0.526391 -0.349066 -0.174533 0 0.00017453 0.00034907 0.0279253 0.0872665 0.174533 2.0944)
              y=(0.025599 0.0259487 0.0273124 0.0274796 0.0275151 0.0271363 0.0265737 0.0263073 0.0261187 0.0260129 0.0252923 0.0252911 0.0252898 0.0250526 0.0242191 0.0218288 -0.0685706)
        z_location: MultiplierFunction: scale=0.9440391
          SimmSpline: x=(-2.0944 2.0944) y=(0.0018 0.0018)
    Thelen2003Muscle vas_lat_r: max_isometric_force=1871 optimal_fiber_length=0.08333766 tendon_slack_length=0.1557621
        pennation_angle_at_optimal=0.08726646
      PathPoint P1: femur_r (0.004737004 -0.1829668 0.03444197)
      PathPoint P2: femur_r (0.02654696 -0.2556995 0.04036322)
      ConditionalPathPoint P3: femur_r (0.03562622 -0.397711 0.02023096)
          socket_coordinate=/jointset/knee_r/knee_angle_r range=(-2.61799 -1.21004)
      ConditionalPathPoint P4: femur_r (0.02496796 -0.4187314 0.01815852)
          socket_coordinate=/jointset/knee_r/knee_angle_r range=(-2.61799 -1.92004)
      MovingPathPoint P5: tibia_r socket_x_coordinate=/jointset/knee_r/knee_angle_r
          socket_y_coordinate=/jointset/knee_r/knee_angle_r socket_z_coordinate=/jointset/knee_r/knee_angle_r
        x_location: MultiplierFunction: scale=0.9440391
          SimmSpline: x=(-2.0944 -1.99997 -1.5708 -1.45752 -1.39626 -1.0472 -0.698132 -0.526391 -0.349066 -0.174533 0 0.00017453 0.00034907 0.0279253 0.0872665 0.174533 2.0944)
              y=(0.0142897 0.016703 0.0262145 0.0283623 0.0294674 0.0352709 0.0408785 0.0437291 0.0469704 0.0518742 0.0599557 0.0599647 0.0599738 0.0614577 0.0650351 0.0711867 0.0583766)
        y_location: MultiplierFunction: scale=0.9440391
          SimmSpline: x=(-2.0944 -1.99997 -1.5708 -1.45752 -1.39626 -1.0472 -0.698132 -0.526391 -0.349066 -0.174533 0 0.00017453 0.00034907 0.0279253 0.0872665 0.174533 2.0944)
              y=(0.0215318 0.0218815 0.0232362 0.0234019 0.0234371 0.0230439 0.0223842 0.0220151 0.0216359 0.0210971 0.0195864 0.0195842 0.019582 0.01919 0.018008 0.0151073 -0.0653421)
        z_location: MultiplierFunction: scale=0.9440391
          SimmSpline: x=(-2.0944 2.0944) y=(0.0165 0.0165)
    Thelen2003Muscle med_gas_r: max_isometric_force=1558 optimal_fiber_length=0.05654517 tendon_slack_length=0.3675436
        pennation_angle_at_optimal=0.296706
      PathPoint P1: femur_r (-0.01875064 -0.3877435 -0.02319158)
      ConditionalPathPoint P2: femur_r (-0.02960628 -0.3969215 -0.0254614)
          socket_coordinate=/jointset/knee_r/knee_angle_r range=(-0.785398 0.174533)
      PathPoint P3: calcn_r (0 0.03781396 -0.004482793)
    Thelen2003Muscle lat_gas_r: max_isometric_force=683 optimal_fiber_length=0.06024846 tendon_slack_length=0.3577252
        pennation_angle_at_optimal=0.1396263
      PathPoint P1: femur_r (-0.02171127 -0.3894212 0.02684302)
      ConditionalPathPoint P2: femur_r (-0.02960628 -0.3965267 0.0270404)
          socket_coordinate=/jointset/knee_r/knee_angle_r range=(-0.785398 0.174533)
      PathPoint P3: calcn_r (0 0.03781396 -0.004482793)
    Thelen2003Muscle soleus_r: max_isometric_force=3549 optimal_fiber_length=0.04697444 tendon_slack_length=0.2348722
        pennation_angle_at_optimal=0.4363323
      PathPoint P1: tibia_r (-0.002265694 -0.1447212 0.006702677)
      PathPoint P2: calcn_r (0 0.03781396 -0.004482793)
    Thelen2003Muscle tib_post_r: max_isometric_force=1588 optimal_fiber_length=0.02972087 tendon_slack_length=0.2972087
        pennation_angle_at_optimal=0.2094395
      PathPoint P1: tibia_r (-0.008873967 -0.1272565 0.001793674)
      PathPoint P2: tibia_r (-0.01359416 -0.3824302 -0.02161849)
      PathPoint P3: calcn_r (0.04650589 0.04074149 -0.02419017)
      PathPoint P4: calcn_r (0.08609724 0.0193949 -0.02376726)
    Thelen2003Muscle flex_dig_r: max_isometric_force=310 optimal_fiber_length=0.03433168 tendon_slack_length=0.4039021
        pennation_angle_at_optimal=0.1221731
      PathPoint P1: tibia_r (-0.007835524 -0.1931504 -0.00169927)
      PathPoint P2: tibia_r (-0.0145382 -0.3824302 -0.01850317)
      PathPoint P3: calcn_r (0.04862487 0.03842386 -0.02368268)
      PathPoint P4: calcn_r (0.07895965 0.02146857 -0.0222448)
      PathPoint P5: calcn_r (0.1849083 -0.009880421 0.009811396)
      PathPoint P6: toes_r (-0.002118974 -0.00951448 0.01243341)
      PathPoint P7: toes_r (0.0317846 -0.008660616 0.01818492)
      PathPoint P8: toes_r (0.04918249 -0.007318831 0.0204686)
    Thelen2003Muscle flex_hal_r: max_isometric_force=322 optimal_fiber_length=0.04406894 tendon_slack_length=0.3894464
        pennation_angle_at_optimal=0.1745329
      PathPoint P1: tibia_r (-0.007457909 -0.2203387 0.02303455)
      PathPoint P2: tibia_r (-0.01755913 -0.3850735 -0.01642628)
      PathPoint P3: calcn_r (0.04171032 0.03366662 -0.02038402)
      PathPoint P4: calcn_r (0.1157629 0.008294675 -0.02165274)
      PathPoint P5: calcn_r (0.192492 -0.006464967 -0.02275229)
      PathPoint P6: toes_r (0.01728636 -0.007806753 -0.02241397)
      PathPoint P7: toes_r (0.06267701 -0.01244201 -0.01530916)
    Thelen2003Muscle tib_ant_r: max_isometric_force=905 optimal_fiber_length=0.09515007 tendon_slack_length=0.216515
        pennation_angle_at_optimal=0.08726646
      PathPoint P1: tibia_r (0.0168983 -0.1533119 0.01085645)
      PathPoint P2: tibia_r (0.03105889 -0.3729898 -0.01670949)
      PathPoint P3: calcn_r (0.1300381 0.02171253 -0.02579721)
    Thelen2003Muscle per_brev_r: max_isometric_force=435 optimal_fiber_length=0.04780719 tendon_slack_length=0.1539391
        pennation_angle_at_optimal=0.08726646
      PathPoint P1: tibia_r (-0.006608274 -0.2497927 0.03068127)
      PathPoint P2: tibia_r (-0.01869197 -0.3949859 0.02671631)
      PathPoint P3: tibia_r (-0.01359416 -0.4054648 0.02728273)
      PathPoint P4: calcn_r (0.05252824 0.03293474 0.01970737)
      PathPoint P5: calcn_r (0.07550237 0.02671373 0.02901128)
    Thelen2003Muscle per_long_r: max_isometric_force=943 optimal_fiber_length=0.04742474 tendon_slack_length=0.3339089
        pennation_angle_at_optimal=0.1745329
      PathPoint P1: tibia_r (0.0004720195 -0.1480253 0.03417421)
      PathPoint P2: tibia_r (-0.01954161 -0.3969684 0.02699952)
      PathPoint P3: tibia_r (-0.01529343 -0.4077305 0.02728273)
      PathPoint P4: calcn_r (0.04884792 0.02805552 0.0186924)
      PathPoint P5: calcn_r (0.07594847 0.01292993 0.024021)
      PathPoint P6: calcn_r (0.09501923 0.008416655 0.009980558)
      PathPoint P7: calcn_r (0.1341645 0.01036834 -0.0155629)
    Thelen2003Muscle per_tert_r: max_isometric_force=180 optimal_fiber_length=0.07536384 tendon_slack_length=0.09539727
        pennation_angle_at_optimal=0.2268928
      PathPoint P1: tibia_r (0.0009440391 -0.2647086 0.0218073)
      PathPoint P2: tibia_r (0.02161849 -0.3841295 0.01501022)
      PathPoint P3: calcn_r (0.09557686 0.02781156 0.02528972)
    Thelen2003Muscle ext_dig_r: max_isometric_force=512 optimal_fiber_length=0.1021904 tendon_slack_length=0.345644
        pennation_angle_at_optimal=0.1396263
      PathPoint P1: tibia_r (0.003020925 -0.1303718 0.02605548)
      PathPoint P2: tibia_r (0.02728273 -0.3782765 0.006797081)
      PathPoint P3: calcn_r (0.102826 0.04732844 -8.4581e-5)
      PathPoint P4: calcn_r (0.1802243 0.006708928 0.01099553)
      PathPoint P5: toes_r (0.0003345748 0.005733084 0.01294089)
      PathPoint P6: toes_r (0.04940554 -0.000487922 0.02114525)
    Thelen2003Muscle ext_hal_r: max_isometric_force=162 optimal_fiber_length=0.1119845 tendon_slack_length=0.3077052
        pennation_angle_at_optimal=0.1047198
      PathPoint P1: tibia_r (0.001132847 -0.1668117 0.02152409)
      PathPoint P2: tibia_r (0.03077567 -0.3761996 -0.008024332)
      PathPoint P3: calcn_r (0.1081792 0.04745042 -0.01784659)
      PathPoint P4: calcn_r (0.1442017 0.03769198 -0.02173732)
      PathPoint P5: calcn_r (0.1933842 0.01695529 -0.02368268)
      PathPoint P6: toes_r (0.03323443 0.005001201 -0.02072235)
      PathPoint P7: toes_r (0.06278853 0.004147337 -0.01573207)
    Thelen2003Muscle glut_med1_l: max_isometric_force=819 optimal_fiber_length=0.05504946
        tendon_slack_length=0.08025903 pennation_angle_at_optimal=0.1396263
      PathPoint P1: pelvis (-0.05300714 0.03057382 -0.1212695)
      PathPoint P2: femur_l (-0.02100743 -0.01127463 -0.05348222)
    Thelen2003Muscle glut_med2_l: max_isometric_force=573 optimal_fiber_length=0.08397526
        tendon_slack_length=0.05267087 pennation_angle_at_optimal=0
      PathPoint P1: pelvis (-0.1110811 0.04475444 -0.07683413)
      PathPoint P2: femur_l (-0.02486201 -0.005589133 -0.05078402)
    Thelen2003Muscle glut_med3_l: max_isometric_force=653 optimal_fiber_length=0.06658498
        tendon_slack_length=0.05462855 pennation_angle_at_optimal=0.3316126
      PathPoint P1: pelvis (-0.1588915 0.01056004 -0.06499806)
      PathPoint P2: femur_l (-0.02977659 -0.004529125 -0.04991674)
    Thelen2003Muscle glut_min1_l: max_isometric_force=270 optimal_fiber_length=0.06965192
        tendon_slack_length=0.01638869 pennation_angle_at_optimal=0.1745329
      PathPoint P1: pelvis (-0.06067239 -0.008045742 -0.1059228)
      PathPoint P2: femur_l (-0.006938234 -0.01002189 -0.05396404)
    Thelen2003Muscle glut_min2_l: max_isometric_force=285 optimal_fiber_length=0.05557827 tendon_slack_length=0.0258042
        pennation_angle_at_optimal=0
      PathPoint P1: pelvis (-0.08223902 -0.006537165 -0.0994029)
      PathPoint P2: femur_l (-0.009250979 -0.01002189 -0.05396404)
    Thelen2003Muscle glut_min3_l: max_isometric_force=323 optimal_fiber_length=0.03750833
        tendon_slack_length=0.05034012 pennation_angle_at_optimal=0.01745329
      PathPoint P1: pelvis (-0.1083528 -0.006336022 -0.08586164)
      PathPoint P2: femur_l (-0.01300919 -0.007998242 -0.0530004)
    Thelen2003Muscle semimem_l: max_isometric_force=1288 optimal_fiber_length=0.07708124 tendon_slack_length=0.3459021
        pennation_angle_at_optimal=0.2617994
      PathPoint P1: pelvis (-0.154864 -0.0980273 -0.07172857)
      ConditionalPathPoint P2: tibia_l (-0.03421641 -0.03459987 0.01859288)
          socket_coordinate=/jointset/knee_l/knee_angle_l range=(-0.558505 0.174533)
      PathPoint P3: tibia_l (-0.02654722 -0.04690991 0.01924182)
    Thelen2003Muscle semiten_l: max_isometric_force=410 optimal_fiber_length=0.1940427 tendon_slack_length=0.2466563
        pennation_angle_at_optimal=0.08726646
      PathPoint P1: pelvis (-0.1641532 -0.1105083 -0.06057458)
      ConditionalPathPoint P2: tibia_l (-0.04132517 -0.02811055 0.02238815)
          socket_coordinate=/jointset/knee_l/knee_angle_l range=(-0.331613 0.174533)
      PathPoint P3: tibia_l (-0.03266291 -0.05193422 0.02249631)
      PathPoint P4: tibia_l (-0.0111105 -0.07334897 0.02408914)
      PathPoint P5: tibia_l (0.002654722 -0.09399681 0.01897634)
    Thelen2003Muscle bifemlh_l: max_isometric_force=896 optimal_fiber_length=0.1052079 tendon_slack_length=0.3146586
        pennation_angle_at_optimal=0
      PathPoint P1: pelvis (-0.1636465 -0.1031565 -0.06965225)
      PathPoint P2: tibia_l (-0.02959523 -0.03539629 -0.02893647)
      PathPoint P3: tibia_l (-0.02300759 -0.05535586 -0.0337248)
    Thelen2003Muscle bifemsh_l: max_isometric_force=804 optimal_fiber_length=0.1673069 tendon_slack_length=0.08607118
        pennation_angle_at_optimal=0.4014257
      PathPoint P1: femur_l (0.004818218 -0.2034252 -0.02254926)
      PathPoint P2: tibia_l (-0.02959523 -0.03539629 -0.02893647)
      PathPoint P3: tibia_l (-0.02300759 -0.05535586 -0.0337248)
    Thelen2003Muscle sar_l: max_isometric_force=156 optimal_fiber_length=0.5077861 tendon_slack_length=0.09765118
        pennation_angle_at_optimal=0
      PathPoint P1: pelvis (-0.01987768 -0.001307433 -0.1245796)
      PathPoint P2: femur_l (-0.002890931 -0.343828 0.0405694)
      PathPoint P3: tibia_l (-0.005506089 -0.04119735 0.03923089)
      PathPoint P4: tibia_l (0.005899381 -0.05791226 0.03765772)
      PathPoint P5: tibia_l (0.02389249 -0.08259134 0.0247774)
    Thelen2003Muscle add_long_l: max_isometric_force=627 optimal_fiber_length=0.1348423 tendon_slack_length=0.107483
        pennation_angle_at_optimal=0.1047198
      PathPoint P1: pelvis (-0.04105455 -0.084078 -0.01695166)
      PathPoint P2: femur_l (0.004818218 -0.2034252 -0.02254926)
    Thelen2003Muscle add_brev_l: max_isometric_force=429 optimal_fiber_length=0.1296945 tendon_slack_length=0.01950293
        pennation_angle_at_optimal=0
      PathPoint P1: pelvis (-0.07626272 -0.09202317 -0.01645013)
      PathPoint P2: femur_l (0.0008672792 -0.1152518 -0.02833112)
    Thelen2003Muscle add_mag1_l: max_isometric_force=381 optimal_fiber_length=0.08424897 tendon_slack_length=0.05810274
        pennation_angle_at_optimal=0.08726646
      PathPoint P1: pelvis (-0.09510104 -0.1180713 -0.02557794)
      PathPoint P2: femur_l (-0.004336396 -0.1166972 -0.03266752)
    Thelen2003Muscle add_mag2_l: max_isometric_force=343 optimal_fiber_length=0.1161148 tendon_slack_length=0.1151552
        pennation_angle_at_optimal=0.05235988
      PathPoint P1: pelvis (-0.1079631 -0.1198816 -0.03089414)
      PathPoint P2: femur_l (0.005203675 -0.2201926 -0.02187471)
    Thelen2003Muscle add_mag3_l: max_isometric_force=488 optimal_fiber_length=0.1263205 tendon_slack_length=0.2401054
        pennation_angle_at_optimal=0.08726646
      PathPoint P1: pelvis (-0.1443145 -0.1147826 -0.04896922)
      PathPoint P2: femur_l (0.006745505 -0.3697501 0.02563292)
    Thelen2003Muscle tfl_l: max_isometric_force=233 optimal_fiber_length=0.09246667 tendon_slack_length=0.4136667
        pennation_angle_at_optimal=0.05235988
      PathPoint P1: pelvis (-0.04040495 0.02152236 -0.1244793)
      PathPoint P2: femur_l (0.02833112 -0.09588254 -0.05752952)
      PathPoint P3: femur_l (0.005203675 -0.3901793 -0.03440208)
      PathPoint P4: tibia_l (0.005899381 -0.04788331 -0.02920194)
    Thelen2003Muscle pect_l: max_isometric_force=266 optimal_fiber_length=0.1007166 tendon_slack_length=0.03323649
        pennation_angle_at_optimal=0
      PathPoint P1: pelvis (-0.05599529 -0.07723912 -0.04523785)
      PathPoint P2: femur_l (-0.01175645 -0.0792115 -0.02438018)
    Thelen2003Muscle grac_l: max_isometric_force=162 optimal_fiber_length=0.3386362 tendon_slack_length=0.1212164
        pennation_angle_at_optimal=0.05235988
      PathPoint P1: pelvis (-0.09615339 -0.1193787 -0.0280254)
      ConditionalPathPoint P2: tibia_l (-0.02612443 -0.03136504 0.03710711)
          socket_coordinate=/jointset/knee_l/knee_angle_l range=(-0.436332 0.174533)
      PathPoint P3: tibia_l (-0.01910416 -0.05066585 0.03519964)
      PathPoint P4: tibia_l (0.005899381 -0.08219805 0.02241765)
    Thelen2003Muscle glut_max1_l: max_isometric_force=573 optimal_fiber_length=0.1439599 tendon_slack_length=0.1267253
        pennation_angle_at_optimal=0.08726646
      PathPoint P1: pelvis (-0.1552538 0.06154992 -0.07021396)
      PathPoint P2: pelvis (-0.167726 0.001206861 -0.08887081)
      PathPoint P3: femur_l (-0.04403851 -0.02389836 -0.03777483)
      PathPoint P4: femur_l (-0.02669293 -0.05454223 -0.04529125)
    Thelen2003Muscle glut_max2_l: max_isometric_force=819 optimal_fiber_length=0.151325 tendon_slack_length=0.1307366
        pennation_angle_at_optimal=0
      PathPoint P1: pelvis (-0.1752613 0.01770063 -0.05647208)
      PathPoint P2: pelvis (-0.1787692 -0.05229732 -0.09167937)
      PathPoint P3: femur_l (-0.04105122 -0.05107311 -0.02823476)
      PathPoint P4: femur_l (-0.01503284 -0.09790619 -0.04037667)
    Thelen2003Muscle glut_max3_l: max_isometric_force=552 optimal_fiber_length=0.1511002 tendon_slack_length=0.1521495
        pennation_angle_at_optimal=0.08726646
      PathPoint P1: pelvis (-0.2021547 -0.03157954 -0.005817728)
      PathPoint P2: pelvis (-0.1986468 -0.1058015 -0.04042318)
      PathPoint P3: femur_l (-0.02881294 -0.1003153 -0.01300919)
      PathPoint P4: femur_l (-0.005781862 -0.136741 -0.03960575)
    Thelen2003Muscle iliacus_l: max_isometric_force=1073 optimal_fiber_length=0.1066893 tendon_slack_length=0.1066893
        pennation_angle_at_optimal=0.1221731
      PathPoint P1: pelvis (-0.08756571 0.0367087 -0.08566103)
      PathPoint P2: pelvis (-0.03351922 -0.05531447 -0.08134789)
      ConditionalPathPoint P3: pelvis (-0.0374168 -0.08096028 -0.08184941)
          socket_coordinate=/jointset/hip_l/hip_flexion_l range=(-1.5708 0.785398)
      PathPoint P4: femur_l (0.001638194 -0.05232585 -0.005492769)
      PathPoint P5: femur_l (-0.01859832 -0.05984227 -0.012431)
    Thelen2003Muscle psoas_l: max_isometric_force=1113 optimal_fiber_length=0.1049063 tendon_slack_length=0.16785
        pennation_angle_at_optimal=0.1396263
      PathPoint P1: pelvis (-0.08405789 0.08920716 -0.02898833)
      PathPoint P2: pelvis (-0.03092083 -0.05732591 -0.07613199)
      ConditionalPathPoint P3: pelvis (-0.0374168 -0.08096028 -0.08184941)
          socket_coordinate=/jointset/hip_l/hip_flexion_l range=(-1.5708 0.785398)
      PathPoint P4: femur_l (0.00154183 -0.04885673 -0.003661846)
      PathPoint P5: femur_l (-0.0181165 -0.05752952 -0.01002189)
    Thelen2003Muscle quad_fem_l: max_isometric_force=381 optimal_fiber_length=0.0553468 tendon_slack_length=0.02459858
        pennation_angle_at_optimal=0
      PathPoint P1: pelvis (-0.1484979 -0.1157581 -0.05215894)
      PathPoint P2: femur_l (-0.03671482 -0.03459481 -0.03526936)
    Thelen2003Muscle gem_l: max_isometric_force=164 optimal_fiber_length=0.02610571 tendon_slack_length=0.04242178
        pennation_angle_at_optimal=0
      PathPoint P1: pelvis (-0.1471987 -0.08246885 -0.07161824)
      PathPoint P2: femur_l (-0.01368374 -0.003180024 -0.04268941)
    Thelen2003Muscle peri_l: max_isometric_force=444 optimal_fiber_length=0.0277158 tendon_slack_length=0.1225891
        pennation_angle_at_optimal=0.1745329
      PathPoint P1: pelvis (-0.1813676 0.0003017153 -0.02357183)
      PathPoint P2: pelvis (-0.1549939 -0.02775781 -0.06590082)
      PathPoint P3: femur_l (-0.01426193 -0.003469117 -0.04211123)
    Thelen2003Muscle rect_fem_l: max_isometric_force=1169 optimal_fiber_length=0.109967 tendon_slack_length=0.2990332
        pennation_angle_at_optimal=0.08726646
      PathPoint P1: pelvis (-0.03832624 -0.03127782 -0.09709587)
      ConditionalPathPoint P2: femur_l (0.0321857 -0.3883484 -0.001830923)
          socket_coordinate=/jointset/knee_l/knee_angle_l range=(-2.61799 -1.45997)
      MovingPathPoint P3: tibia_l socket_x_coordinate=/jointset/knee_l/knee_angle_l
          socket_y_coordinate=/jointset/knee_l/knee_angle_l socket_z_coordinate=/jointset/knee_l/knee_angle_l
        x_location: MultiplierFunction: scale=0.9832302
          SimmSpline: x=(-2.0944 -1.99997 -1.5708 -1.45752 -1.39626 -1.0472 -0.698132 -0.526391 -0.349066 -0.174533 0 0.00017453 0.00034907 0.0279253 0.0872665 0.174533 2.0944)
              y=(0.0155805 0.0179938 0.0275081 0.0296564 0.0307615 0.0365695 0.0422074 0.0450902 0.048391 0.0534299 0.0617576 0.0617669 0.0617762 0.0633083 0.066994 0.0733035 0.0573481)
        y_location: MultiplierFunction: scale=0.9832302
          SimmSpline: x=(-2.0944 -1.99997 -1.5708 -1.45752 -1.39626 -1.0472 -0.698132 -0.526391 -0.349066 -0.174533 0 0.00017453 0.00034907 0.0279253 0.0872665 0.174533 2.0944)
              y=(0.0234116 0.0237613 0.0251141 0.0252795 0.0253146 0.0249184 0.0242373 0.0238447 0.0234197 0.0227644 0.020984 0.0209814 0.0209788 0.0205225 0.0191754 0.0159554 -0.0673774)
        z_location: MultiplierFunction: scale=0.9832302
          SimmSpline: x=(-2.0944 0.1745) y=(-0.0014 -0.0014)
    Thelen2003Muscle vas_med_l: max_isometric_force=1294 optimal_fiber_length=0.08549722 tendon_slack_length=0.121041
        pennation_angle_at_optimal=0.08726646
      PathPoint P1: femur_l (0.01349101 -0.2022688 -0.0181165)
      PathPoint P2: femur_l (0.03430571 -0.2668329 -0.0008672792)
      ConditionalPathPoint P3: femur_l (0.03565481 -0.3900829 0.01204555)
          socket_coordinate=/jointset/knee_l/knee_angle_l range=(-2.61799 -1.21004)
      ConditionalPathPoint P4: femur_l (0.02640383 -0.4100304 0.01262373)
          socket_coordinate=/jointset/knee_l/knee_angle_l range=(-2.61799 -1.78006)
      MovingPathPoint P5: tibia_l socket_x_coordinate=/jointset/knee_l/knee_angle_l
          socket_y_coordinate=/jointset/knee_l/knee_angle_l socket_z_coordinate=/jointset/knee_l/knee_angle_l
        x_location: MultiplierFunction: scale=0.9832302
          SimmSpline: x=(-2.0944 -1.99997 -1.5708 -1.45752 -1.39626 -1.0472 -0.698132 -0.526391 -0.349066 -0.174533 0 0.00017453 0.00034907 0.0279253 0.0872665 0.174533 2.0944)
              y=(0.00981097 0.0122243 0.0217371 0.0238851 0.0249902 0.0307959 0.0364187 0.0392871 0.0425654 0.0475764 0.0559586 0.0559681 0.0559776 0.0575419 0.0613368 0.0679503 0.0629332)
        y_location: MultiplierFunction: scale=0.9832302
          SimmSpline: x=(-2.0944 -1.99997 -1.5708 -1.45752 -1.39626 -1.0472 -0.698132 -0.526391 -0.349066 -0.174533 0 0.00017453 0.00034907 0.0279253 0.0872665 0.174533 2.0944)
              y=(0.0224154 0.0227651 0.0241265 0.0242933 0.0243287 0.0239462 0.0233593 0.0230677 0.0228342 0.0226362 0.0217917 0.0217903 0.0217889 0.0215365 0.0206842 0.0183269 -0.0656205)
        z_location: MultiplierFunction: scale=0.9832302
          SimmSpline: x=(-2.0944 2.0944) y=(0.0146 0.0146)
    Thelen2003Muscle vas_int_l: max_isometric_force=1365 optimal_fiber_length=0.08357594 tendon_slack_length=0.1306474
        pennation_angle_at_optimal=0.05235988
      PathPoint P1: femur_l (0.02794566 -0.185405 -0.02987295)
      PathPoint P2: femur_l (0.03228206 -0.2008233 -0.02746384)
      ConditionalPathPoint P3: femur_l (0.03305298 -0.3883484 -0.00530004)
          socket_coordinate=/jointset/knee_l/knee_angle_l range=(-2.61799 -1.42)
      MovingPathPoint P4: tibia_l socket_x_coordinate=/jointset/knee_l/knee_angle_l
          socket_y_coordinate=/jointset/knee_l/knee_angle_l socket_z_coordinate=/jointset/knee_l/knee_angle_l
        x_location: MultiplierFunction: scale=0.9832302
          SimmSpline: x=(-2.0944 -1.99997 -1.5708 -1.45752 -1.39626 -1.0472 -0.698132 -0.526391 -0.349066 -0.174533 0 0.00017453 0.00034907 0.0279253 0.0872665 0.174533 2.0944)
              y=(0.0155805 0.0179938 0.0275081 0.0296564 0.0307615 0.0365695 0.0422074 0.0450902 0.048391 0.0534299 0.0617576 0.0617669 0.0617762 0.0633083 0.066994 0.0733035 0.0573481)
        y_location: MultiplierFunction: scale=0.9832302
          SimmSpline: x=(-2.0944 -1.99997 -1.5708 -1.45752 -1.39626 -1.0472 -0.698132 -0.526391 -0.349066 -0.174533 0 0.00017453 0.00034907 0.0279253 0.0872665 0.174533 2.0944)
              y=(0.0234116 0.0237613 0.0251141 0.0252795 0.0253146 0.0249184 0.0242373 0.0238447 0.0234197 0.0227644 0.020984 0.0209814 0.0209788 0.0205225 0.0191754 0.0159554 -0.0673774)
        z_location: MultiplierFunction: scale=0.9832302
          SimmSpline: x=(-2.0944 0.1745) y=(-0.0014 -0.0014)
    Thelen2003Muscle vas_lat_l: max_isometric_force=1871 optimal_fiber_length=0.08075459 tendon_slack_length=0.1509342
        pennation_angle_at_optimal=0.08726646
      PathPoint P1: femur_l (0.004625489 -0.1786595 -0.03363116)
      PathPoint P2: femur_l (0.02592201 -0.2496801 -0.03941302)
      ConditionalPathPoint P3: femur_l (0.03478753 -0.3883484 -0.01975469)
          socket_coordinate=/jointset/knee_l/knee_angle_l range=(-2.61799 -1.21004)
      ConditionalPathPoint P4: femur_l (0.02438018 -0.408874 -0.01773104)
          socket_coordinate=/jointset/knee_l/knee_angle_l range=(-2.61799 -1.92004)
      MovingPathPoint P5: tibia_l socket_x_coordinate=/jointset/knee_l/knee_angle_l
          socket_y_coordinate=/jointset/knee_l/knee_angle_l socket_z_coordinate=/jointset/knee_l/knee_angle_l
        x_location: MultiplierFunction: scale=0.9832302
          SimmSpline: x=(-2.0944 -1.99997 -1.5708 -1.45752 -1.39626 -1.0472 -0.698132 -0.526391 -0.349066 -0.174533 0 0.00017453 0.00034907 0.0279253 0.0872665 0.174533 2.0944)
              y=(0.0142897 0.016703 0.0262145 0.0283623 0.0294674 0.0352709 0.0408785 0.0437291 0.0469704 0.0518742 0.0599557 0.0599647 0.0599738 0.0614577 0.0650351 0.0711867 0.0583766)
        y_location: MultiplierFunction: scale=0.9832302
          SimmSpline: x=(-2.0944 -1.99997 -1.5708 -1.45752 -1.39626 -1.0472 -0.698132 -0.526391 -0.349066 -0.174533 0 0.00017453 0.00034907 0.0279253 0.0872665 0.174533 2.0944)
              y=(0.0215318 0.0218815 0.0232362 0.0234019 0.0234371 0.0230439 0.0223842 0.0220151 0.0216359 0.0210971 0.0195864 0.0195842 0.019582 0.01919 0.018008 0.0151073 -0.0653421)
        z_location: MultiplierFunction: scale=0.9832302
          SimmSpline: x=(-2.0944 2.0944) y=(-0.0165 -0.0165)
    Thelen2003Muscle med_gas_l: max_isometric_force=1558 optimal_fiber_length=0.05868157 tendon_slack_length=0.3814302
        pennation_angle_at_optimal=0.296706
      PathPoint P1: femur_l (-0.01830923 -0.3786156 0.02264562)
      ConditionalPathPoint P2: femur_l (-0.02890931 -0.3875775 0.02486201)
          socket_coordinate=/jointset/knee_l/knee_angle_l range=(-0.785398 0.174533)
      PathPoint P3: calcn_l (0 0.03689556 0.004761024)
    Thelen2003Muscle lat_gas_l: max_isometric_force=683 optimal_fiber_length=0.06258488 tendon_slack_length=0.3715977
        pennation_angle_at_optimal=0.1396263
      PathPoint P1: femur_l (-0.02120016 -0.3802538 -0.02621111)
      ConditionalPathPoint P2: femur_l (-0.02890931 -0.387192 -0.02640383)
          socket_coordinate=/jointset/knee_l/knee_angle_l range=(-0.785398 0.174533)
      PathPoint P3: calcn_l (0 0.03689556 0.004761024)
    Thelen2003Muscle soleus_l: max_isometric_force=3549 optimal_fiber_length=0.04893686 tendon_slack_length=0.2446843
        pennation_angle_at_optimal=0.4363323
      PathPoint P1: tibia_l (-0.002359753 -0.1507292 -0.006980935)
      PathPoint P2: calcn_l (0 0.03689556 0.004761024)
    Thelen2003Muscle tib_post_l: max_isometric_force=1588 optimal_fiber_length=0.03053847 tendon_slack_length=0.3053847
        pennation_angle_at_optimal=0.2094395
      PathPoint P1: tibia_l (-0.009242364 -0.1325394 -0.001868137)
      PathPoint P2: tibia_l (-0.01415852 -0.3983066 0.02251597)
      PathPoint P3: calcn_l (0.04320234 0.03975199 0.02569157)
      PathPoint P4: calcn_l (0.07998131 0.01892385 0.02524241)
    Thelen2003Muscle flex_dig_l: max_isometric_force=310 optimal_fiber_length=0.03401611 tendon_slack_length=0.4001895
        pennation_angle_at_optimal=0.1221731
      PathPoint P1: tibia_l (-0.008160811 -0.2011689 0.001769814)
      PathPoint P2: tibia_l (-0.01514175 -0.3983066 0.01927131)
      PathPoint P3: calcn_l (0.04517079 0.03749065 0.02515258)
      PathPoint P4: calcn_l (0.07335074 0.02094716 0.02362546)
      PathPoint P5: calcn_l (0.1717733 -0.009640453 -0.01042036)
      PathPoint P6: toes_l (-0.001968452 -0.009283399 -0.01320511)
      PathPoint P7: toes_l (0.02952678 -0.008450274 -0.01931359)
      PathPoint P8: toes_l (0.04568881 -0.007141076 -0.02173902)
    Thelen2003Muscle flex_hal_l: max_isometric_force=322 optimal_fiber_length=0.04333316 tendon_slack_length=0.3829442
        pennation_angle_at_optimal=0.1745329
      PathPoint P1: tibia_l (-0.007767519 -0.2294859 -0.02399082)
      PathPoint P2: tibia_l (-0.01828808 -0.4010596 0.01710821)
      PathPoint P3: calcn_l (0.03874742 0.03284895 0.02164919)
      PathPoint P4: calcn_l (0.1075396 0.00809322 0.02299665)
      PathPoint P5: calcn_l (0.1788183 -0.006307951 0.02416444)
      PathPoint P6: toes_l (0.01605842 -0.007617148 0.02380512)
      PathPoint P7: toes_l (0.05822474 -0.01213983 0.01625935)
    Thelen2003Muscle tib_ant_l: max_isometric_force=905 optimal_fiber_length=0.09666514 tendon_slack_length=0.2199625
        pennation_angle_at_optimal=0.08726646
      PathPoint P1: tibia_l (0.01759982 -0.1596766 -0.01130715)
      PathPoint P2: tibia_l (0.03234827 -0.3884743 0.01740317)
      PathPoint P3: calcn_l (0.1208008 0.02118519 0.02739835)
    Thelen2003Muscle per_brev_l: max_isometric_force=435 optimal_fiber_length=0.04871817 tendon_slack_length=0.1568725
        pennation_angle_at_optimal=0.08726646
      PathPoint P1: tibia_l (-0.006882612 -0.2601627 -0.03195498)
      PathPoint P2: tibia_l (-0.01946796 -0.4113835 -0.02782542)
      PathPoint P3: tibia_l (-0.01415852 -0.4222974 -0.02841535)
      PathPoint P4: calcn_l (0.04879689 0.03213484 -0.02093054)
      PathPoint P5: calcn_l (0.07013905 0.02606493 -0.03081191)
    Thelen2003Muscle per_long_l: max_isometric_force=943 optimal_fiber_length=0.04819207 tendon_slack_length=0.3393115
        pennation_angle_at_optimal=0.1745329
      PathPoint P1: tibia_l (0.0004916151 -0.1541705 -0.03559293)
      PathPoint P2: tibia_l (-0.02035287 -0.4134483 -0.02812038)
      PathPoint P3: tibia_l (-0.01592833 -0.4246571 -0.02841535)
      PathPoint P4: calcn_l (0.045378 0.02737413 -0.01985257)
      PathPoint P5: calcn_l (0.07055346 0.0126159 -0.0255119)
      PathPoint P6: calcn_l (0.08826953 0.008212238 -0.01060002)
      PathPoint P7: calcn_l (0.1246341 0.01011652 0.01652884)
    Thelen2003Muscle per_tert_l: max_isometric_force=180 optimal_fiber_length=0.0771168 tendon_slack_length=0.09761621
        pennation_angle_at_optimal=0.2268928
      PathPoint P1: tibia_l (0.0009832302 -0.2756978 -0.02271262)
      PathPoint P2: tibia_l (0.02251597 -0.4000764 -0.01563336)
      PathPoint P3: calcn_l (0.08878754 0.02713609 -0.02685936)
    Thelen2003Muscle ext_dig_l: max_isometric_force=512 optimal_fiber_length=0.1016559 tendon_slack_length=0.3438361
        pennation_angle_at_optimal=0.1396263
      PathPoint P1: tibia_l (0.003146337 -0.1357841 -0.02713715)
      PathPoint P2: tibia_l (0.02841535 -0.3939804 -0.007079258)
      PathPoint P3: calcn_l (0.09552172 0.04617896 8.983065e-5)
      PathPoint P4: calcn_l (0.167422 0.006545987 -0.01167798)
      PathPoint P5: toes_l (0.0003108082 0.005593843 -0.01374409)
      PathPoint P6: toes_l (0.04589601 -0.0004760718 -0.02245766)
    Thelen2003Muscle ext_hal_l: max_isometric_force=162 optimal_fiber_length=0.1106864 tendon_slack_length=0.3041384
        pennation_angle_at_optimal=0.1047198
      PathPoint P1: tibia_l (0.001179876 -0.1737368 -0.02241765)
      PathPoint P2: tibia_l (0.03205331 -0.3918172 0.008357457)
      PathPoint P3: calcn_l (0.1004947 0.04629798 0.01895427)
      PathPoint P4: calcn_l (0.1339583 0.03677654 0.02308648)
      PathPoint P5: calcn_l (0.1796471 0.01654349 0.02515258)
      PathPoint P6: toes_l (0.03087361 0.004879736 0.02200851)
      PathPoint P7: toes_l (0.05832834 0.00404661 0.0167085)
    Thelen2003Muscle ercspn_r: max_isometric_force=2500 optimal_fiber_length=0.1127394 tendon_slack_length=0.02818485
        pennation_angle_at_optimal=0
      PathPoint P1: pelvis (-0.1818872 0.04415101 0.04373327)
      PathPoint P2: torso (-0.0714557 0.1007041 0.03036113)
    Thelen2003Muscle ercspn_l: max_isometric_force=2500 optimal_fiber_length=0.1127394 tendon_slack_length=0.02818485
        pennation_angle_at_optimal=0
      PathPoint P1: pelvis (-0.1818872 0.04415101 -0.04373327)
      PathPoint P2: torso (-0.0714557 0.1007041 -0.03036113)
    Thelen2003Muscle intobl_r: max_isometric_force=900 optimal_fiber_length=0.0933783 tendon_slack_length=0.0933783
        pennation_angle_at_optimal=0
      PathPoint P1: pelvis (-0.05196778 0.07040024 0.1160536)
      PathPoint P2: torso (0.09094362 0.1464787 0.01889697)
    Thelen2003Muscle intobl_l: max_isometric_force=900 optimal_fiber_length=0.0933783 tendon_slack_length=0.0933783
        pennation_angle_at_optimal=0
      PathPoint P1: pelvis (-0.05196778 0.07040024 -0.1160536)
      PathPoint P2: torso (0.09094362 0.1464787 -0.01889697)
    Thelen2003Muscle extobl_r: max_isometric_force=900 optimal_fiber_length=0.1218226 tendon_slack_length=0.1421264
        pennation_angle_at_optimal=0
      PathPoint P1: pelvis (-0.03897584 -0.06396365 0.01003057)
      PathPoint P2: torso (0.08444765 0.1007041 0.1385778)
    Thelen2003Muscle extobl_l: max_isometric_force=900 optimal_fiber_length=0.1218226 tendon_slack_length=0.1421264
        pennation_angle_at_optimal=0
      PathPoint P1: pelvis (-0.03897584 -0.06396365 -0.01003057)
      PathPoint P2: torso (0.08444765 0.1007041 -0.1385778)
    ObjectGroup R_hip_abd: members=(glut_max1_r glut_med1_r glut_med2_r glut_med3_r glut_min1_r glut_min2_r glut_min3_r peri_r sar_r tfl_r)
    ObjectGroup R_hip_flex: members=(add_brev_r add_long_r glut_med1_r glut_min1_r grac_r iliacus_r pect_r psoas_r rect_fem_r sar_r tfl_r)
    ObjectGroup R_hip_inrot: members=(glut_med1_r glut_min1_r iliacus_r psoas_r tfl_r)
    ObjectGroup R_hip_exrot: members=(gem_r glut_med3_r glut_min3_r peri_r quad_fem_r)
    ObjectGroup R_hip_ext: members=(add_long_r add_mag1_r add_mag2_r add_mag3_r bifemlh_r glut_max1_r glut_max2_r glut_max3_r glut_med3_r glut_min3_r semimem_r semiten_r)
    ObjectGroup R_hip_add: members=(add_brev_r add_long_r add_mag1_r add_mag2_r add_mag3_r bifemlh_r grac_r pect_r semimem_r semiten_r)
    ObjectGroup R_knee_bend: members=(bifemlh_r bifemsh_r grac_r lat_gas_r med_gas_r sar_r semimem_r semiten_r)
    ObjectGroup R_knee_ext: members=(rect_fem_r vas_int_r vas_lat_r vas_med_r)
    ObjectGroup R_ankle_pf: members=(flex_dig_r flex_hal_r lat_gas_r med_gas_r per_brev_r per_long_r soleus_r tib_post_r)
    ObjectGroup R_inverter: members=(ext_hal_r flex_dig_r flex_hal_r tib_ant_r tib_post_r)
    ObjectGroup R_ankle_df: members=(ext_dig_r ext_hal_r per_tert_r tib_ant_r)
    ObjectGroup R_everter: members=(ext_dig_r per_brev_r per_long_r per_tert_r)
    ObjectGroup L_hip_abd: members=(glut_max1_l glut_med1_l glut_med2_l glut_med3_l glut_min1_l glut_min2_l glut_min3_l peri_l sar_l tfl_l)
    ObjectGroup L_hip_flex: members=(add_brev_l add_long_l glut_med1_l glut_min1_l grac_l iliacus_l pect_l psoas_l rect_fem_l sar_l tfl_l)
    ObjectGroup L_hip_inrot: members=(glut_med1_l glut_min1_l iliacus_l psoas_l tfl_l)
    ObjectGroup L_hip_exrot: members=(gem_l glut_med3_l glut_min3_l peri_l quad_fem_l)
    ObjectGroup L_hip_ext: members=(add_long_l add_mag1_l add_mag2_l add_mag3_l bifemlh_l glut_max1_l glut_max2_l glut_max3_l glut_med3_l glut_min3_l semimem_l semiten_l)
    ObjectGroup L_hip_add: members=(add_brev_l add_long_l add_mag1_l add_mag2_l add_mag3_l bifemlh_l grac_l pect_l semimem_l semiten_l)
    ObjectGroup L_knee_bend: members=(bifemlh_l bifemsh_l grac_l lat_gas_l med_gas_l sar_l semimem_l semiten_l)
    ObjectGroup L_knee_ext: members=(rect_fem_l vas_int_l vas_lat_l vas_med_l)
    ObjectGroup L_ankle_pf: members=(flex_dig_l flex_hal_l lat_gas_l med_gas_l per_brev_l per_long_l soleus_l tib_post_l)
    ObjectGroup L_inverter: members=(ext_hal_l flex_dig_l flex_hal_l tib_ant_l tib_post_l)
    ObjectGroup L_ankle_df: members=(ext_dig_l ext_hal_l per_tert_l tib_ant_l)
    ObjectGroup L_everter: members=(ext_dig_l per_brev_l per_long_l per_tert_l)
    ObjectGroup back_ext: members=(ercspn_l ercspn_r)
    ObjectGroup back_rlb: members=(ercspn_r extobl_r intobl_r)
    ObjectGroup back_introt: members=(ercspn_r extobl_l intobl_r)
    ObjectGroup back_llb: members=(ercspn_l extobl_l intobl_l)
    ObjectGroup back_extrot: members=(ercspn_l extobl_r intobl_l)
    ObjectGroup back_flex: members=(extobl_l extobl_r intobl_l intobl_r)
  MarkerSet:
    Marker STERNUM: torso (0.08113266 0.3250004 0.005788939)
    Marker C7: torso (-0.056926 0.3735935 0.005523903)
    Marker RGH: torso (-0.01021807 0.3562108 0.1827857)
    Marker LGH: torso (-0.002212886 0.3504178 -0.1723214)
    Marker RFRONTAL: torso (0.1153219 0.5532331 0.08545328)
    Marker LFRONTAL: torso (0.1361688 0.5508771 -0.04302569)
    Marker ROCCIPUT: torso (-0.04100365 0.4843788 0.04435889)
    Marker LOCCIPUT: torso (-0.01964196 0.4791965 -0.06145762)
    Marker RASIS: pelvis (0.002287109 -0.002924166 0.1154429)
    Marker LASIS: pelvis (0.001251972 -0.0003044412 -0.11621)
    Marker RPSIS: pelvis (-0.2094286 0.05247181 0.04162202)
    Marker LPSIS: pelvis (-0.2069788 0.04980103 -0.04343376)
    Marker V_MidPnt_SIAS: pelvis (0.01299195 0.01005718 0) fixed=true
    Marker V_MidPnt_SIPS: pelvis (-0.1994926 0.04224014 0) fixed=true
    Marker V_MidPnt_Pelvis: pelvis (-0.09094362 0.02614866 0) fixed=true
    Marker V_MidPnt_Hip: pelvis (-0.09185306 -0.06647794 0) fixed=true
    Marker V_Right_Hip: femur_r_offset (0 0 0) fixed=true
    Marker RAT: femur_r (0.1014575 -0.1904948 0.02914992)
    Marker RLT: femur_r (-0.001574867 -0.2000793 0.09376994)
    Marker RDAT: femur_r (0.08534373 -0.2814251 0.0158865)
    Marker RLE: femur_r (0.0009430564 -0.3931147 0.05095302)
    Marker RME: femur_r (-0.0007044941 -0.4022236 -0.06272554)
    Marker V_MidPnt_R_Knee: femur_r (0 -0.3986979 0) fixed=true
    Marker RTT: tibia_r (0.03430556 -0.07096109 0.01217051)
    Marker RFH: tibia_r (-0.01834876 -0.05257187 0.06558608)
    Marker RT: tibia_r (0.03594546 -0.2028175 0.01036617)
    Marker RF: tibia_r (-0.02529814 -0.1281384 0.07742618)
    Marker RLM: tibia_r (-0.01185791 -0.3851563 0.04883979)
    Marker RMM: tibia_r (0.01236888 -0.378539 -0.03520815)
    Marker V_MidPnt_R_Mal: tibia_r (0.0004720195 -0.3837519 0.005712111) fixed=true
    Marker RMC: calcn_r (-0.01940227 0.01887162 0.006339407)
    Marker RMEDC: calcn_r (-0.01045517 0.04522642 -0.0201863)
    Marker RLC: calcn_r (0.03767142 0.01320066 0.04563817)
    Marker R5MT: calcn_r (0.1696033 0.01106319 0.0457202)
    Marker R1MT: calcn_r (0.1935733 0.02350203 -0.02720584)
    Marker V_Left_Hip: femur_l_offset (0 0 0) fixed=true
    Marker LAT: femur_l (0.1153921 -0.167561 -0.003781632)
    Marker LLT: femur_l (0.02313902 -0.1778688 -0.0860943)
    Marker LDAT: femur_l (0.1069634 -0.2576799 0.006046581)
    Marker LLE: femur_l (0.008291462 -0.3749986 -0.05560429)
    Marker LME: femur_l (-0.009028051 -0.3963575 0.07849049)
    Marker V_MidPnt_L_Knee: femur_l (0 -0.389312 0) fixed=true
    Marker LTT: tibia_l (0.06298813 -0.07381404 0.004864811)
    Marker LFH: tibia_l (0.01040608 -0.06857081 -0.05741915)
    Marker LT: tibia_l (0.0496495 -0.2158883 -0.005141101)
    Marker LF: tibia_l (-0.002602312 -0.1375867 -0.07435276)
    Marker LLM: tibia_l (-0.002422746 -0.406972 -0.05668308)
    Marker LMM: tibia_l (0.004467903 -0.3915738 0.0309036)
    Marker V_MidPnt_L_Mal: tibia_l (0.0004916151 -0.4026328 -0.008220927) fixed=true
    Marker LMC: calcn_l (-0.02864867 0.008651646 -0.001473271)
    Marker LMEDC: calcn_l (-0.007094796 0.04191796 0.02417233)
    Marker LLC: calcn_l (0.04237484 -0.006186835 -0.05430892)
    Marker L5MT: calcn_l (0.160488 0.008572211 -0.05274903)
    Marker L1MT: calcn_l (0.1820406 0.0318704 0.02422405)
    Marker T6: torso (-0.1069114 0.1950691 0.002749057)
    Marker V_MidPnt_L_MTP: calcn_l (0.1700277 0.02519484 -0.01203193) fixed=true
    Marker V_MidPnt_R_MTP: calcn_r (0.1830927 0.0178897 0.007422796) fixed=true
    Marker V_TopHead: torso (-0.4835938 14.76257 -0.1371545)
    Marker LELBOW: humerus_l (0.04070427 -0.2539956 0.04041324)
    Marker LWRIST: ulna_l (-0.04521003 -0.2413754 -0.0098078)
    Marker RELBOW: humerus_r (0.03591285 -0.2522715 -0.04104306)
    Marker RWRIST: ulna_r (-0.03937678 -0.223198 0.009945891)
    Marker V_LMM: tibia_l (0.004180308 -0.5036909 0.03864471)
    Marker V_LLM: tibia_l (-0.002686424 -0.5097651 -0.04958574)
    Marker Pro_MidPnt_L_Mal: tibia_l (0.0007469419 -0.506728 -0.005470514)
    Marker V_LMC: calcn_l (-0.03136687 -0.03283123 -0.0003139306)
    Marker V_LMEDC: calcn_l (-0.01202714 -0.03335536 0.02627603)
    Marker V_LLC: calcn_l (0.04022436 -0.03900569 -0.05339171)
    Marker Pro_MidPnt_L_MTP: calcn_l (0.1669145 -0.04616174 -0.01240726)
    Marker V_L5MT: calcn_l (0.1568736 -0.04658817 -0.05120744)
    Marker V_L1MT: calcn_l (0.1769554 -0.04573531 0.02639293)
    Marker V_RMM: tibia_r (0.01958315 -0.4877135 -0.04308136)
    Marker V_RLM: tibia_r (-0.004575262 -0.4953657 0.04089196)
    Marker Pro_MidPnt_R_Mal: tibia_r (0.007503943 -0.4915396 -0.0010947)
    Marker V_RMC: calcn_r (-0.02270586 -0.03737463 -0.000140941)
    Marker V_RMEDC: calcn_r (-0.01513504 -0.03445212 -0.02936638)
    Marker V_RLC: calcn_r (0.03424022 -0.04521824 0.03890751)
    Marker Pro_MidPnt_R_MTP: calcn_r (0.1776751 -0.04934228 0.001581072)
    Marker V_R5MT: calcn_r (0.1658474 -0.05288417 0.03835258)
    Marker V_R1MT: calcn_r (0.1895029 -0.04580039 -0.03519043)
