# OpenSim document version 40000
MarkerSet:
  Marker STERNUM: torso (0.04454836 0.3694015 0) fixed=true
  Marker C7: torso (-0.07284298 0.4133403 0) fixed=true
  Marker RGH: torso (-0.01408297 0.415981 0.1500585) fixed=true
  Marker LGH: torso (0 0.4156448 -0.1676523) fixed=true
  Marker RFRONTAL: torso (0.073 0.61 0.05)
  Marker LFRONTAL: torso (0.073 0.61 -0.05)
  Marker ROCCIPUT: torso (-0.0725 0.58 0.05)
  Marker LOCCIPUT: torso (-0.0725 0.58 -0.05)
  Marker RASIS: pelvis (0.01 0.01 0.124) fixed=true
  Marker LASIS: pelvis (0.01 0.01 -0.124) fixed=true
  Marker RPSIS: pelvis (-0.153551 0.042 0.0450304) fixed=true
  Marker LPSIS: pelvis (-0.153551 0.042 -0.0450304) fixed=true
  Marker V_MidPnt_SIAS: pelvis (0.01 0.01 0) fixed=true
  Marker V_MidPnt_SIPS: pelvis (-0.153551 0.042 0) fixed=true
  Marker V_MidPnt_Pelvis: pelvis (-0.07 0.026 0) fixed=true
  Marker V_MidPnt_Hip: pelvis (-0.0707 -0.0661 0) fixed=true
  Marker V_Right_Hip: femur_r_offset (0 0 0)
  Marker RAT: femur_r (0.065 -0.17 0.02010354)
  Marker RLT: femur_r (-0.001339499 -0.17 0.064)
  Marker RDAT: femur_r (0.065 -0.2763417 0.01861815)
  Marker RLE: femur_r (0 -0.404 0.05) fixed=true
  Marker RME: femur_r (0 -0.404 -0.05) fixed=true
  Marker V_MidPnt_R_Knee: femur_r (0 -0.404 0) fixed=true
  Marker RTT: tibia_r (0.05157355 -0.0696878 0.01040162) fixed=true
  Marker RFH: tibia_r (-0.005172749 -0.07788924 0.05876522) fixed=true
  Marker RT: tibia_r (0.02099833 -0.2809902 -0.002290133)
  Marker RF: tibia_r (-0.006193534 -0.2152085 0.05000016)
  Marker RLM: tibia_r (-0.005001365 -0.4123539 0.05251917) fixed=true
  Marker RMM: tibia_r (0.005999141 -0.4007406 -0.03369893) fixed=true
  Marker V_MidPnt_R_Mal: tibia_r (0.0005 -0.4065 0.0094) fixed=true
  Marker RMC: calcn_r (-0.01999989 0.01899999 -0.007109428) fixed=true
  Marker RMEDC: calcn_r (0.0175461 0.025 -0.0388165) fixed=true
  Marker RLC: calcn_r (0.0221 0.025 0.0307541) fixed=true
  Marker R5MT: toes_r (-0.03263262 0.007473053 0.05433743) fixed=true
  Marker R1MT: toes_r (0.00277911 0.02041876 -0.02927538) fixed=true
  Marker V_Left_Hip: femur_l_offset (0 0 0) fixed=true
  Marker LAT: femur_l (0.065 -0.17 -0.01860756)
  Marker LLT: femur_l (0.01283517 -0.17 -0.05601023)
  Marker LDAT: femur_l (0.065 -0.2697119 -0.01160566)
  Marker LLE: femur_l (0 -0.404 -0.05) fixed=true
  Marker LME: femur_l (0 -0.404 0.05) fixed=true
  Marker V_MidPnt_L_Knee: femur_l (0 -0.404 0) fixed=true
  Marker LTT: tibia_l (0.04980585 -0.07203588 -0.008237422) fixed=true
  Marker LFH: tibia_l (-0.007968004 -0.07451847 -0.05947771) fixed=true
  Marker LT: tibia_l (0.02764694 -0.2814855 -0.005830479)
  Marker LF: tibia_l (-0.009428166 -0.2117921 -0.0500001)
  Marker LLM: tibia_l (-0.005001362 -0.4166994 -0.05269914) fixed=true
  Marker LMM: tibia_l (0.00599926 -0.4022926 0.03241183) fixed=true
  Marker V_MidPnt_L_Mal: tibia_l (0.0005 -0.4095 -0.008361141) fixed=true
  Marker LMC: calcn_l (-0.01999993 0.01899999 0.004396022) fixed=true
  Marker LMEDC: calcn_l (0.01754608 0.025 0.0388165) fixed=true
  Marker LLC: calcn_l (0.0221 0.025 -0.03075407) fixed=true
  Marker L5MT: toes_l (-0.032633 0.0160679 -0.0544796) fixed=true
  Marker L1MT: toes_l (0.002779 0.0204188 0.02742877) fixed=true
  Marker LELBOW: humerus_l (0.01214798 -0.2763125 -0.03468002) fixed=true
  Marker RELBOW: humerus_r (0.01351249 -0.279366 0.0333175) fixed=true
  Marker RWRIST: ulna_r (-0.03753217 -0.2408234 0.01731543) fixed=true
  Marker LWRIST: ulna_l (-0.04084456 -0.2398278 -0.01659734) fixed=true
  Marker T6: torso (-0.1087639 0.2727872 0.001067296)
