# OpenSim document version 40000
ScaleTool gait2392_frontHingesKnee_01Feb2016-scaled:
  mass: 57 [kg]
  height: -1
  age: -1
  GenericModelMaker:
    marker_set_file: Markerset_Calgary.xml
  ModelScaler:
    apply: true
    scaling_order: measurements
    marker_file: C:/Users/adpatrick/OneDrive - nih.no/Desktop/galary/../../../Downloads/Calgary_Data_all/Right/P101/Static.trc
    time_range: 0 3.73333
    preserve_mass_distribution: true
    MeasurementSet:
      Measurement pelvis_x: apply=true
        MarkerPair: markers=(V_MidPnt_SIAS V_MidPnt_SIPS)
        BodyScale pelvis: axes=X
      Measurement pelvis_y: apply=true
        MarkerPair: markers=(V_Left_Hip V_MidPnt_Pelvis)
        MarkerPair: markers=(V_Right_Hip V_MidPnt_Pelvis)
        BodyScale pelvis: axes=Y
      Measurement pelvis_z: apply=true
        MarkerPair: markers=(V_MidPnt_SIAS V_MidPnt_SIPS)
        MarkerPair: markers=(V_Right_Hip V_Left_Hip)
        BodyScale pelvis: axes=Z
      Measurement torso: apply=true
        MarkerPair: markers=(V_MidPnt_Pelvis C7)
        MarkerPair: markers=(C7 STERNUM)
        BodyScale torso: axes=(X Y Z)
      Measurement thight_right: apply=true
        MarkerPair: markers=(V_Right_Hip V_MidPnt_R_Knee)
        BodyScale femur_r: axes=(X Y Z)
      Measurement thight_left: apply=true
        MarkerPair: markers=(V_Left_Hip V_MidPnt_L_Knee)
        BodyScale femur_l: axes=(X Y Z)
      Measurement shank_left: apply=true
        MarkerPair: markers=(V_MidPnt_L_Knee V_MidPnt_L_Mal)
        BodyScale tibia_l: axes=(X Y Z)
      Measurement shank_right: apply=true
        MarkerPair: markers=(V_MidPnt_R_Knee V_MidPnt_R_Mal)
        BodyScale tibia_r: axes=(X Y Z)
      Measurement foot_r: apply=true
        MarkerPair: markers=(RMC R5MT)
        BodyScale talus_r: axes=(X Y Z)
        BodyScale calcn_r: axes=(X Y Z)
        BodyScale toes_r: axes=(X Y Z)
      Measurement foot_l: apply=true
        MarkerPair: markers=(LMC L5MT)
        BodyScale talus_l: axes=(X Y Z)
        BodyScale calcn_l: axes=(X Y Z)
        BodyScale toes_l: axes=(X Y Z)
  MarkerPlacer:
    apply: true
    marker_file: C:/Users/adpatrick/OneDrive - nih.no/Desktop/galary/../../../Downloads/Calgary_Data_all/Right/P101/Static.trc
    time_range: 0 3.73333
    max_marker_movement: -1
    IKTaskSet:
      IKMarkerTask STERNUM: apply=true weight=50
      IKMarkerTask C7: apply=true weight=50
      IKMarkerTask RGH: apply=false weight=1
      IKMarkerTask LGH: apply=false weight=1
      IKMarkerTask RFRONTAL: apply=false weight=1
      IKMarkerTask LFRONTAL: apply=false weight=1
      IKMarkerTask ROCCIPUT: apply=false weight=1
      IKMarkerTask LOCCIPUT: apply=false weight=1
      IKMarkerTask RASIS: apply=true weight=100
      IKMarkerTask LASIS: apply=true weight=100
      IKMarkerTask RPSIS: apply=true weight=100
      IKMarkerTask LPSIS: apply=true weight=100
      IKMarkerTask V_MidPnt_SIAS: apply=true weight=200
      IKMarkerTask V_MidPnt_SIPS: apply=true weight=200
      IKMarkerTask V_MidPnt_Pelvis: apply=true weight=200
      IKMarkerTask V_MidPnt_Hip: apply=true weight=200
      IKMarkerTask V_Right_Hip: apply=true weight=200
      IKMarkerTask RAT: apply=false weight=1
      IKMarkerTask RLT: apply=false weight=1
      IKMarkerTask RDAT: apply=false weight=1
      IKMarkerTask RLE: apply=true weight=100
      IKMarkerTask RME: apply=true weight=100
      IKMarkerTask V_MidPnt_R_Knee: apply=true weight=200
      IKMarkerTask RTT: apply=false weight=1
      IKMarkerTask RFH: apply=false weight=1
      IKMarkerTask RT: apply=false weight=1
      IKMarkerTask RF: apply=false weight=1
      IKMarkerTask RLM: apply=true weight=100
      IKMarkerTask RMM: apply=true weight=100
      IKMarkerTask V_MidPnt_R_Mal: apply=true weight=200
      IKMarkerTask RMC: apply=true weight=50
      IKMarkerTask RMEDC: apply=false weight=1
      IKMarkerTask RLC: apply=false weight=1
      IKMarkerTask R5MT: apply=true weight=50
      IKMarkerTask R1MT: apply=false weight=1
      IKMarkerTask V_Left_Hip: apply=true weight=200
      IKMarkerTask LAT: apply=false weight=1
      IKMarkerTask LLT: apply=false weight=1
      IKMarkerTask LDAT: apply=false weight=1
      IKMarkerTask LLE: apply=true weight=100
      IKMarkerTask LME: apply=true weight=100
      IKMarkerTask V_MidPnt_L_Knee: apply=true weight=200
      IKMarkerTask LTT: apply=false weight=1
      IKMarkerTask LFH: apply=false weight=1
      IKMarkerTask LT: apply=false weight=1
      IKMarkerTask LF: apply=false weight=1
      IKMarkerTask LLM: apply=true weight=100
      IKMarkerTask LMM: apply=true weight=100
      IKMarkerTask V_MidPnt_L_Mal: apply=true weight=200
      IKMarkerTask LMC: apply=true weight=50
      IKMarkerTask LMEDC: apply=false weight=1
      IKMarkerTask LLC: apply=false weight=1
      IKMarkerTask L5MT: apply=true weight=50
      IKMarkerTask L1MT: apply=false weight=1
      IKMarkerTask T6: apply=false weight=1
