# OpenSim document version 40000
AnalyzeTool BODYKIN_RESULTS_:
  model_file: gait2392_frontHingesKnee.osim
  replace_force_set: false
  results_directory: .
  output_precision: 8
  initial_time: 0
  final_time: 0.49
  solve_for_equilibrium_for_auxiliary_states: false
  maximum_number_of_integrator_steps: 20000
  maximum_integrator_step_size: 1
  minimum_integrator_step_size: 1e-8
  integrator_error_tolerance: 1e-5
  coordinates_file: IK_RESULTS_Cutting10.mot
  lowpass_cutoff_frequency_for_coordinates: 6
  AnalysisSet Analyses:
    BodyKinematics: start_time=0 end_time=0.49 step_interval=1 in_degrees=true bodies=all
        express_results_in_body_local_frame=false
